! CAPACITORES — gerados de UNCRMT
! Emitidos como banco FIXO. A BDGD nao traz o ajuste do CapControl;
! se houver controle em campo, incluir CapControl aqui.
! 1 bancos descartados por PAC ausente da rede.
New Capacitor.2788874 Bus1=16112-10915574.1.2.3 Phases=3 Conn=wye kV=13.8 kvar=6.0
New Capacitor.2789363 Bus1=16112-10922573.1.2.3 Phases=3 Conn=wye kV=13.8 kvar=10.0
New Capacitor.2783323 Bus1=16102-10869319.1.2.3 Phases=3 Conn=wye kV=13.8 kvar=10.0
New Capacitor.2930877 Bus1=16107-10870155.1.2.3 Phases=3 Conn=wye kV=13.8 kvar=10.0
New Capacitor.2783420 Bus1=16102-10870994.1.2.3 Phases=3 Conn=wye kV=13.8 kvar=6.0
New Capacitor.3174748 Bus1=26282-12855059.1.2.3 Phases=3 Conn=wye kV=13.8 kvar=10.0
New Capacitor.2941429 Bus1=26282-11460388.1.2.3 Phases=3 Conn=wye kV=13.8 kvar=10.0
New Capacitor.2941432 Bus1=26283-12336589.1.2.3 Phases=3 Conn=wye kV=13.8 kvar=10.0
New Capacitor.2941433 Bus1=16107-11460393.1.2.3 Phases=3 Conn=wye kV=13.8 kvar=10.0
New Capacitor.2785628 Bus1=16107-10889468.1.2.3 Phases=3 Conn=wye kV=13.8 kvar=10.0
New Capacitor.2785612 Bus1=16107-10889116.1.2.3 Phases=3 Conn=wye kV=13.8 kvar=6.0
New Capacitor.2941431 Bus1=16102-12336279.1.2.3 Phases=3 Conn=wye kV=13.8 kvar=10.0
New Capacitor.2783430 Bus1=26283-12335704.1.2.3 Phases=3 Conn=wye kV=13.8 kvar=6.0
New Capacitor.3167632 Bus1=26282-12797285.1.2.3 Phases=3 Conn=wye kV=13.8 kvar=10.0
New Capacitor.PA-ND-SE-ABA-TRM-BCSE-01H1 Bus1=16102-10869357.1.2.3 Phases=3 Conn=wye kV=13.8 kvar=17.0
New Capacitor.PA-ND-SE-ABA-TRM-BCSE-01H2 Bus1=16102-10869357.1.2.3 Phases=3 Conn=wye kV=13.8 kvar=18.0
New Capacitor.PA-ND-SE-ABA-TRM-BCSE-01H3 Bus1=16102-10869357.1.2.3 Phases=3 Conn=wye kV=13.8 kvar=18.0
New Capacitor.2846197 Bus1=25323-11273223.1.2.3 Phases=3 Conn=wye kV=34.5 kvar=10.0
New Capacitor.2846075 Bus1=25324-11272184.1.2.3 Phases=3 Conn=wye kV=34.5 kvar=10.0
