! ==========================================================
! VAOS DE SAIDA — barra de MT da SE -> cabeceira do alimentador
! Derivado de CTMT.BARR e CTMT.UNI_TR_AT: a BDGD nao modela o
! arranjo interno da subestacao, so o vinculo logico.
! Cada vao e o disjuntor de saida do alimentador.
! ==========================================================
New Line.VAO_CAP01C8 phases=3 Bus1=cap01b1.1.2.3 Bus2=26842-12603273.1.2.3 Switch=y r1=0.0001 r0=0.0001 x1=0 x0=0 c1=0 c0=0
New Monitor.M_CAP01C8 element=Line.VAO_CAP01C8 terminal=1 mode=1 ppolar=no
New Line.VAO_CAPCP-01 phases=3 Bus1=cap01b1.1.2.3 Bus2=11919-6478241.1.2.3 Switch=y r1=0.0001 r0=0.0001 x1=0 x0=0 c1=0 c0=0
New Monitor.M_CAPCP-01 element=Line.VAO_CAPCP-01 terminal=1 mode=1 ppolar=no
New Line.VAO_CAPCP-02 phases=3 Bus1=cap01b1.1.2.3 Bus2=11920-6491600.1.2.3 Switch=y r1=0.0001 r0=0.0001 x1=0 x0=0 c1=0 c0=0
New Monitor.M_CAPCP-02 element=Line.VAO_CAPCP-02 terminal=1 mode=1 ppolar=no
New Line.VAO_CAPCP-03 phases=3 Bus1=cap01b1.1.2.3 Bus2=11924-6497642.1.2.3 Switch=y r1=0.0001 r0=0.0001 x1=0 x0=0 c1=0 c0=0
New Monitor.M_CAPCP-03 element=Line.VAO_CAPCP-03 terminal=1 mode=1 ppolar=no
New Line.VAO_CAPCP-04 phases=3 Bus1=cap01b1.1.2.3 Bus2=11942-6501201.1.2.3 Switch=y r1=0.0001 r0=0.0001 x1=0 x0=0 c1=0 c0=0
New Monitor.M_CAPCP-04 element=Line.VAO_CAPCP-04 terminal=1 mode=1 ppolar=no
New Line.VAO_CAPCP-05 phases=3 Bus1=cap01b1.1.2.3 Bus2=11945-6523000.1.2.3 Switch=y r1=0.0001 r0=0.0001 x1=0 x0=0 c1=0 c0=0
New Monitor.M_CAPCP-05 element=Line.VAO_CAPCP-05 terminal=1 mode=1 ppolar=no
New Line.VAO_CAPCP-06 phases=3 Bus1=cap01b1.1.2.3 Bus2=11958-6603264.1.2.3 Switch=y r1=0.0001 r0=0.0001 x1=0 x0=0 c1=0 c0=0
New Monitor.M_CAPCP-06 element=Line.VAO_CAPCP-06 terminal=1 mode=1 ppolar=no
New Line.VAO_CAPCP-07 phases=3 Bus1=cap01b1.1.2.3 Bus2=16114-10912368.1.2.3 Switch=y r1=0.0001 r0=0.0001 x1=0 x0=0 c1=0 c0=0
New Monitor.M_CAPCP-07 element=Line.VAO_CAPCP-07 terminal=1 mode=1 ppolar=no
