! GERACAO DISTRIBUIDA — gerada de UGBT_tab e UGMT_tab
! Unidades com potencia nula sao omitidas (gerariam NaN).
! 119 unidades descartadas por potencia nula.
! 169 unidades de BT realocadas para o secundario do transformador (rede secundaria nao modelada).
! 0 unidades descartadas por ponto de conexao ausente da rede.
! irradiance=1 — ver o docstring: 1,0 e meio-dia de ceu claro, nao a ponta de carga.
! 4 barras tiveram a GD limitada a capacidade do transformador (35 kW cortados).
! inversores em pf=1 — ver o docstring de _pv: 0,92 e capacidade exigida pelo PRODIST, nao despacho.
! 0 unidades de MT ligadas pelo PAC da carga (casadas por CEG_GD): o PAC da UGMT nao existe na SSDMT.
New PVSystem.GD_c297c1f39614d4b9d255cf31cdaf870fff5e595a64699fbf0c1e3eec30bf5dc6 phases=3 bus1=25448-12815332.1.2.3 conn=wye kv=13.8000 pf=1 pmpp=17.34 kva=17.34 irradiance=1 temperature=25 %cutin=20 %cutout=20 effcurve=MyEff P-TCurve=MyPvsT Daily=IRRAD_DIA TDaily=TEMP_DIA
New PVSystem.GD_3b9a080256b24935788ca8f070172c08585bdd30ed6d61f79bdbde99862a7d55 phases=3 bus1=25448-7498831.1.2.3 conn=wye kv=13.8000 pf=1 pmpp=11.75 kva=11.75 irradiance=1 temperature=25 %cutin=20 %cutout=20 effcurve=MyEff P-TCurve=MyPvsT Daily=IRRAD_DIA TDaily=TEMP_DIA
New PVSystem.GD_1ed5f5cea631b8716c12a442014de24004d59e02e562fa1abe3c5ec2dd3a0440 phases=3 bus1=16088-12377964.1.2.3 conn=wye kv=13.8000 pf=1 pmpp=271.78 kva=271.78 irradiance=1 temperature=25 %cutin=20 %cutout=20 effcurve=MyEff P-TCurve=MyPvsT Daily=IRRAD_DIA TDaily=TEMP_DIA
New PVSystem.GD_7418c10130aedf82380f7465d92a6cfe4abe928d12af264f988523e22c77dd65 phases=3 bus1=16088-12000686.1.2.3 conn=wye kv=13.8000 pf=1 pmpp=885.00 kva=885.00 irradiance=1 temperature=25 %cutin=20 %cutout=20 effcurve=MyEff P-TCurve=MyPvsT Daily=IRRAD_DIA TDaily=TEMP_DIA
New PVSystem.GD_cb79c34dcf36cf39da25968f8e946eb599f271520a730b2cfe6af8c92130991d phases=3 bus1=16088-12565713.1.2.3 conn=wye kv=13.8000 pf=1 pmpp=11.14 kva=11.14 irradiance=1 temperature=25 %cutin=20 %cutout=20 effcurve=MyEff P-TCurve=MyPvsT Daily=IRRAD_DIA TDaily=TEMP_DIA
New PVSystem.GD_a05f56ef5823151021c7ef24bbbaf219cf8e6799032e0a85cae63323180fc506 phases=3 bus1=16088-12525822.1.2.3 conn=wye kv=13.8000 pf=1 pmpp=6.92 kva=6.92 irradiance=1 temperature=25 %cutin=20 %cutout=20 effcurve=MyEff P-TCurve=MyPvsT Daily=IRRAD_DIA TDaily=TEMP_DIA
New PVSystem.GD_1e422cd6824e03ea1e405f6e317e0c66724e8d2a285c6b181f21a262919f515d phases=3 bus1=16085-12583307.1.2.3 conn=wye kv=13.8000 pf=1 pmpp=45.94 kva=45.94 irradiance=1 temperature=25 %cutin=20 %cutout=20 effcurve=MyEff P-TCurve=MyPvsT Daily=IRRAD_DIA TDaily=TEMP_DIA
New PVSystem.GD_2f5e5699e504927875d99c554ff792e4d70fe0bf5b6fafa0ceb4648b0ba94d5f phases=3 bus1=16085-10863047.1.2.3 conn=wye kv=13.8000 pf=1 pmpp=44.04 kva=44.04 irradiance=1 temperature=25 %cutin=20 %cutout=20 effcurve=MyEff P-TCurve=MyPvsT Daily=IRRAD_DIA TDaily=TEMP_DIA
New PVSystem.GD_060490ed72f71767368f4b7c9422ddcf76aab6188b9acab1eaaa9a9731bcfa4f phases=3 bus1=16085-12821634.1.2.3 conn=wye kv=13.8000 pf=1 pmpp=8.65 kva=8.65 irradiance=1 temperature=25 %cutin=20 %cutout=20 effcurve=MyEff P-TCurve=MyPvsT Daily=IRRAD_DIA TDaily=TEMP_DIA
New PVSystem.GD_fed29484476b48088b6bc224d39836712816d16ec6baf377648c9a05e90db7d5 phases=3 bus1=16085-12415487.1.2.3 conn=wye kv=13.8000 pf=1 pmpp=4.88 kva=4.88 irradiance=1 temperature=25 %cutin=20 %cutout=20 effcurve=MyEff P-TCurve=MyPvsT Daily=IRRAD_DIA TDaily=TEMP_DIA
New PVSystem.GD_a0eb637883eddef80d491aaa208c8f64c641c00be01eb4c66ebab0ff1d785778 phases=3 bus1=25448-12851026.1.2.3 conn=wye kv=13.8000 pf=1 pmpp=12.61 kva=12.61 irradiance=1 temperature=25 %cutin=20 %cutout=20 effcurve=MyEff P-TCurve=MyPvsT Daily=IRRAD_DIA TDaily=TEMP_DIA
New PVSystem.GD_1637fae560689c0eedef31b00f0edac4daf733ab262a509697b85ddf260cfd27 phases=3 bus1=16087-12624128.1.2.3 conn=wye kv=13.8000 pf=1 pmpp=26.15 kva=26.15 irradiance=1 temperature=25 %cutin=20 %cutout=20 effcurve=MyEff P-TCurve=MyPvsT Daily=IRRAD_DIA TDaily=TEMP_DIA
New PVSystem.GD_43573c4ed409a012d1ac3f0082f064ab69d5f8640e4dd7b7ae40cb64925dde7c phases=3 bus1=16085-10863484.1.2.3 conn=wye kv=13.8000 pf=1 pmpp=3.54 kva=3.54 irradiance=1 temperature=25 %cutin=20 %cutout=20 effcurve=MyEff P-TCurve=MyPvsT Daily=IRRAD_DIA TDaily=TEMP_DIA
New PVSystem.GD_4a9a396a0a97a268b712efde45a8af712bd3f137d22b804ac9bff4dcb6e5949d phases=3 bus1=16088-12481909.1.2.3 conn=wye kv=13.8000 pf=1 pmpp=25.60 kva=25.60 irradiance=1 temperature=25 %cutin=20 %cutout=20 effcurve=MyEff P-TCurve=MyPvsT Daily=IRRAD_DIA TDaily=TEMP_DIA
New PVSystem.GD_04402f8d7c56bbcbf3444e91ba0cdaff44f9961699127c1bb0d79d7c95c901fa phases=3 bus1=16088-12402864.1.2.3 conn=wye kv=13.8000 pf=1 pmpp=6.25 kva=6.25 irradiance=1 temperature=25 %cutin=20 %cutout=20 effcurve=MyEff P-TCurve=MyPvsT Daily=IRRAD_DIA TDaily=TEMP_DIA
New PVSystem.GD_d55f96bdd8d6e6b3fc4e0ce95e15c5a1711cfbed4d4f4c8339b2ecadd79a3e89 phases=3 bus1=16088-10868026.1.2.3 conn=wye kv=13.8000 pf=1 pmpp=2.77 kva=2.77 irradiance=1 temperature=25 %cutin=20 %cutout=20 effcurve=MyEff P-TCurve=MyPvsT Daily=IRRAD_DIA TDaily=TEMP_DIA
New PVSystem.GD_f1cea4ce6a3530fa4ad8fd421bae5a26b92cab15df4382db50de0c635fd11cb8 phases=3 bus1=16088-12531718.1.2.3 conn=wye kv=13.8000 pf=1 pmpp=15.63 kva=15.63 irradiance=1 temperature=25 %cutin=20 %cutout=20 effcurve=MyEff P-TCurve=MyPvsT Daily=IRRAD_DIA TDaily=TEMP_DIA
New PVSystem.GD_ed3919fcd4ad3895cae87f779d214889fdb8df613467649ef5efbd89fed3c2f2 phases=3 bus1=16088-12366738.1.2.3 conn=wye kv=13.8000 pf=1 pmpp=17.31 kva=17.31 irradiance=1 temperature=25 %cutin=20 %cutout=20 effcurve=MyEff P-TCurve=MyPvsT Daily=IRRAD_DIA TDaily=TEMP_DIA
New PVSystem.GD_c2316092d065f7bc477167ff4878e2a4385bd25034b9c5253cb123e2461a12f1 phases=3 bus1=16087-10864726.1.2.3 conn=wye kv=13.8000 pf=1 pmpp=14.11 kva=14.11 irradiance=1 temperature=25 %cutin=20 %cutout=20 effcurve=MyEff P-TCurve=MyPvsT Daily=IRRAD_DIA TDaily=TEMP_DIA
New PVSystem.GD_12c7580dbf2a6c8f2e77fb60cec045d53a807dec0a6822ce8764ed27011f542b phases=3 bus1=16085-10863041.1.2.3 conn=wye kv=13.8000 pf=1 pmpp=7.24 kva=7.24 irradiance=1 temperature=25 %cutin=20 %cutout=20 effcurve=MyEff P-TCurve=MyPvsT Daily=IRRAD_DIA TDaily=TEMP_DIA
New PVSystem.GD_4aa3e339c116c55a99f74183a6598fe01da71549c36b5762df45b95592f49c55 phases=3 bus1=16087-10864807.1.2.3 conn=wye kv=13.8000 pf=1 pmpp=19.76 kva=19.76 irradiance=1 temperature=25 %cutin=20 %cutout=20 effcurve=MyEff P-TCurve=MyPvsT Daily=IRRAD_DIA TDaily=TEMP_DIA
New PVSystem.GD_f3bb5527e29e7c4ab929894a9a4b2292c514dfa4ad8846aa35b8c2d57f17c4f5 phases=3 bus1=16085-12423517.1.2.3 conn=wye kv=13.8000 pf=1 pmpp=7.98 kva=7.98 irradiance=1 temperature=25 %cutin=20 %cutout=20 effcurve=MyEff P-TCurve=MyPvsT Daily=IRRAD_DIA TDaily=TEMP_DIA
New PVSystem.GD_b40413fbdf0634034c584c37a2577983a9ed92c90b2056dc21d281c88e7d0da8 phases=3 bus1=16085-10862810.1.2.3 conn=wye kv=13.8000 pf=1 pmpp=13.48 kva=13.48 irradiance=1 temperature=25 %cutin=20 %cutout=20 effcurve=MyEff P-TCurve=MyPvsT Daily=IRRAD_DIA TDaily=TEMP_DIA
New PVSystem.GD_8e5b4291dc2cd1c510fbd0355a4b63602630c933bafc8a45b58d7bbb4748b1e1 phases=3 bus1=16087-10864905.1.2.3 conn=wye kv=13.8000 pf=1 pmpp=38.54 kva=38.54 irradiance=1 temperature=25 %cutin=20 %cutout=20 effcurve=MyEff P-TCurve=MyPvsT Daily=IRRAD_DIA TDaily=TEMP_DIA
New PVSystem.GD_58baf8fab4c16959248147e37fdbbb8d6af5008021801f18b3818e83a1e3f5f8_1 phases=1 bus1=3033028-11829686v.1.4 conn=wye kv=0.1100 pf=1 pmpp=1.20 kva=1.20 irradiance=1 temperature=25 %cutin=20 %cutout=20 effcurve=MyEff P-TCurve=MyPvsT Daily=IRRAD_DIA TDaily=TEMP_DIA
New PVSystem.GD_58baf8fab4c16959248147e37fdbbb8d6af5008021801f18b3818e83a1e3f5f8_2 phases=1 bus1=3033028-11829686v.2.4 conn=wye kv=0.1100 pf=1 pmpp=1.20 kva=1.20 irradiance=1 temperature=25 %cutin=20 %cutout=20 effcurve=MyEff P-TCurve=MyPvsT Daily=IRRAD_DIA TDaily=TEMP_DIA
New PVSystem.GD_6311207529e62a2515d384da778877a1e6266f43ca1fc1e2a122ca09e299167e_1 phases=1 bus1=3101228-12246763v.1.4 conn=wye kv=0.1100 pf=1 pmpp=3.73 kva=3.73 irradiance=1 temperature=25 %cutin=20 %cutout=20 effcurve=MyEff P-TCurve=MyPvsT Daily=IRRAD_DIA TDaily=TEMP_DIA
New PVSystem.GD_6311207529e62a2515d384da778877a1e6266f43ca1fc1e2a122ca09e299167e_2 phases=1 bus1=3101228-12246763v.2.4 conn=wye kv=0.1100 pf=1 pmpp=3.73 kva=3.73 irradiance=1 temperature=25 %cutin=20 %cutout=20 effcurve=MyEff P-TCurve=MyPvsT Daily=IRRAD_DIA TDaily=TEMP_DIA
New PVSystem.GD_33c8e490d914f08e1f24775ba49acbc475c6ae9abbe27ce3dce3a4acc6806d2f_1 phases=1 bus1=2884148-11352989.1.4 conn=wye kv=0.1100 pf=1 pmpp=2.62 kva=2.62 irradiance=1 temperature=25 %cutin=20 %cutout=20 effcurve=MyEff P-TCurve=MyPvsT Daily=IRRAD_DIA TDaily=TEMP_DIA
New PVSystem.GD_33c8e490d914f08e1f24775ba49acbc475c6ae9abbe27ce3dce3a4acc6806d2f_2 phases=1 bus1=2884148-11352989.2.4 conn=wye kv=0.1100 pf=1 pmpp=2.62 kva=2.62 irradiance=1 temperature=25 %cutin=20 %cutout=20 effcurve=MyEff P-TCurve=MyPvsT Daily=IRRAD_DIA TDaily=TEMP_DIA
New PVSystem.GD_d01adf267b298401cab4e2ff55663ed7e1aad0e085bb7cda85d770fecd9212c8_1 phases=1 bus1=2884148-11352989.1.4 conn=wye kv=0.1100 pf=1 pmpp=1.89 kva=1.89 irradiance=1 temperature=25 %cutin=20 %cutout=20 effcurve=MyEff P-TCurve=MyPvsT Daily=IRRAD_DIA TDaily=TEMP_DIA
New PVSystem.GD_d01adf267b298401cab4e2ff55663ed7e1aad0e085bb7cda85d770fecd9212c8_2 phases=1 bus1=2884148-11352989.2.4 conn=wye kv=0.1100 pf=1 pmpp=1.89 kva=1.89 irradiance=1 temperature=25 %cutin=20 %cutout=20 effcurve=MyEff P-TCurve=MyPvsT Daily=IRRAD_DIA TDaily=TEMP_DIA
New PVSystem.GD_97f829579472557c554fa30c807a7d5740e20272d7503578fc1971d0f4c06633_1 phases=1 bus1=2205085-7499456.1.4 conn=wye kv=0.1100 pf=1 pmpp=1.78 kva=1.78 irradiance=1 temperature=25 %cutin=20 %cutout=20 effcurve=MyEff P-TCurve=MyPvsT Daily=IRRAD_DIA TDaily=TEMP_DIA
New PVSystem.GD_97f829579472557c554fa30c807a7d5740e20272d7503578fc1971d0f4c06633_2 phases=1 bus1=2205085-7499456.2.4 conn=wye kv=0.1100 pf=1 pmpp=1.78 kva=1.78 irradiance=1 temperature=25 %cutin=20 %cutout=20 effcurve=MyEff P-TCurve=MyPvsT Daily=IRRAD_DIA TDaily=TEMP_DIA
New PVSystem.GD_678a42ca27d51ec0d43c3c0769184d704ff64841348cfcfb89a017c28f46dc77_1 phases=1 bus1=2205319-7497397v.1.4 conn=wye kv=0.1100 pf=1 pmpp=1.04 kva=1.04 irradiance=1 temperature=25 %cutin=20 %cutout=20 effcurve=MyEff P-TCurve=MyPvsT Daily=IRRAD_DIA TDaily=TEMP_DIA
New PVSystem.GD_678a42ca27d51ec0d43c3c0769184d704ff64841348cfcfb89a017c28f46dc77_2 phases=1 bus1=2205319-7497397v.2.4 conn=wye kv=0.1100 pf=1 pmpp=1.04 kva=1.04 irradiance=1 temperature=25 %cutin=20 %cutout=20 effcurve=MyEff P-TCurve=MyPvsT Daily=IRRAD_DIA TDaily=TEMP_DIA
New PVSystem.GD_fbd54e35b1faa8ee6678fa4ecc9c3b986db2d38fe0abe372118f1cc6a8345ddb_1 phases=1 bus1=2949964-11499693v.1.4 conn=wye kv=0.1100 pf=1 pmpp=1.31 kva=1.31 irradiance=1 temperature=25 %cutin=20 %cutout=20 effcurve=MyEff P-TCurve=MyPvsT Daily=IRRAD_DIA TDaily=TEMP_DIA
New PVSystem.GD_fbd54e35b1faa8ee6678fa4ecc9c3b986db2d38fe0abe372118f1cc6a8345ddb_2 phases=1 bus1=2949964-11499693v.2.4 conn=wye kv=0.1100 pf=1 pmpp=1.31 kva=1.31 irradiance=1 temperature=25 %cutin=20 %cutout=20 effcurve=MyEff P-TCurve=MyPvsT Daily=IRRAD_DIA TDaily=TEMP_DIA
New PVSystem.GD_8b61cbda6b74e88725a02eb67592a75f00316c42aee8f65cbbd6d2db6d6130ce_1 phases=1 bus1=3030424-11906963.1.4 conn=wye kv=0.1100 pf=1 pmpp=1.90 kva=1.90 irradiance=1 temperature=25 %cutin=20 %cutout=20 effcurve=MyEff P-TCurve=MyPvsT Daily=IRRAD_DIA TDaily=TEMP_DIA
New PVSystem.GD_8b61cbda6b74e88725a02eb67592a75f00316c42aee8f65cbbd6d2db6d6130ce_2 phases=1 bus1=3030424-11906963.2.4 conn=wye kv=0.1100 pf=1 pmpp=1.90 kva=1.90 irradiance=1 temperature=25 %cutin=20 %cutout=20 effcurve=MyEff P-TCurve=MyPvsT Daily=IRRAD_DIA TDaily=TEMP_DIA
New PVSystem.GD_b6b9889e02c0b22bdfd51623f71d48e16cac91be856e73ac7c31465330bd627f_1 phases=1 bus1=3030424-11906963.1.4 conn=wye kv=0.1100 pf=1 pmpp=1.82 kva=1.82 irradiance=1 temperature=25 %cutin=20 %cutout=20 effcurve=MyEff P-TCurve=MyPvsT Daily=IRRAD_DIA TDaily=TEMP_DIA
New PVSystem.GD_b6b9889e02c0b22bdfd51623f71d48e16cac91be856e73ac7c31465330bd627f_2 phases=1 bus1=3030424-11906963.2.4 conn=wye kv=0.1100 pf=1 pmpp=1.82 kva=1.82 irradiance=1 temperature=25 %cutin=20 %cutout=20 effcurve=MyEff P-TCurve=MyPvsT Daily=IRRAD_DIA TDaily=TEMP_DIA
New PVSystem.GD_1f631db0250b8a3f8019d09ce3fb35d400fa1f3badafad360ad95ffd7557bbdc_1 phases=1 bus1=2885929-11355809v.1.4 conn=wye kv=0.1100 pf=1 pmpp=0.74 kva=0.74 irradiance=1 temperature=25 %cutin=20 %cutout=20 effcurve=MyEff P-TCurve=MyPvsT Daily=IRRAD_DIA TDaily=TEMP_DIA
New PVSystem.GD_1f631db0250b8a3f8019d09ce3fb35d400fa1f3badafad360ad95ffd7557bbdc_2 phases=1 bus1=2885929-11355809v.2.4 conn=wye kv=0.1100 pf=1 pmpp=0.74 kva=0.74 irradiance=1 temperature=25 %cutin=20 %cutout=20 effcurve=MyEff P-TCurve=MyPvsT Daily=IRRAD_DIA TDaily=TEMP_DIA
New PVSystem.GD_8d60adc403504dc908b8db8a0dab5f85f2c9c3f568e8f7144226374af0cf032c_1 phases=1 bus1=2901604-11380943v.1.4 conn=wye kv=0.1100 pf=1 pmpp=1.50 kva=1.50 irradiance=1 temperature=25 %cutin=20 %cutout=20 effcurve=MyEff P-TCurve=MyPvsT Daily=IRRAD_DIA TDaily=TEMP_DIA
New PVSystem.GD_8d60adc403504dc908b8db8a0dab5f85f2c9c3f568e8f7144226374af0cf032c_2 phases=1 bus1=2901604-11380943v.2.4 conn=wye kv=0.1100 pf=1 pmpp=1.50 kva=1.50 irradiance=1 temperature=25 %cutin=20 %cutout=20 effcurve=MyEff P-TCurve=MyPvsT Daily=IRRAD_DIA TDaily=TEMP_DIA
New PVSystem.GD_aea540f1ef04dc48311040eef9bb54f828f7d458e86ea9103bf2a1ccc884360e_1 phases=1 bus1=2949969-11499712v.1.4 conn=wye kv=0.1100 pf=1 pmpp=1.59 kva=1.59 irradiance=1 temperature=25 %cutin=20 %cutout=20 effcurve=MyEff P-TCurve=MyPvsT Daily=IRRAD_DIA TDaily=TEMP_DIA
New PVSystem.GD_aea540f1ef04dc48311040eef9bb54f828f7d458e86ea9103bf2a1ccc884360e_2 phases=1 bus1=2949969-11499712v.2.4 conn=wye kv=0.1100 pf=1 pmpp=1.59 kva=1.59 irradiance=1 temperature=25 %cutin=20 %cutout=20 effcurve=MyEff P-TCurve=MyPvsT Daily=IRRAD_DIA TDaily=TEMP_DIA
New PVSystem.GD_dd2be6d799346ceda72475c9d0db0c23fded60364f781fdd92f311eba7ee144a_1 phases=1 bus1=2782877-10868277.1.4 conn=wye kv=0.1270 pf=1 pmpp=0.96 kva=0.96 irradiance=1 temperature=25 %cutin=20 %cutout=20 effcurve=MyEff P-TCurve=MyPvsT Daily=IRRAD_DIA TDaily=TEMP_DIA
New PVSystem.GD_dd2be6d799346ceda72475c9d0db0c23fded60364f781fdd92f311eba7ee144a_2 phases=1 bus1=2782877-10868277.2.4 conn=wye kv=0.1270 pf=1 pmpp=0.96 kva=0.96 irradiance=1 temperature=25 %cutin=20 %cutout=20 effcurve=MyEff P-TCurve=MyPvsT Daily=IRRAD_DIA TDaily=TEMP_DIA
New PVSystem.GD_dd2be6d799346ceda72475c9d0db0c23fded60364f781fdd92f311eba7ee144a_3 phases=1 bus1=2782877-10868277.3.4 conn=wye kv=0.1270 pf=1 pmpp=0.96 kva=0.96 irradiance=1 temperature=25 %cutin=20 %cutout=20 effcurve=MyEff P-TCurve=MyPvsT Daily=IRRAD_DIA TDaily=TEMP_DIA
New PVSystem.GD_2ccfa93ab6a868c4098bd6e97d517ca060cf1d163c127cf84a20253f5e90d895_1 phases=1 bus1=2782877-10868277.1.4 conn=wye kv=0.1270 pf=1 pmpp=0.56 kva=0.56 irradiance=1 temperature=25 %cutin=20 %cutout=20 effcurve=MyEff P-TCurve=MyPvsT Daily=IRRAD_DIA TDaily=TEMP_DIA
New PVSystem.GD_2ccfa93ab6a868c4098bd6e97d517ca060cf1d163c127cf84a20253f5e90d895_2 phases=1 bus1=2782877-10868277.2.4 conn=wye kv=0.1270 pf=1 pmpp=0.56 kva=0.56 irradiance=1 temperature=25 %cutin=20 %cutout=20 effcurve=MyEff P-TCurve=MyPvsT Daily=IRRAD_DIA TDaily=TEMP_DIA
New PVSystem.GD_2ccfa93ab6a868c4098bd6e97d517ca060cf1d163c127cf84a20253f5e90d895_3 phases=1 bus1=2782877-10868277.3.4 conn=wye kv=0.1270 pf=1 pmpp=0.56 kva=0.56 irradiance=1 temperature=25 %cutin=20 %cutout=20 effcurve=MyEff P-TCurve=MyPvsT Daily=IRRAD_DIA TDaily=TEMP_DIA
New PVSystem.GD_6327a6851d228eb8a41c597f51df78c08c0272b52968f8a88dd39402445785a4_1 phases=1 bus1=2782711-10864382.1.4 conn=wye kv=0.1270 pf=1 pmpp=1.11 kva=1.11 irradiance=1 temperature=25 %cutin=20 %cutout=20 effcurve=MyEff P-TCurve=MyPvsT Daily=IRRAD_DIA TDaily=TEMP_DIA
New PVSystem.GD_6327a6851d228eb8a41c597f51df78c08c0272b52968f8a88dd39402445785a4_2 phases=1 bus1=2782711-10864382.2.4 conn=wye kv=0.1270 pf=1 pmpp=1.11 kva=1.11 irradiance=1 temperature=25 %cutin=20 %cutout=20 effcurve=MyEff P-TCurve=MyPvsT Daily=IRRAD_DIA TDaily=TEMP_DIA
New PVSystem.GD_6327a6851d228eb8a41c597f51df78c08c0272b52968f8a88dd39402445785a4_3 phases=1 bus1=2782711-10864382.3.4 conn=wye kv=0.1270 pf=1 pmpp=1.11 kva=1.11 irradiance=1 temperature=25 %cutin=20 %cutout=20 effcurve=MyEff P-TCurve=MyPvsT Daily=IRRAD_DIA TDaily=TEMP_DIA
New PVSystem.GD_0d9d55f00494f30cfd8bf81298e5ceaf4e297050305d5111dd068b7faf1f3e1b_1 phases=1 bus1=2782442-10863575.1.4 conn=wye kv=0.1270 pf=1 pmpp=2.03 kva=2.03 irradiance=1 temperature=25 %cutin=20 %cutout=20 effcurve=MyEff P-TCurve=MyPvsT Daily=IRRAD_DIA TDaily=TEMP_DIA
New PVSystem.GD_0d9d55f00494f30cfd8bf81298e5ceaf4e297050305d5111dd068b7faf1f3e1b_2 phases=1 bus1=2782442-10863575.2.4 conn=wye kv=0.1270 pf=1 pmpp=2.03 kva=2.03 irradiance=1 temperature=25 %cutin=20 %cutout=20 effcurve=MyEff P-TCurve=MyPvsT Daily=IRRAD_DIA TDaily=TEMP_DIA
New PVSystem.GD_0d9d55f00494f30cfd8bf81298e5ceaf4e297050305d5111dd068b7faf1f3e1b_3 phases=1 bus1=2782442-10863575.3.4 conn=wye kv=0.1270 pf=1 pmpp=2.03 kva=2.03 irradiance=1 temperature=25 %cutin=20 %cutout=20 effcurve=MyEff P-TCurve=MyPvsT Daily=IRRAD_DIA TDaily=TEMP_DIA
New PVSystem.GD_091c67960794ea3f784aa5568817597e72efdd4e7b7805d4bff436989decae5e_1 phases=1 bus1=2782442-10863575.1.4 conn=wye kv=0.1270 pf=1 pmpp=0.78 kva=0.78 irradiance=1 temperature=25 %cutin=20 %cutout=20 effcurve=MyEff P-TCurve=MyPvsT Daily=IRRAD_DIA TDaily=TEMP_DIA
New PVSystem.GD_091c67960794ea3f784aa5568817597e72efdd4e7b7805d4bff436989decae5e_2 phases=1 bus1=2782442-10863575.2.4 conn=wye kv=0.1270 pf=1 pmpp=0.78 kva=0.78 irradiance=1 temperature=25 %cutin=20 %cutout=20 effcurve=MyEff P-TCurve=MyPvsT Daily=IRRAD_DIA TDaily=TEMP_DIA
New PVSystem.GD_091c67960794ea3f784aa5568817597e72efdd4e7b7805d4bff436989decae5e_3 phases=1 bus1=2782442-10863575.3.4 conn=wye kv=0.1270 pf=1 pmpp=0.78 kva=0.78 irradiance=1 temperature=25 %cutin=20 %cutout=20 effcurve=MyEff P-TCurve=MyPvsT Daily=IRRAD_DIA TDaily=TEMP_DIA
New PVSystem.GD_d6a34435ee11781c44865be000a015c701ee0cca1565c90190ad29872345d1f6_1 phases=1 bus1=2782442-10863575.1.4 conn=wye kv=0.1270 pf=1 pmpp=2.42 kva=2.42 irradiance=1 temperature=25 %cutin=20 %cutout=20 effcurve=MyEff P-TCurve=MyPvsT Daily=IRRAD_DIA TDaily=TEMP_DIA
New PVSystem.GD_d6a34435ee11781c44865be000a015c701ee0cca1565c90190ad29872345d1f6_2 phases=1 bus1=2782442-10863575.2.4 conn=wye kv=0.1270 pf=1 pmpp=2.42 kva=2.42 irradiance=1 temperature=25 %cutin=20 %cutout=20 effcurve=MyEff P-TCurve=MyPvsT Daily=IRRAD_DIA TDaily=TEMP_DIA
New PVSystem.GD_d6a34435ee11781c44865be000a015c701ee0cca1565c90190ad29872345d1f6_3 phases=1 bus1=2782442-10863575.3.4 conn=wye kv=0.1270 pf=1 pmpp=2.42 kva=2.42 irradiance=1 temperature=25 %cutin=20 %cutout=20 effcurve=MyEff P-TCurve=MyPvsT Daily=IRRAD_DIA TDaily=TEMP_DIA
New PVSystem.GD_f1e2daa3371e3dc077d1d1a7541e284dff264f29a5571b5f8600690d280200a2_1 phases=1 bus1=2782442-10863575.1.4 conn=wye kv=0.1270 pf=1 pmpp=1.84 kva=1.84 irradiance=1 temperature=25 %cutin=20 %cutout=20 effcurve=MyEff P-TCurve=MyPvsT Daily=IRRAD_DIA TDaily=TEMP_DIA
New PVSystem.GD_f1e2daa3371e3dc077d1d1a7541e284dff264f29a5571b5f8600690d280200a2_2 phases=1 bus1=2782442-10863575.2.4 conn=wye kv=0.1270 pf=1 pmpp=1.84 kva=1.84 irradiance=1 temperature=25 %cutin=20 %cutout=20 effcurve=MyEff P-TCurve=MyPvsT Daily=IRRAD_DIA TDaily=TEMP_DIA
New PVSystem.GD_f1e2daa3371e3dc077d1d1a7541e284dff264f29a5571b5f8600690d280200a2_3 phases=1 bus1=2782442-10863575.3.4 conn=wye kv=0.1270 pf=1 pmpp=1.84 kva=1.84 irradiance=1 temperature=25 %cutin=20 %cutout=20 effcurve=MyEff P-TCurve=MyPvsT Daily=IRRAD_DIA TDaily=TEMP_DIA
New PVSystem.GD_d99aa6e8a9f63dd7662dd13ef3cd8dd96371d3fbc57e80a6ff900c631fdcbe7d_1 phases=1 bus1=2205068-7497406.1.4 conn=wye kv=0.1270 pf=1 pmpp=0.59 kva=0.59 irradiance=1 temperature=25 %cutin=20 %cutout=20 effcurve=MyEff P-TCurve=MyPvsT Daily=IRRAD_DIA TDaily=TEMP_DIA
New PVSystem.GD_d99aa6e8a9f63dd7662dd13ef3cd8dd96371d3fbc57e80a6ff900c631fdcbe7d_2 phases=1 bus1=2205068-7497406.2.4 conn=wye kv=0.1270 pf=1 pmpp=0.59 kva=0.59 irradiance=1 temperature=25 %cutin=20 %cutout=20 effcurve=MyEff P-TCurve=MyPvsT Daily=IRRAD_DIA TDaily=TEMP_DIA
New PVSystem.GD_d99aa6e8a9f63dd7662dd13ef3cd8dd96371d3fbc57e80a6ff900c631fdcbe7d_3 phases=1 bus1=2205068-7497406.3.4 conn=wye kv=0.1270 pf=1 pmpp=0.59 kva=0.59 irradiance=1 temperature=25 %cutin=20 %cutout=20 effcurve=MyEff P-TCurve=MyPvsT Daily=IRRAD_DIA TDaily=TEMP_DIA
New PVSystem.GD_f2e627d9a24947deeceb7ac942feb95d5b71b1a734f86c3f95aaac08733d0f08_1 phases=1 bus1=2205068-7497406.1.4 conn=wye kv=0.1270 pf=1 pmpp=3.68 kva=3.68 irradiance=1 temperature=25 %cutin=20 %cutout=20 effcurve=MyEff P-TCurve=MyPvsT Daily=IRRAD_DIA TDaily=TEMP_DIA
New PVSystem.GD_f2e627d9a24947deeceb7ac942feb95d5b71b1a734f86c3f95aaac08733d0f08_2 phases=1 bus1=2205068-7497406.2.4 conn=wye kv=0.1270 pf=1 pmpp=3.68 kva=3.68 irradiance=1 temperature=25 %cutin=20 %cutout=20 effcurve=MyEff P-TCurve=MyPvsT Daily=IRRAD_DIA TDaily=TEMP_DIA
New PVSystem.GD_f2e627d9a24947deeceb7ac942feb95d5b71b1a734f86c3f95aaac08733d0f08_3 phases=1 bus1=2205068-7497406.3.4 conn=wye kv=0.1270 pf=1 pmpp=3.68 kva=3.68 irradiance=1 temperature=25 %cutin=20 %cutout=20 effcurve=MyEff P-TCurve=MyPvsT Daily=IRRAD_DIA TDaily=TEMP_DIA
New PVSystem.GD_56c2cf40708a5c85f0c06f600317c41f7fdcf5b2bec75af36a621f5fff291cb0_1 phases=1 bus1=2205068-7497406.1.4 conn=wye kv=0.1270 pf=1 pmpp=2.77 kva=2.77 irradiance=1 temperature=25 %cutin=20 %cutout=20 effcurve=MyEff P-TCurve=MyPvsT Daily=IRRAD_DIA TDaily=TEMP_DIA
New PVSystem.GD_56c2cf40708a5c85f0c06f600317c41f7fdcf5b2bec75af36a621f5fff291cb0_2 phases=1 bus1=2205068-7497406.2.4 conn=wye kv=0.1270 pf=1 pmpp=2.77 kva=2.77 irradiance=1 temperature=25 %cutin=20 %cutout=20 effcurve=MyEff P-TCurve=MyPvsT Daily=IRRAD_DIA TDaily=TEMP_DIA
New PVSystem.GD_56c2cf40708a5c85f0c06f600317c41f7fdcf5b2bec75af36a621f5fff291cb0_3 phases=1 bus1=2205068-7497406.3.4 conn=wye kv=0.1270 pf=1 pmpp=2.77 kva=2.77 irradiance=1 temperature=25 %cutin=20 %cutout=20 effcurve=MyEff P-TCurve=MyPvsT Daily=IRRAD_DIA TDaily=TEMP_DIA
New PVSystem.GD_64ab60e6bcd5824f63b327d1b39b9417db93eee15e98145571644c6162779c64_1 phases=1 bus1=2205068-7497406.1.4 conn=wye kv=0.1270 pf=1 pmpp=5.13 kva=5.13 irradiance=1 temperature=25 %cutin=20 %cutout=20 effcurve=MyEff P-TCurve=MyPvsT Daily=IRRAD_DIA TDaily=TEMP_DIA
New PVSystem.GD_64ab60e6bcd5824f63b327d1b39b9417db93eee15e98145571644c6162779c64_2 phases=1 bus1=2205068-7497406.2.4 conn=wye kv=0.1270 pf=1 pmpp=5.13 kva=5.13 irradiance=1 temperature=25 %cutin=20 %cutout=20 effcurve=MyEff P-TCurve=MyPvsT Daily=IRRAD_DIA TDaily=TEMP_DIA
New PVSystem.GD_64ab60e6bcd5824f63b327d1b39b9417db93eee15e98145571644c6162779c64_3 phases=1 bus1=2205068-7497406.3.4 conn=wye kv=0.1270 pf=1 pmpp=5.13 kva=5.13 irradiance=1 temperature=25 %cutin=20 %cutout=20 effcurve=MyEff P-TCurve=MyPvsT Daily=IRRAD_DIA TDaily=TEMP_DIA
New PVSystem.GD_4796a757dfd007dba87865a7c933c3cf607c5fc7ec989978340913f4dc3849d2_1 phases=1 bus1=3143073-12613393.1.4 conn=wye kv=0.1270 pf=1 pmpp=6.25 kva=6.25 irradiance=1 temperature=25 %cutin=20 %cutout=20 effcurve=MyEff P-TCurve=MyPvsT Daily=IRRAD_DIA TDaily=TEMP_DIA
New PVSystem.GD_4796a757dfd007dba87865a7c933c3cf607c5fc7ec989978340913f4dc3849d2_2 phases=1 bus1=3143073-12613393.2.4 conn=wye kv=0.1270 pf=1 pmpp=6.25 kva=6.25 irradiance=1 temperature=25 %cutin=20 %cutout=20 effcurve=MyEff P-TCurve=MyPvsT Daily=IRRAD_DIA TDaily=TEMP_DIA
New PVSystem.GD_4796a757dfd007dba87865a7c933c3cf607c5fc7ec989978340913f4dc3849d2_3 phases=1 bus1=3143073-12613393.3.4 conn=wye kv=0.1270 pf=1 pmpp=6.25 kva=6.25 irradiance=1 temperature=25 %cutin=20 %cutout=20 effcurve=MyEff P-TCurve=MyPvsT Daily=IRRAD_DIA TDaily=TEMP_DIA
New PVSystem.GD_beeb3963d56d9ebb1fb0941c9b46e45544334da3b82a74308c96a3131ed192e4_1 phases=1 bus1=3143073-12613393.1.4 conn=wye kv=0.1270 pf=1 pmpp=2.21 kva=2.21 irradiance=1 temperature=25 %cutin=20 %cutout=20 effcurve=MyEff P-TCurve=MyPvsT Daily=IRRAD_DIA TDaily=TEMP_DIA
New PVSystem.GD_beeb3963d56d9ebb1fb0941c9b46e45544334da3b82a74308c96a3131ed192e4_2 phases=1 bus1=3143073-12613393.2.4 conn=wye kv=0.1270 pf=1 pmpp=2.21 kva=2.21 irradiance=1 temperature=25 %cutin=20 %cutout=20 effcurve=MyEff P-TCurve=MyPvsT Daily=IRRAD_DIA TDaily=TEMP_DIA
New PVSystem.GD_beeb3963d56d9ebb1fb0941c9b46e45544334da3b82a74308c96a3131ed192e4_3 phases=1 bus1=3143073-12613393.3.4 conn=wye kv=0.1270 pf=1 pmpp=2.21 kva=2.21 irradiance=1 temperature=25 %cutin=20 %cutout=20 effcurve=MyEff P-TCurve=MyPvsT Daily=IRRAD_DIA TDaily=TEMP_DIA
New PVSystem.GD_a069784525050c533712bcc546c37f2bec928c1c9f04ef961b0201e4f517169d_1 phases=1 bus1=3143073-12613393.1.4 conn=wye kv=0.1270 pf=1 pmpp=0.89 kva=0.89 irradiance=1 temperature=25 %cutin=20 %cutout=20 effcurve=MyEff P-TCurve=MyPvsT Daily=IRRAD_DIA TDaily=TEMP_DIA
New PVSystem.GD_a069784525050c533712bcc546c37f2bec928c1c9f04ef961b0201e4f517169d_2 phases=1 bus1=3143073-12613393.2.4 conn=wye kv=0.1270 pf=1 pmpp=0.89 kva=0.89 irradiance=1 temperature=25 %cutin=20 %cutout=20 effcurve=MyEff P-TCurve=MyPvsT Daily=IRRAD_DIA TDaily=TEMP_DIA
New PVSystem.GD_a069784525050c533712bcc546c37f2bec928c1c9f04ef961b0201e4f517169d_3 phases=1 bus1=3143073-12613393.3.4 conn=wye kv=0.1270 pf=1 pmpp=0.89 kva=0.89 irradiance=1 temperature=25 %cutin=20 %cutout=20 effcurve=MyEff P-TCurve=MyPvsT Daily=IRRAD_DIA TDaily=TEMP_DIA
New PVSystem.GD_a004dc6c2d90251d05f9c22d04363e803bf868e248d4867f709a4c87f1ceeec1_1 phases=1 bus1=2782512-10863490.1.4 conn=wye kv=0.1270 pf=1 pmpp=9.74 kva=9.74 irradiance=1 temperature=25 %cutin=20 %cutout=20 effcurve=MyEff P-TCurve=MyPvsT Daily=IRRAD_DIA TDaily=TEMP_DIA
New PVSystem.GD_a004dc6c2d90251d05f9c22d04363e803bf868e248d4867f709a4c87f1ceeec1_2 phases=1 bus1=2782512-10863490.2.4 conn=wye kv=0.1270 pf=1 pmpp=9.74 kva=9.74 irradiance=1 temperature=25 %cutin=20 %cutout=20 effcurve=MyEff P-TCurve=MyPvsT Daily=IRRAD_DIA TDaily=TEMP_DIA
New PVSystem.GD_a004dc6c2d90251d05f9c22d04363e803bf868e248d4867f709a4c87f1ceeec1_3 phases=1 bus1=2782512-10863490.3.4 conn=wye kv=0.1270 pf=1 pmpp=9.74 kva=9.74 irradiance=1 temperature=25 %cutin=20 %cutout=20 effcurve=MyEff P-TCurve=MyPvsT Daily=IRRAD_DIA TDaily=TEMP_DIA
New PVSystem.GD_4a6905a21376e5cbabb651fa5d5787cd9c08a7c24f16776c0de7f651725d0f20_1 phases=1 bus1=2782512-10863490.1.4 conn=wye kv=0.1270 pf=1 pmpp=4.15 kva=4.15 irradiance=1 temperature=25 %cutin=20 %cutout=20 effcurve=MyEff P-TCurve=MyPvsT Daily=IRRAD_DIA TDaily=TEMP_DIA
New PVSystem.GD_4a6905a21376e5cbabb651fa5d5787cd9c08a7c24f16776c0de7f651725d0f20_2 phases=1 bus1=2782512-10863490.2.4 conn=wye kv=0.1270 pf=1 pmpp=4.15 kva=4.15 irradiance=1 temperature=25 %cutin=20 %cutout=20 effcurve=MyEff P-TCurve=MyPvsT Daily=IRRAD_DIA TDaily=TEMP_DIA
New PVSystem.GD_4a6905a21376e5cbabb651fa5d5787cd9c08a7c24f16776c0de7f651725d0f20_3 phases=1 bus1=2782512-10863490.3.4 conn=wye kv=0.1270 pf=1 pmpp=4.15 kva=4.15 irradiance=1 temperature=25 %cutin=20 %cutout=20 effcurve=MyEff P-TCurve=MyPvsT Daily=IRRAD_DIA TDaily=TEMP_DIA
New PVSystem.GD_0066da49449a1c8b9a7e84b6a8b26e106ca92d09f9a45721a3880141d8022b43_1 phases=1 bus1=2782512-10863490.1.4 conn=wye kv=0.1270 pf=1 pmpp=1.02 kva=1.02 irradiance=1 temperature=25 %cutin=20 %cutout=20 effcurve=MyEff P-TCurve=MyPvsT Daily=IRRAD_DIA TDaily=TEMP_DIA
New PVSystem.GD_0066da49449a1c8b9a7e84b6a8b26e106ca92d09f9a45721a3880141d8022b43_2 phases=1 bus1=2782512-10863490.2.4 conn=wye kv=0.1270 pf=1 pmpp=1.02 kva=1.02 irradiance=1 temperature=25 %cutin=20 %cutout=20 effcurve=MyEff P-TCurve=MyPvsT Daily=IRRAD_DIA TDaily=TEMP_DIA
New PVSystem.GD_0066da49449a1c8b9a7e84b6a8b26e106ca92d09f9a45721a3880141d8022b43_3 phases=1 bus1=2782512-10863490.3.4 conn=wye kv=0.1270 pf=1 pmpp=1.02 kva=1.02 irradiance=1 temperature=25 %cutin=20 %cutout=20 effcurve=MyEff P-TCurve=MyPvsT Daily=IRRAD_DIA TDaily=TEMP_DIA
New PVSystem.GD_33c7111c3911ce1b4861af1471033a20e2a903504d8622844d8a02920a2ea874_1 phases=1 bus1=2782512-10863490.1.4 conn=wye kv=0.1270 pf=1 pmpp=1.55 kva=1.55 irradiance=1 temperature=25 %cutin=20 %cutout=20 effcurve=MyEff P-TCurve=MyPvsT Daily=IRRAD_DIA TDaily=TEMP_DIA
New PVSystem.GD_33c7111c3911ce1b4861af1471033a20e2a903504d8622844d8a02920a2ea874_2 phases=1 bus1=2782512-10863490.2.4 conn=wye kv=0.1270 pf=1 pmpp=1.55 kva=1.55 irradiance=1 temperature=25 %cutin=20 %cutout=20 effcurve=MyEff P-TCurve=MyPvsT Daily=IRRAD_DIA TDaily=TEMP_DIA
New PVSystem.GD_33c7111c3911ce1b4861af1471033a20e2a903504d8622844d8a02920a2ea874_3 phases=1 bus1=2782512-10863490.3.4 conn=wye kv=0.1270 pf=1 pmpp=1.55 kva=1.55 irradiance=1 temperature=25 %cutin=20 %cutout=20 effcurve=MyEff P-TCurve=MyPvsT Daily=IRRAD_DIA TDaily=TEMP_DIA
New PVSystem.GD_8fd752697c324868ec116017b61f54cc2e45e7b87172436bb4f2df45cbd89133_1 phases=1 bus1=2782512-10863490.1.4 conn=wye kv=0.1270 pf=1 pmpp=1.07 kva=1.07 irradiance=1 temperature=25 %cutin=20 %cutout=20 effcurve=MyEff P-TCurve=MyPvsT Daily=IRRAD_DIA TDaily=TEMP_DIA
New PVSystem.GD_8fd752697c324868ec116017b61f54cc2e45e7b87172436bb4f2df45cbd89133_2 phases=1 bus1=2782512-10863490.2.4 conn=wye kv=0.1270 pf=1 pmpp=1.07 kva=1.07 irradiance=1 temperature=25 %cutin=20 %cutout=20 effcurve=MyEff P-TCurve=MyPvsT Daily=IRRAD_DIA TDaily=TEMP_DIA
New PVSystem.GD_8fd752697c324868ec116017b61f54cc2e45e7b87172436bb4f2df45cbd89133_3 phases=1 bus1=2782512-10863490.3.4 conn=wye kv=0.1270 pf=1 pmpp=1.07 kva=1.07 irradiance=1 temperature=25 %cutin=20 %cutout=20 effcurve=MyEff P-TCurve=MyPvsT Daily=IRRAD_DIA TDaily=TEMP_DIA
New PVSystem.GD_1c2538c01357bf7fca716ddad26d5f13a1033685f184c6604ec26ea334c77915_1 phases=1 bus1=2782745-10864730.1.4 conn=wye kv=0.1270 pf=1 pmpp=4.16 kva=4.16 irradiance=1 temperature=25 %cutin=20 %cutout=20 effcurve=MyEff P-TCurve=MyPvsT Daily=IRRAD_DIA TDaily=TEMP_DIA
New PVSystem.GD_1c2538c01357bf7fca716ddad26d5f13a1033685f184c6604ec26ea334c77915_2 phases=1 bus1=2782745-10864730.2.4 conn=wye kv=0.1270 pf=1 pmpp=4.16 kva=4.16 irradiance=1 temperature=25 %cutin=20 %cutout=20 effcurve=MyEff P-TCurve=MyPvsT Daily=IRRAD_DIA TDaily=TEMP_DIA
New PVSystem.GD_1c2538c01357bf7fca716ddad26d5f13a1033685f184c6604ec26ea334c77915_3 phases=1 bus1=2782745-10864730.3.4 conn=wye kv=0.1270 pf=1 pmpp=4.16 kva=4.16 irradiance=1 temperature=25 %cutin=20 %cutout=20 effcurve=MyEff P-TCurve=MyPvsT Daily=IRRAD_DIA TDaily=TEMP_DIA
New PVSystem.GD_cdbccbd57410aa930fd4371582f112eb28889af3e1f2a731c44a5c1e98a407c9_1 phases=1 bus1=2782745-10864730.1.4 conn=wye kv=0.1270 pf=1 pmpp=2.20 kva=2.20 irradiance=1 temperature=25 %cutin=20 %cutout=20 effcurve=MyEff P-TCurve=MyPvsT Daily=IRRAD_DIA TDaily=TEMP_DIA
New PVSystem.GD_cdbccbd57410aa930fd4371582f112eb28889af3e1f2a731c44a5c1e98a407c9_2 phases=1 bus1=2782745-10864730.2.4 conn=wye kv=0.1270 pf=1 pmpp=2.20 kva=2.20 irradiance=1 temperature=25 %cutin=20 %cutout=20 effcurve=MyEff P-TCurve=MyPvsT Daily=IRRAD_DIA TDaily=TEMP_DIA
New PVSystem.GD_cdbccbd57410aa930fd4371582f112eb28889af3e1f2a731c44a5c1e98a407c9_3 phases=1 bus1=2782745-10864730.3.4 conn=wye kv=0.1270 pf=1 pmpp=2.20 kva=2.20 irradiance=1 temperature=25 %cutin=20 %cutout=20 effcurve=MyEff P-TCurve=MyPvsT Daily=IRRAD_DIA TDaily=TEMP_DIA
New PVSystem.GD_77109ed1b56cb4f5cb0b28e0307641d42106464a1ce31bf6afbaa84019ba1d16_1 phases=1 bus1=2782745-10864730.1.4 conn=wye kv=0.1270 pf=1 pmpp=0.62 kva=0.62 irradiance=1 temperature=25 %cutin=20 %cutout=20 effcurve=MyEff P-TCurve=MyPvsT Daily=IRRAD_DIA TDaily=TEMP_DIA
New PVSystem.GD_77109ed1b56cb4f5cb0b28e0307641d42106464a1ce31bf6afbaa84019ba1d16_2 phases=1 bus1=2782745-10864730.2.4 conn=wye kv=0.1270 pf=1 pmpp=0.62 kva=0.62 irradiance=1 temperature=25 %cutin=20 %cutout=20 effcurve=MyEff P-TCurve=MyPvsT Daily=IRRAD_DIA TDaily=TEMP_DIA
New PVSystem.GD_77109ed1b56cb4f5cb0b28e0307641d42106464a1ce31bf6afbaa84019ba1d16_3 phases=1 bus1=2782745-10864730.3.4 conn=wye kv=0.1270 pf=1 pmpp=0.62 kva=0.62 irradiance=1 temperature=25 %cutin=20 %cutout=20 effcurve=MyEff P-TCurve=MyPvsT Daily=IRRAD_DIA TDaily=TEMP_DIA
New PVSystem.GD_8354d8ebdc051467071da4cb0183d03d6bb17108261c08e4f4af1e5cd0b64b8e_1 phases=1 bus1=2782503-10862943.1.4 conn=wye kv=0.1270 pf=1 pmpp=1.22 kva=1.22 irradiance=1 temperature=25 %cutin=20 %cutout=20 effcurve=MyEff P-TCurve=MyPvsT Daily=IRRAD_DIA TDaily=TEMP_DIA
New PVSystem.GD_8354d8ebdc051467071da4cb0183d03d6bb17108261c08e4f4af1e5cd0b64b8e_2 phases=1 bus1=2782503-10862943.2.4 conn=wye kv=0.1270 pf=1 pmpp=1.22 kva=1.22 irradiance=1 temperature=25 %cutin=20 %cutout=20 effcurve=MyEff P-TCurve=MyPvsT Daily=IRRAD_DIA TDaily=TEMP_DIA
New PVSystem.GD_8354d8ebdc051467071da4cb0183d03d6bb17108261c08e4f4af1e5cd0b64b8e_3 phases=1 bus1=2782503-10862943.3.4 conn=wye kv=0.1270 pf=1 pmpp=1.22 kva=1.22 irradiance=1 temperature=25 %cutin=20 %cutout=20 effcurve=MyEff P-TCurve=MyPvsT Daily=IRRAD_DIA TDaily=TEMP_DIA
New PVSystem.GD_da67cc3329f8f4318df6f1d3dc603bc092b498614219f9b4e3f04c42056b1a9c_1 phases=1 bus1=3089262-12284477.1.4 conn=wye kv=0.1270 pf=1 pmpp=4.72 kva=4.72 irradiance=1 temperature=25 %cutin=20 %cutout=20 effcurve=MyEff P-TCurve=MyPvsT Daily=IRRAD_DIA TDaily=TEMP_DIA
New PVSystem.GD_da67cc3329f8f4318df6f1d3dc603bc092b498614219f9b4e3f04c42056b1a9c_2 phases=1 bus1=3089262-12284477.2.4 conn=wye kv=0.1270 pf=1 pmpp=4.72 kva=4.72 irradiance=1 temperature=25 %cutin=20 %cutout=20 effcurve=MyEff P-TCurve=MyPvsT Daily=IRRAD_DIA TDaily=TEMP_DIA
New PVSystem.GD_da67cc3329f8f4318df6f1d3dc603bc092b498614219f9b4e3f04c42056b1a9c_3 phases=1 bus1=3089262-12284477.3.4 conn=wye kv=0.1270 pf=1 pmpp=4.72 kva=4.72 irradiance=1 temperature=25 %cutin=20 %cutout=20 effcurve=MyEff P-TCurve=MyPvsT Daily=IRRAD_DIA TDaily=TEMP_DIA
New PVSystem.GD_a257f225591ca48b69186687871ac74b45fcce2037dc7ce2d5e28f6492214e34_1 phases=1 bus1=3089262-12284477.1.4 conn=wye kv=0.1270 pf=1 pmpp=2.73 kva=2.73 irradiance=1 temperature=25 %cutin=20 %cutout=20 effcurve=MyEff P-TCurve=MyPvsT Daily=IRRAD_DIA TDaily=TEMP_DIA
New PVSystem.GD_a257f225591ca48b69186687871ac74b45fcce2037dc7ce2d5e28f6492214e34_2 phases=1 bus1=3089262-12284477.2.4 conn=wye kv=0.1270 pf=1 pmpp=2.73 kva=2.73 irradiance=1 temperature=25 %cutin=20 %cutout=20 effcurve=MyEff P-TCurve=MyPvsT Daily=IRRAD_DIA TDaily=TEMP_DIA
New PVSystem.GD_a257f225591ca48b69186687871ac74b45fcce2037dc7ce2d5e28f6492214e34_3 phases=1 bus1=3089262-12284477.3.4 conn=wye kv=0.1270 pf=1 pmpp=2.73 kva=2.73 irradiance=1 temperature=25 %cutin=20 %cutout=20 effcurve=MyEff P-TCurve=MyPvsT Daily=IRRAD_DIA TDaily=TEMP_DIA
New PVSystem.GD_0e8284cd54b3359a5cf93167da2ba2858a69b5a030af191459abc0a825d7c7e0_1 phases=1 bus1=2782786-10865783.1.4 conn=wye kv=0.1270 pf=1 pmpp=1.55 kva=1.55 irradiance=1 temperature=25 %cutin=20 %cutout=20 effcurve=MyEff P-TCurve=MyPvsT Daily=IRRAD_DIA TDaily=TEMP_DIA
New PVSystem.GD_0e8284cd54b3359a5cf93167da2ba2858a69b5a030af191459abc0a825d7c7e0_2 phases=1 bus1=2782786-10865783.2.4 conn=wye kv=0.1270 pf=1 pmpp=1.55 kva=1.55 irradiance=1 temperature=25 %cutin=20 %cutout=20 effcurve=MyEff P-TCurve=MyPvsT Daily=IRRAD_DIA TDaily=TEMP_DIA
New PVSystem.GD_0e8284cd54b3359a5cf93167da2ba2858a69b5a030af191459abc0a825d7c7e0_3 phases=1 bus1=2782786-10865783.3.4 conn=wye kv=0.1270 pf=1 pmpp=1.55 kva=1.55 irradiance=1 temperature=25 %cutin=20 %cutout=20 effcurve=MyEff P-TCurve=MyPvsT Daily=IRRAD_DIA TDaily=TEMP_DIA
New PVSystem.GD_b37e2d4c7208662c3db7e99eecaf97e373f3fda6bcef3a3e8b706859938318a3_1 phases=1 bus1=2782786-10865783.1.4 conn=wye kv=0.1270 pf=1 pmpp=0.46 kva=0.46 irradiance=1 temperature=25 %cutin=20 %cutout=20 effcurve=MyEff P-TCurve=MyPvsT Daily=IRRAD_DIA TDaily=TEMP_DIA
New PVSystem.GD_b37e2d4c7208662c3db7e99eecaf97e373f3fda6bcef3a3e8b706859938318a3_2 phases=1 bus1=2782786-10865783.2.4 conn=wye kv=0.1270 pf=1 pmpp=0.46 kva=0.46 irradiance=1 temperature=25 %cutin=20 %cutout=20 effcurve=MyEff P-TCurve=MyPvsT Daily=IRRAD_DIA TDaily=TEMP_DIA
New PVSystem.GD_b37e2d4c7208662c3db7e99eecaf97e373f3fda6bcef3a3e8b706859938318a3_3 phases=1 bus1=2782786-10865783.3.4 conn=wye kv=0.1270 pf=1 pmpp=0.46 kva=0.46 irradiance=1 temperature=25 %cutin=20 %cutout=20 effcurve=MyEff P-TCurve=MyPvsT Daily=IRRAD_DIA TDaily=TEMP_DIA
New PVSystem.GD_66970a80e48c9e26f00d8c6ec824f2fdb1ac75aa6b7fe3131f830cc9740d36fc_1 phases=1 bus1=2782786-10865783.1.4 conn=wye kv=0.1270 pf=1 pmpp=1.01 kva=1.01 irradiance=1 temperature=25 %cutin=20 %cutout=20 effcurve=MyEff P-TCurve=MyPvsT Daily=IRRAD_DIA TDaily=TEMP_DIA
New PVSystem.GD_66970a80e48c9e26f00d8c6ec824f2fdb1ac75aa6b7fe3131f830cc9740d36fc_2 phases=1 bus1=2782786-10865783.2.4 conn=wye kv=0.1270 pf=1 pmpp=1.01 kva=1.01 irradiance=1 temperature=25 %cutin=20 %cutout=20 effcurve=MyEff P-TCurve=MyPvsT Daily=IRRAD_DIA TDaily=TEMP_DIA
New PVSystem.GD_66970a80e48c9e26f00d8c6ec824f2fdb1ac75aa6b7fe3131f830cc9740d36fc_3 phases=1 bus1=2782786-10865783.3.4 conn=wye kv=0.1270 pf=1 pmpp=1.01 kva=1.01 irradiance=1 temperature=25 %cutin=20 %cutout=20 effcurve=MyEff P-TCurve=MyPvsT Daily=IRRAD_DIA TDaily=TEMP_DIA
New PVSystem.GD_42dcf3c04771eaa2344d08d28ea9d9a144e6ddf54f274d2b88be57d3adb4e30d_1 phases=1 bus1=2782786-10865783.1.4 conn=wye kv=0.1270 pf=1 pmpp=1.02 kva=1.02 irradiance=1 temperature=25 %cutin=20 %cutout=20 effcurve=MyEff P-TCurve=MyPvsT Daily=IRRAD_DIA TDaily=TEMP_DIA
New PVSystem.GD_42dcf3c04771eaa2344d08d28ea9d9a144e6ddf54f274d2b88be57d3adb4e30d_2 phases=1 bus1=2782786-10865783.2.4 conn=wye kv=0.1270 pf=1 pmpp=1.02 kva=1.02 irradiance=1 temperature=25 %cutin=20 %cutout=20 effcurve=MyEff P-TCurve=MyPvsT Daily=IRRAD_DIA TDaily=TEMP_DIA
New PVSystem.GD_42dcf3c04771eaa2344d08d28ea9d9a144e6ddf54f274d2b88be57d3adb4e30d_3 phases=1 bus1=2782786-10865783.3.4 conn=wye kv=0.1270 pf=1 pmpp=1.02 kva=1.02 irradiance=1 temperature=25 %cutin=20 %cutout=20 effcurve=MyEff P-TCurve=MyPvsT Daily=IRRAD_DIA TDaily=TEMP_DIA
New PVSystem.GD_75f29785f8e6438cb5b570c6fc31f38c079bd9d773b17e9830503d7e9322833d_1 phases=1 bus1=2782746-10864723.1.4 conn=wye kv=0.1270 pf=1 pmpp=1.90 kva=1.90 irradiance=1 temperature=25 %cutin=20 %cutout=20 effcurve=MyEff P-TCurve=MyPvsT Daily=IRRAD_DIA TDaily=TEMP_DIA
New PVSystem.GD_75f29785f8e6438cb5b570c6fc31f38c079bd9d773b17e9830503d7e9322833d_2 phases=1 bus1=2782746-10864723.2.4 conn=wye kv=0.1270 pf=1 pmpp=1.90 kva=1.90 irradiance=1 temperature=25 %cutin=20 %cutout=20 effcurve=MyEff P-TCurve=MyPvsT Daily=IRRAD_DIA TDaily=TEMP_DIA
New PVSystem.GD_75f29785f8e6438cb5b570c6fc31f38c079bd9d773b17e9830503d7e9322833d_3 phases=1 bus1=2782746-10864723.3.4 conn=wye kv=0.1270 pf=1 pmpp=1.90 kva=1.90 irradiance=1 temperature=25 %cutin=20 %cutout=20 effcurve=MyEff P-TCurve=MyPvsT Daily=IRRAD_DIA TDaily=TEMP_DIA
New PVSystem.GD_79abac44180445692ae71719e430277dd636383755627d9f8bc3bf9259db0fac_1 phases=1 bus1=2782746-10864723.1.4 conn=wye kv=0.1270 pf=1 pmpp=0.80 kva=0.80 irradiance=1 temperature=25 %cutin=20 %cutout=20 effcurve=MyEff P-TCurve=MyPvsT Daily=IRRAD_DIA TDaily=TEMP_DIA
New PVSystem.GD_79abac44180445692ae71719e430277dd636383755627d9f8bc3bf9259db0fac_2 phases=1 bus1=2782746-10864723.2.4 conn=wye kv=0.1270 pf=1 pmpp=0.80 kva=0.80 irradiance=1 temperature=25 %cutin=20 %cutout=20 effcurve=MyEff P-TCurve=MyPvsT Daily=IRRAD_DIA TDaily=TEMP_DIA
New PVSystem.GD_79abac44180445692ae71719e430277dd636383755627d9f8bc3bf9259db0fac_3 phases=1 bus1=2782746-10864723.3.4 conn=wye kv=0.1270 pf=1 pmpp=0.80 kva=0.80 irradiance=1 temperature=25 %cutin=20 %cutout=20 effcurve=MyEff P-TCurve=MyPvsT Daily=IRRAD_DIA TDaily=TEMP_DIA
New PVSystem.GD_444fd22b36dd15805f8aae3a5e0ad01a96b8536169f9def4233811415cc0494f_1 phases=1 bus1=2782746-10864723.1.4 conn=wye kv=0.1270 pf=1 pmpp=1.03 kva=1.03 irradiance=1 temperature=25 %cutin=20 %cutout=20 effcurve=MyEff P-TCurve=MyPvsT Daily=IRRAD_DIA TDaily=TEMP_DIA
New PVSystem.GD_444fd22b36dd15805f8aae3a5e0ad01a96b8536169f9def4233811415cc0494f_2 phases=1 bus1=2782746-10864723.2.4 conn=wye kv=0.1270 pf=1 pmpp=1.03 kva=1.03 irradiance=1 temperature=25 %cutin=20 %cutout=20 effcurve=MyEff P-TCurve=MyPvsT Daily=IRRAD_DIA TDaily=TEMP_DIA
New PVSystem.GD_444fd22b36dd15805f8aae3a5e0ad01a96b8536169f9def4233811415cc0494f_3 phases=1 bus1=2782746-10864723.3.4 conn=wye kv=0.1270 pf=1 pmpp=1.03 kva=1.03 irradiance=1 temperature=25 %cutin=20 %cutout=20 effcurve=MyEff P-TCurve=MyPvsT Daily=IRRAD_DIA TDaily=TEMP_DIA
New PVSystem.GD_87b40134521c014492409adc070e7cfef93c822780eacbd40ff24a9f94db06aa_1 phases=1 bus1=2782746-10864723.1.4 conn=wye kv=0.1270 pf=1 pmpp=1.80 kva=1.80 irradiance=1 temperature=25 %cutin=20 %cutout=20 effcurve=MyEff P-TCurve=MyPvsT Daily=IRRAD_DIA TDaily=TEMP_DIA
New PVSystem.GD_87b40134521c014492409adc070e7cfef93c822780eacbd40ff24a9f94db06aa_2 phases=1 bus1=2782746-10864723.2.4 conn=wye kv=0.1270 pf=1 pmpp=1.80 kva=1.80 irradiance=1 temperature=25 %cutin=20 %cutout=20 effcurve=MyEff P-TCurve=MyPvsT Daily=IRRAD_DIA TDaily=TEMP_DIA
New PVSystem.GD_87b40134521c014492409adc070e7cfef93c822780eacbd40ff24a9f94db06aa_3 phases=1 bus1=2782746-10864723.3.4 conn=wye kv=0.1270 pf=1 pmpp=1.80 kva=1.80 irradiance=1 temperature=25 %cutin=20 %cutout=20 effcurve=MyEff P-TCurve=MyPvsT Daily=IRRAD_DIA TDaily=TEMP_DIA
New PVSystem.GD_9bd9521c61ad37d6b5cc7cfd2312a4d68d480a2910eb745392f8167355c1c7b8_1 phases=1 bus1=2782746-10864723.1.4 conn=wye kv=0.1270 pf=1 pmpp=0.59 kva=0.59 irradiance=1 temperature=25 %cutin=20 %cutout=20 effcurve=MyEff P-TCurve=MyPvsT Daily=IRRAD_DIA TDaily=TEMP_DIA
New PVSystem.GD_9bd9521c61ad37d6b5cc7cfd2312a4d68d480a2910eb745392f8167355c1c7b8_2 phases=1 bus1=2782746-10864723.2.4 conn=wye kv=0.1270 pf=1 pmpp=0.59 kva=0.59 irradiance=1 temperature=25 %cutin=20 %cutout=20 effcurve=MyEff P-TCurve=MyPvsT Daily=IRRAD_DIA TDaily=TEMP_DIA
New PVSystem.GD_9bd9521c61ad37d6b5cc7cfd2312a4d68d480a2910eb745392f8167355c1c7b8_3 phases=1 bus1=2782746-10864723.3.4 conn=wye kv=0.1270 pf=1 pmpp=0.59 kva=0.59 irradiance=1 temperature=25 %cutin=20 %cutout=20 effcurve=MyEff P-TCurve=MyPvsT Daily=IRRAD_DIA TDaily=TEMP_DIA
New PVSystem.GD_e6c0825122c05384e27dbd912a91ee6f26d4bd8547d5568a3168ab6135a2ca5c_1 phases=1 bus1=2782746-10864723.1.4 conn=wye kv=0.1270 pf=1 pmpp=2.14 kva=2.14 irradiance=1 temperature=25 %cutin=20 %cutout=20 effcurve=MyEff P-TCurve=MyPvsT Daily=IRRAD_DIA TDaily=TEMP_DIA
New PVSystem.GD_e6c0825122c05384e27dbd912a91ee6f26d4bd8547d5568a3168ab6135a2ca5c_2 phases=1 bus1=2782746-10864723.2.4 conn=wye kv=0.1270 pf=1 pmpp=2.14 kva=2.14 irradiance=1 temperature=25 %cutin=20 %cutout=20 effcurve=MyEff P-TCurve=MyPvsT Daily=IRRAD_DIA TDaily=TEMP_DIA
New PVSystem.GD_e6c0825122c05384e27dbd912a91ee6f26d4bd8547d5568a3168ab6135a2ca5c_3 phases=1 bus1=2782746-10864723.3.4 conn=wye kv=0.1270 pf=1 pmpp=2.14 kva=2.14 irradiance=1 temperature=25 %cutin=20 %cutout=20 effcurve=MyEff P-TCurve=MyPvsT Daily=IRRAD_DIA TDaily=TEMP_DIA
New PVSystem.GD_2d0dc31fe14f372f71703c81055e4c3f45f2814999a1b339e2c552484c7cf60e_1 phases=1 bus1=2783107-10865787.1.4 conn=wye kv=0.1270 pf=1 pmpp=2.06 kva=2.06 irradiance=1 temperature=25 %cutin=20 %cutout=20 effcurve=MyEff P-TCurve=MyPvsT Daily=IRRAD_DIA TDaily=TEMP_DIA
New PVSystem.GD_2d0dc31fe14f372f71703c81055e4c3f45f2814999a1b339e2c552484c7cf60e_2 phases=1 bus1=2783107-10865787.2.4 conn=wye kv=0.1270 pf=1 pmpp=2.06 kva=2.06 irradiance=1 temperature=25 %cutin=20 %cutout=20 effcurve=MyEff P-TCurve=MyPvsT Daily=IRRAD_DIA TDaily=TEMP_DIA
New PVSystem.GD_2d0dc31fe14f372f71703c81055e4c3f45f2814999a1b339e2c552484c7cf60e_3 phases=1 bus1=2783107-10865787.3.4 conn=wye kv=0.1270 pf=1 pmpp=2.06 kva=2.06 irradiance=1 temperature=25 %cutin=20 %cutout=20 effcurve=MyEff P-TCurve=MyPvsT Daily=IRRAD_DIA TDaily=TEMP_DIA
New PVSystem.GD_ee1c90942663a4c60c51beaaaff3790ff57e4cea6dc74c525f4159cafdf58066_1 phases=1 bus1=2783107-10865787.1.4 conn=wye kv=0.1270 pf=1 pmpp=1.27 kva=1.27 irradiance=1 temperature=25 %cutin=20 %cutout=20 effcurve=MyEff P-TCurve=MyPvsT Daily=IRRAD_DIA TDaily=TEMP_DIA
New PVSystem.GD_ee1c90942663a4c60c51beaaaff3790ff57e4cea6dc74c525f4159cafdf58066_2 phases=1 bus1=2783107-10865787.2.4 conn=wye kv=0.1270 pf=1 pmpp=1.27 kva=1.27 irradiance=1 temperature=25 %cutin=20 %cutout=20 effcurve=MyEff P-TCurve=MyPvsT Daily=IRRAD_DIA TDaily=TEMP_DIA
New PVSystem.GD_ee1c90942663a4c60c51beaaaff3790ff57e4cea6dc74c525f4159cafdf58066_3 phases=1 bus1=2783107-10865787.3.4 conn=wye kv=0.1270 pf=1 pmpp=1.27 kva=1.27 irradiance=1 temperature=25 %cutin=20 %cutout=20 effcurve=MyEff P-TCurve=MyPvsT Daily=IRRAD_DIA TDaily=TEMP_DIA
New PVSystem.GD_1340f9e557ca586f8c2b64ec8c5c6afe178138f1c18587107dea3e8aa70d1198_1 phases=1 bus1=2783107-10865787.1.4 conn=wye kv=0.1270 pf=1 pmpp=0.50 kva=0.50 irradiance=1 temperature=25 %cutin=20 %cutout=20 effcurve=MyEff P-TCurve=MyPvsT Daily=IRRAD_DIA TDaily=TEMP_DIA
New PVSystem.GD_1340f9e557ca586f8c2b64ec8c5c6afe178138f1c18587107dea3e8aa70d1198_2 phases=1 bus1=2783107-10865787.2.4 conn=wye kv=0.1270 pf=1 pmpp=0.50 kva=0.50 irradiance=1 temperature=25 %cutin=20 %cutout=20 effcurve=MyEff P-TCurve=MyPvsT Daily=IRRAD_DIA TDaily=TEMP_DIA
New PVSystem.GD_1340f9e557ca586f8c2b64ec8c5c6afe178138f1c18587107dea3e8aa70d1198_3 phases=1 bus1=2783107-10865787.3.4 conn=wye kv=0.1270 pf=1 pmpp=0.50 kva=0.50 irradiance=1 temperature=25 %cutin=20 %cutout=20 effcurve=MyEff P-TCurve=MyPvsT Daily=IRRAD_DIA TDaily=TEMP_DIA
New PVSystem.GD_478bc4dc7e86a8bcc9ac52ff7dd289a4ccebb6a545adc72e1ca3ab28a834dedb_1 phases=1 bus1=2783107-10865787.1.4 conn=wye kv=0.1270 pf=1 pmpp=0.46 kva=0.46 irradiance=1 temperature=25 %cutin=20 %cutout=20 effcurve=MyEff P-TCurve=MyPvsT Daily=IRRAD_DIA TDaily=TEMP_DIA
New PVSystem.GD_478bc4dc7e86a8bcc9ac52ff7dd289a4ccebb6a545adc72e1ca3ab28a834dedb_2 phases=1 bus1=2783107-10865787.2.4 conn=wye kv=0.1270 pf=1 pmpp=0.46 kva=0.46 irradiance=1 temperature=25 %cutin=20 %cutout=20 effcurve=MyEff P-TCurve=MyPvsT Daily=IRRAD_DIA TDaily=TEMP_DIA
New PVSystem.GD_478bc4dc7e86a8bcc9ac52ff7dd289a4ccebb6a545adc72e1ca3ab28a834dedb_3 phases=1 bus1=2783107-10865787.3.4 conn=wye kv=0.1270 pf=1 pmpp=0.46 kva=0.46 irradiance=1 temperature=25 %cutin=20 %cutout=20 effcurve=MyEff P-TCurve=MyPvsT Daily=IRRAD_DIA TDaily=TEMP_DIA
New PVSystem.GD_ad724f2373b6a51e5236c91acc2f15899e8ebdac1ad4b19115e125a6f322d512_1 phases=1 bus1=2783107-10865787.1.4 conn=wye kv=0.1270 pf=1 pmpp=1.00 kva=1.00 irradiance=1 temperature=25 %cutin=20 %cutout=20 effcurve=MyEff P-TCurve=MyPvsT Daily=IRRAD_DIA TDaily=TEMP_DIA
New PVSystem.GD_ad724f2373b6a51e5236c91acc2f15899e8ebdac1ad4b19115e125a6f322d512_2 phases=1 bus1=2783107-10865787.2.4 conn=wye kv=0.1270 pf=1 pmpp=1.00 kva=1.00 irradiance=1 temperature=25 %cutin=20 %cutout=20 effcurve=MyEff P-TCurve=MyPvsT Daily=IRRAD_DIA TDaily=TEMP_DIA
New PVSystem.GD_ad724f2373b6a51e5236c91acc2f15899e8ebdac1ad4b19115e125a6f322d512_3 phases=1 bus1=2783107-10865787.3.4 conn=wye kv=0.1270 pf=1 pmpp=1.00 kva=1.00 irradiance=1 temperature=25 %cutin=20 %cutout=20 effcurve=MyEff P-TCurve=MyPvsT Daily=IRRAD_DIA TDaily=TEMP_DIA
New PVSystem.GD_0af060b449aebaf7eef6d20f65a84367ce6029bb46880cda48d1708bb1403988_1 phases=1 bus1=2782936-12553512.1.4 conn=wye kv=0.1270 pf=1 pmpp=1.72 kva=1.72 irradiance=1 temperature=25 %cutin=20 %cutout=20 effcurve=MyEff P-TCurve=MyPvsT Daily=IRRAD_DIA TDaily=TEMP_DIA
New PVSystem.GD_0af060b449aebaf7eef6d20f65a84367ce6029bb46880cda48d1708bb1403988_2 phases=1 bus1=2782936-12553512.2.4 conn=wye kv=0.1270 pf=1 pmpp=1.72 kva=1.72 irradiance=1 temperature=25 %cutin=20 %cutout=20 effcurve=MyEff P-TCurve=MyPvsT Daily=IRRAD_DIA TDaily=TEMP_DIA
New PVSystem.GD_0af060b449aebaf7eef6d20f65a84367ce6029bb46880cda48d1708bb1403988_3 phases=1 bus1=2782936-12553512.3.4 conn=wye kv=0.1270 pf=1 pmpp=1.72 kva=1.72 irradiance=1 temperature=25 %cutin=20 %cutout=20 effcurve=MyEff P-TCurve=MyPvsT Daily=IRRAD_DIA TDaily=TEMP_DIA
New PVSystem.GD_6f058d9ec4db9d5095f3156a5e2d9a7b302ee93ad9d25031d94f2f5aec2379db_1 phases=1 bus1=2782936-12553512.1.4 conn=wye kv=0.1270 pf=1 pmpp=8.19 kva=8.19 irradiance=1 temperature=25 %cutin=20 %cutout=20 effcurve=MyEff P-TCurve=MyPvsT Daily=IRRAD_DIA TDaily=TEMP_DIA
New PVSystem.GD_6f058d9ec4db9d5095f3156a5e2d9a7b302ee93ad9d25031d94f2f5aec2379db_2 phases=1 bus1=2782936-12553512.2.4 conn=wye kv=0.1270 pf=1 pmpp=8.19 kva=8.19 irradiance=1 temperature=25 %cutin=20 %cutout=20 effcurve=MyEff P-TCurve=MyPvsT Daily=IRRAD_DIA TDaily=TEMP_DIA
New PVSystem.GD_6f058d9ec4db9d5095f3156a5e2d9a7b302ee93ad9d25031d94f2f5aec2379db_3 phases=1 bus1=2782936-12553512.3.4 conn=wye kv=0.1270 pf=1 pmpp=8.19 kva=8.19 irradiance=1 temperature=25 %cutin=20 %cutout=20 effcurve=MyEff P-TCurve=MyPvsT Daily=IRRAD_DIA TDaily=TEMP_DIA
New PVSystem.GD_f367e9ce44b180f7624c7c4ef2ecc72ebd9fc63d20f98654fe6dc71fc80e1130_1 phases=1 bus1=2782936-12553512.1.4 conn=wye kv=0.1270 pf=1 pmpp=0.96 kva=0.96 irradiance=1 temperature=25 %cutin=20 %cutout=20 effcurve=MyEff P-TCurve=MyPvsT Daily=IRRAD_DIA TDaily=TEMP_DIA
New PVSystem.GD_f367e9ce44b180f7624c7c4ef2ecc72ebd9fc63d20f98654fe6dc71fc80e1130_2 phases=1 bus1=2782936-12553512.2.4 conn=wye kv=0.1270 pf=1 pmpp=0.96 kva=0.96 irradiance=1 temperature=25 %cutin=20 %cutout=20 effcurve=MyEff P-TCurve=MyPvsT Daily=IRRAD_DIA TDaily=TEMP_DIA
New PVSystem.GD_f367e9ce44b180f7624c7c4ef2ecc72ebd9fc63d20f98654fe6dc71fc80e1130_3 phases=1 bus1=2782936-12553512.3.4 conn=wye kv=0.1270 pf=1 pmpp=0.96 kva=0.96 irradiance=1 temperature=25 %cutin=20 %cutout=20 effcurve=MyEff P-TCurve=MyPvsT Daily=IRRAD_DIA TDaily=TEMP_DIA
New PVSystem.GD_414c8ad1e7a6f5b380795324838756f90f27d65211558c967f08937b9e7c0ca2_1 phases=1 bus1=2782936-12553512.1.4 conn=wye kv=0.1270 pf=1 pmpp=0.88 kva=0.88 irradiance=1 temperature=25 %cutin=20 %cutout=20 effcurve=MyEff P-TCurve=MyPvsT Daily=IRRAD_DIA TDaily=TEMP_DIA
New PVSystem.GD_414c8ad1e7a6f5b380795324838756f90f27d65211558c967f08937b9e7c0ca2_2 phases=1 bus1=2782936-12553512.2.4 conn=wye kv=0.1270 pf=1 pmpp=0.88 kva=0.88 irradiance=1 temperature=25 %cutin=20 %cutout=20 effcurve=MyEff P-TCurve=MyPvsT Daily=IRRAD_DIA TDaily=TEMP_DIA
New PVSystem.GD_414c8ad1e7a6f5b380795324838756f90f27d65211558c967f08937b9e7c0ca2_3 phases=1 bus1=2782936-12553512.3.4 conn=wye kv=0.1270 pf=1 pmpp=0.88 kva=0.88 irradiance=1 temperature=25 %cutin=20 %cutout=20 effcurve=MyEff P-TCurve=MyPvsT Daily=IRRAD_DIA TDaily=TEMP_DIA
New PVSystem.GD_e780edeba77c0a5d2aae86cee8fcaf5d757b13125eb348d374138ac6343c0775_1 phases=1 bus1=3111759-12423518.1.4 conn=wye kv=0.1270 pf=1 pmpp=2.87 kva=2.87 irradiance=1 temperature=25 %cutin=20 %cutout=20 effcurve=MyEff P-TCurve=MyPvsT Daily=IRRAD_DIA TDaily=TEMP_DIA
New PVSystem.GD_e780edeba77c0a5d2aae86cee8fcaf5d757b13125eb348d374138ac6343c0775_2 phases=1 bus1=3111759-12423518.2.4 conn=wye kv=0.1270 pf=1 pmpp=2.87 kva=2.87 irradiance=1 temperature=25 %cutin=20 %cutout=20 effcurve=MyEff P-TCurve=MyPvsT Daily=IRRAD_DIA TDaily=TEMP_DIA
New PVSystem.GD_e780edeba77c0a5d2aae86cee8fcaf5d757b13125eb348d374138ac6343c0775_3 phases=1 bus1=3111759-12423518.3.4 conn=wye kv=0.1270 pf=1 pmpp=2.87 kva=2.87 irradiance=1 temperature=25 %cutin=20 %cutout=20 effcurve=MyEff P-TCurve=MyPvsT Daily=IRRAD_DIA TDaily=TEMP_DIA
New PVSystem.GD_90aa0b2b53d9475b35bb3a2143a0b9b83c8353cda0adc42180c4521cdfc92536_1 phases=1 bus1=2782765-10864910.1.4 conn=wye kv=0.1100 pf=1 pmpp=2.96 kva=2.96 irradiance=1 temperature=25 %cutin=20 %cutout=20 effcurve=MyEff P-TCurve=MyPvsT Daily=IRRAD_DIA TDaily=TEMP_DIA
New PVSystem.GD_90aa0b2b53d9475b35bb3a2143a0b9b83c8353cda0adc42180c4521cdfc92536_2 phases=1 bus1=2782765-10864910.2.4 conn=wye kv=0.1100 pf=1 pmpp=2.96 kva=2.96 irradiance=1 temperature=25 %cutin=20 %cutout=20 effcurve=MyEff P-TCurve=MyPvsT Daily=IRRAD_DIA TDaily=TEMP_DIA
New PVSystem.GD_2b90ec1a4100099ebed141f2656a5c759077322cb544ddaa5f38b40e90b45217_1 phases=1 bus1=2782893-10865385.1.4 conn=wye kv=0.1270 pf=1 pmpp=2.41 kva=2.41 irradiance=1 temperature=25 %cutin=20 %cutout=20 effcurve=MyEff P-TCurve=MyPvsT Daily=IRRAD_DIA TDaily=TEMP_DIA
New PVSystem.GD_2b90ec1a4100099ebed141f2656a5c759077322cb544ddaa5f38b40e90b45217_2 phases=1 bus1=2782893-10865385.2.4 conn=wye kv=0.1270 pf=1 pmpp=2.41 kva=2.41 irradiance=1 temperature=25 %cutin=20 %cutout=20 effcurve=MyEff P-TCurve=MyPvsT Daily=IRRAD_DIA TDaily=TEMP_DIA
New PVSystem.GD_2b90ec1a4100099ebed141f2656a5c759077322cb544ddaa5f38b40e90b45217_3 phases=1 bus1=2782893-10865385.3.4 conn=wye kv=0.1270 pf=1 pmpp=2.41 kva=2.41 irradiance=1 temperature=25 %cutin=20 %cutout=20 effcurve=MyEff P-TCurve=MyPvsT Daily=IRRAD_DIA TDaily=TEMP_DIA
New PVSystem.GD_ab958b4de497ab21fe5769c1d6cc8ecf89f3903eadc14293ea50e109bec7adc7_1 phases=1 bus1=2782893-10865385.1.4 conn=wye kv=0.1270 pf=1 pmpp=7.34 kva=7.34 irradiance=1 temperature=25 %cutin=20 %cutout=20 effcurve=MyEff P-TCurve=MyPvsT Daily=IRRAD_DIA TDaily=TEMP_DIA
New PVSystem.GD_ab958b4de497ab21fe5769c1d6cc8ecf89f3903eadc14293ea50e109bec7adc7_2 phases=1 bus1=2782893-10865385.2.4 conn=wye kv=0.1270 pf=1 pmpp=7.34 kva=7.34 irradiance=1 temperature=25 %cutin=20 %cutout=20 effcurve=MyEff P-TCurve=MyPvsT Daily=IRRAD_DIA TDaily=TEMP_DIA
New PVSystem.GD_ab958b4de497ab21fe5769c1d6cc8ecf89f3903eadc14293ea50e109bec7adc7_3 phases=1 bus1=2782893-10865385.3.4 conn=wye kv=0.1270 pf=1 pmpp=7.34 kva=7.34 irradiance=1 temperature=25 %cutin=20 %cutout=20 effcurve=MyEff P-TCurve=MyPvsT Daily=IRRAD_DIA TDaily=TEMP_DIA
New PVSystem.GD_f46c7580a019ae69c3fae0833d57c8a5a2ea8d6b65d63d02fd75dc4c3a48227e_1 phases=1 bus1=2782893-10865385.1.4 conn=wye kv=0.1270 pf=1 pmpp=0.71 kva=0.71 irradiance=1 temperature=25 %cutin=20 %cutout=20 effcurve=MyEff P-TCurve=MyPvsT Daily=IRRAD_DIA TDaily=TEMP_DIA
New PVSystem.GD_f46c7580a019ae69c3fae0833d57c8a5a2ea8d6b65d63d02fd75dc4c3a48227e_2 phases=1 bus1=2782893-10865385.2.4 conn=wye kv=0.1270 pf=1 pmpp=0.71 kva=0.71 irradiance=1 temperature=25 %cutin=20 %cutout=20 effcurve=MyEff P-TCurve=MyPvsT Daily=IRRAD_DIA TDaily=TEMP_DIA
New PVSystem.GD_f46c7580a019ae69c3fae0833d57c8a5a2ea8d6b65d63d02fd75dc4c3a48227e_3 phases=1 bus1=2782893-10865385.3.4 conn=wye kv=0.1270 pf=1 pmpp=0.71 kva=0.71 irradiance=1 temperature=25 %cutin=20 %cutout=20 effcurve=MyEff P-TCurve=MyPvsT Daily=IRRAD_DIA TDaily=TEMP_DIA
New PVSystem.GD_c35bd434da854f4fe26e736b6dc0806d0aef6801deda0a04e76c9b51f5600e26_1 phases=1 bus1=2782705-10864550.1.4 conn=wye kv=0.1270 pf=1 pmpp=8.92 kva=8.92 irradiance=1 temperature=25 %cutin=20 %cutout=20 effcurve=MyEff P-TCurve=MyPvsT Daily=IRRAD_DIA TDaily=TEMP_DIA
New PVSystem.GD_c35bd434da854f4fe26e736b6dc0806d0aef6801deda0a04e76c9b51f5600e26_2 phases=1 bus1=2782705-10864550.2.4 conn=wye kv=0.1270 pf=1 pmpp=8.92 kva=8.92 irradiance=1 temperature=25 %cutin=20 %cutout=20 effcurve=MyEff P-TCurve=MyPvsT Daily=IRRAD_DIA TDaily=TEMP_DIA
New PVSystem.GD_c35bd434da854f4fe26e736b6dc0806d0aef6801deda0a04e76c9b51f5600e26_3 phases=1 bus1=2782705-10864550.3.4 conn=wye kv=0.1270 pf=1 pmpp=8.92 kva=8.92 irradiance=1 temperature=25 %cutin=20 %cutout=20 effcurve=MyEff P-TCurve=MyPvsT Daily=IRRAD_DIA TDaily=TEMP_DIA
New PVSystem.GD_ff0405acd15ff52c1862d4360d1fe486be26abe72d1c471e830516112db0586d_1 phases=1 bus1=2782679-10864338.1.4 conn=wye kv=0.1270 pf=1 pmpp=2.63 kva=2.63 irradiance=1 temperature=25 %cutin=20 %cutout=20 effcurve=MyEff P-TCurve=MyPvsT Daily=IRRAD_DIA TDaily=TEMP_DIA
New PVSystem.GD_ff0405acd15ff52c1862d4360d1fe486be26abe72d1c471e830516112db0586d_2 phases=1 bus1=2782679-10864338.2.4 conn=wye kv=0.1270 pf=1 pmpp=2.63 kva=2.63 irradiance=1 temperature=25 %cutin=20 %cutout=20 effcurve=MyEff P-TCurve=MyPvsT Daily=IRRAD_DIA TDaily=TEMP_DIA
New PVSystem.GD_ff0405acd15ff52c1862d4360d1fe486be26abe72d1c471e830516112db0586d_3 phases=1 bus1=2782679-10864338.3.4 conn=wye kv=0.1270 pf=1 pmpp=2.63 kva=2.63 irradiance=1 temperature=25 %cutin=20 %cutout=20 effcurve=MyEff P-TCurve=MyPvsT Daily=IRRAD_DIA TDaily=TEMP_DIA
New PVSystem.GD_eb8428c740b4b691ac2ea5c9cda237cfe178bcc136ba0d164a45e573cfe0e4c1_1 phases=1 bus1=2782679-10864338.1.4 conn=wye kv=0.1270 pf=1 pmpp=1.09 kva=1.09 irradiance=1 temperature=25 %cutin=20 %cutout=20 effcurve=MyEff P-TCurve=MyPvsT Daily=IRRAD_DIA TDaily=TEMP_DIA
New PVSystem.GD_eb8428c740b4b691ac2ea5c9cda237cfe178bcc136ba0d164a45e573cfe0e4c1_2 phases=1 bus1=2782679-10864338.2.4 conn=wye kv=0.1270 pf=1 pmpp=1.09 kva=1.09 irradiance=1 temperature=25 %cutin=20 %cutout=20 effcurve=MyEff P-TCurve=MyPvsT Daily=IRRAD_DIA TDaily=TEMP_DIA
New PVSystem.GD_eb8428c740b4b691ac2ea5c9cda237cfe178bcc136ba0d164a45e573cfe0e4c1_3 phases=1 bus1=2782679-10864338.3.4 conn=wye kv=0.1270 pf=1 pmpp=1.09 kva=1.09 irradiance=1 temperature=25 %cutin=20 %cutout=20 effcurve=MyEff P-TCurve=MyPvsT Daily=IRRAD_DIA TDaily=TEMP_DIA
New PVSystem.GD_408777947f17424dcd947e9140bfc91c667d200b472286aa30e2a56c6d079987_1 phases=1 bus1=2782679-10864338.1.4 conn=wye kv=0.1270 pf=1 pmpp=1.00 kva=1.00 irradiance=1 temperature=25 %cutin=20 %cutout=20 effcurve=MyEff P-TCurve=MyPvsT Daily=IRRAD_DIA TDaily=TEMP_DIA
New PVSystem.GD_408777947f17424dcd947e9140bfc91c667d200b472286aa30e2a56c6d079987_2 phases=1 bus1=2782679-10864338.2.4 conn=wye kv=0.1270 pf=1 pmpp=1.00 kva=1.00 irradiance=1 temperature=25 %cutin=20 %cutout=20 effcurve=MyEff P-TCurve=MyPvsT Daily=IRRAD_DIA TDaily=TEMP_DIA
New PVSystem.GD_408777947f17424dcd947e9140bfc91c667d200b472286aa30e2a56c6d079987_3 phases=1 bus1=2782679-10864338.3.4 conn=wye kv=0.1270 pf=1 pmpp=1.00 kva=1.00 irradiance=1 temperature=25 %cutin=20 %cutout=20 effcurve=MyEff P-TCurve=MyPvsT Daily=IRRAD_DIA TDaily=TEMP_DIA
New PVSystem.GD_a3c47888aba0abe7f1ef3d71eb00c65858d2e2fe0bb5df86e9d0a1b10eee0d12_1 phases=1 bus1=2782679-10864338.1.4 conn=wye kv=0.1270 pf=1 pmpp=1.07 kva=1.07 irradiance=1 temperature=25 %cutin=20 %cutout=20 effcurve=MyEff P-TCurve=MyPvsT Daily=IRRAD_DIA TDaily=TEMP_DIA
New PVSystem.GD_a3c47888aba0abe7f1ef3d71eb00c65858d2e2fe0bb5df86e9d0a1b10eee0d12_2 phases=1 bus1=2782679-10864338.2.4 conn=wye kv=0.1270 pf=1 pmpp=1.07 kva=1.07 irradiance=1 temperature=25 %cutin=20 %cutout=20 effcurve=MyEff P-TCurve=MyPvsT Daily=IRRAD_DIA TDaily=TEMP_DIA
New PVSystem.GD_a3c47888aba0abe7f1ef3d71eb00c65858d2e2fe0bb5df86e9d0a1b10eee0d12_3 phases=1 bus1=2782679-10864338.3.4 conn=wye kv=0.1270 pf=1 pmpp=1.07 kva=1.07 irradiance=1 temperature=25 %cutin=20 %cutout=20 effcurve=MyEff P-TCurve=MyPvsT Daily=IRRAD_DIA TDaily=TEMP_DIA
New PVSystem.GD_8644106da0c504a8cffa47b4fa1196503dc92be1840f1a1f03728d42fd925a06_1 phases=1 bus1=2782444-10862855.1.4 conn=wye kv=0.1270 pf=1 pmpp=0.94 kva=0.94 irradiance=1 temperature=25 %cutin=20 %cutout=20 effcurve=MyEff P-TCurve=MyPvsT Daily=IRRAD_DIA TDaily=TEMP_DIA
New PVSystem.GD_8644106da0c504a8cffa47b4fa1196503dc92be1840f1a1f03728d42fd925a06_2 phases=1 bus1=2782444-10862855.2.4 conn=wye kv=0.1270 pf=1 pmpp=0.94 kva=0.94 irradiance=1 temperature=25 %cutin=20 %cutout=20 effcurve=MyEff P-TCurve=MyPvsT Daily=IRRAD_DIA TDaily=TEMP_DIA
New PVSystem.GD_8644106da0c504a8cffa47b4fa1196503dc92be1840f1a1f03728d42fd925a06_3 phases=1 bus1=2782444-10862855.3.4 conn=wye kv=0.1270 pf=1 pmpp=0.94 kva=0.94 irradiance=1 temperature=25 %cutin=20 %cutout=20 effcurve=MyEff P-TCurve=MyPvsT Daily=IRRAD_DIA TDaily=TEMP_DIA
New PVSystem.GD_e3cc8d81a17cc0c376e5f64f82f53cd5f1d5c1a6eff92a24f8d19088f890be01_1 phases=1 bus1=2782444-10862855.1.4 conn=wye kv=0.1270 pf=1 pmpp=2.20 kva=2.20 irradiance=1 temperature=25 %cutin=20 %cutout=20 effcurve=MyEff P-TCurve=MyPvsT Daily=IRRAD_DIA TDaily=TEMP_DIA
New PVSystem.GD_e3cc8d81a17cc0c376e5f64f82f53cd5f1d5c1a6eff92a24f8d19088f890be01_2 phases=1 bus1=2782444-10862855.2.4 conn=wye kv=0.1270 pf=1 pmpp=2.20 kva=2.20 irradiance=1 temperature=25 %cutin=20 %cutout=20 effcurve=MyEff P-TCurve=MyPvsT Daily=IRRAD_DIA TDaily=TEMP_DIA
New PVSystem.GD_e3cc8d81a17cc0c376e5f64f82f53cd5f1d5c1a6eff92a24f8d19088f890be01_3 phases=1 bus1=2782444-10862855.3.4 conn=wye kv=0.1270 pf=1 pmpp=2.20 kva=2.20 irradiance=1 temperature=25 %cutin=20 %cutout=20 effcurve=MyEff P-TCurve=MyPvsT Daily=IRRAD_DIA TDaily=TEMP_DIA
New PVSystem.GD_3949c899c4667990828473ea4229846837086ce8d5da86977f6412ed2531585d_1 phases=1 bus1=3135711-12570833.1.4 conn=wye kv=0.1270 pf=1 pmpp=3.70 kva=3.70 irradiance=1 temperature=25 %cutin=20 %cutout=20 effcurve=MyEff P-TCurve=MyPvsT Daily=IRRAD_DIA TDaily=TEMP_DIA
New PVSystem.GD_3949c899c4667990828473ea4229846837086ce8d5da86977f6412ed2531585d_2 phases=1 bus1=3135711-12570833.2.4 conn=wye kv=0.1270 pf=1 pmpp=3.70 kva=3.70 irradiance=1 temperature=25 %cutin=20 %cutout=20 effcurve=MyEff P-TCurve=MyPvsT Daily=IRRAD_DIA TDaily=TEMP_DIA
New PVSystem.GD_3949c899c4667990828473ea4229846837086ce8d5da86977f6412ed2531585d_3 phases=1 bus1=3135711-12570833.3.4 conn=wye kv=0.1270 pf=1 pmpp=3.70 kva=3.70 irradiance=1 temperature=25 %cutin=20 %cutout=20 effcurve=MyEff P-TCurve=MyPvsT Daily=IRRAD_DIA TDaily=TEMP_DIA
New PVSystem.GD_15e9368e5edabd70aabb66376c8583fe1a78d87c9570a9432a9b17ac45e47c06_1 phases=1 bus1=3135711-12570833.1.4 conn=wye kv=0.1270 pf=1 pmpp=1.64 kva=1.64 irradiance=1 temperature=25 %cutin=20 %cutout=20 effcurve=MyEff P-TCurve=MyPvsT Daily=IRRAD_DIA TDaily=TEMP_DIA
New PVSystem.GD_15e9368e5edabd70aabb66376c8583fe1a78d87c9570a9432a9b17ac45e47c06_2 phases=1 bus1=3135711-12570833.2.4 conn=wye kv=0.1270 pf=1 pmpp=1.64 kva=1.64 irradiance=1 temperature=25 %cutin=20 %cutout=20 effcurve=MyEff P-TCurve=MyPvsT Daily=IRRAD_DIA TDaily=TEMP_DIA
New PVSystem.GD_15e9368e5edabd70aabb66376c8583fe1a78d87c9570a9432a9b17ac45e47c06_3 phases=1 bus1=3135711-12570833.3.4 conn=wye kv=0.1270 pf=1 pmpp=1.64 kva=1.64 irradiance=1 temperature=25 %cutin=20 %cutout=20 effcurve=MyEff P-TCurve=MyPvsT Daily=IRRAD_DIA TDaily=TEMP_DIA
New PVSystem.GD_3b2d88cf3dde6183a793d4042bcdeb5a13c5f5df80c6c4026c610e182f7f4aa3_1 phases=1 bus1=2782465-10863488.1.4 conn=wye kv=0.1270 pf=1 pmpp=0.88 kva=0.88 irradiance=1 temperature=25 %cutin=20 %cutout=20 effcurve=MyEff P-TCurve=MyPvsT Daily=IRRAD_DIA TDaily=TEMP_DIA
New PVSystem.GD_3b2d88cf3dde6183a793d4042bcdeb5a13c5f5df80c6c4026c610e182f7f4aa3_2 phases=1 bus1=2782465-10863488.2.4 conn=wye kv=0.1270 pf=1 pmpp=0.88 kva=0.88 irradiance=1 temperature=25 %cutin=20 %cutout=20 effcurve=MyEff P-TCurve=MyPvsT Daily=IRRAD_DIA TDaily=TEMP_DIA
New PVSystem.GD_3b2d88cf3dde6183a793d4042bcdeb5a13c5f5df80c6c4026c610e182f7f4aa3_3 phases=1 bus1=2782465-10863488.3.4 conn=wye kv=0.1270 pf=1 pmpp=0.88 kva=0.88 irradiance=1 temperature=25 %cutin=20 %cutout=20 effcurve=MyEff P-TCurve=MyPvsT Daily=IRRAD_DIA TDaily=TEMP_DIA
New PVSystem.GD_418961c7399ae807cd84fd6598454138cc651808d0f5c31cc7517cd4f3fbdc8e_1 phases=1 bus1=2782465-10863488.1.4 conn=wye kv=0.1270 pf=1 pmpp=1.41 kva=1.41 irradiance=1 temperature=25 %cutin=20 %cutout=20 effcurve=MyEff P-TCurve=MyPvsT Daily=IRRAD_DIA TDaily=TEMP_DIA
New PVSystem.GD_418961c7399ae807cd84fd6598454138cc651808d0f5c31cc7517cd4f3fbdc8e_2 phases=1 bus1=2782465-10863488.2.4 conn=wye kv=0.1270 pf=1 pmpp=1.41 kva=1.41 irradiance=1 temperature=25 %cutin=20 %cutout=20 effcurve=MyEff P-TCurve=MyPvsT Daily=IRRAD_DIA TDaily=TEMP_DIA
New PVSystem.GD_418961c7399ae807cd84fd6598454138cc651808d0f5c31cc7517cd4f3fbdc8e_3 phases=1 bus1=2782465-10863488.3.4 conn=wye kv=0.1270 pf=1 pmpp=1.41 kva=1.41 irradiance=1 temperature=25 %cutin=20 %cutout=20 effcurve=MyEff P-TCurve=MyPvsT Daily=IRRAD_DIA TDaily=TEMP_DIA
New PVSystem.GD_9cd5e0460789124804a7c044e33e886b1710be79eeb8fa3154acc9e41b9f0c14_1 phases=1 bus1=2782465-10863488.1.4 conn=wye kv=0.1270 pf=1 pmpp=3.39 kva=3.39 irradiance=1 temperature=25 %cutin=20 %cutout=20 effcurve=MyEff P-TCurve=MyPvsT Daily=IRRAD_DIA TDaily=TEMP_DIA
New PVSystem.GD_9cd5e0460789124804a7c044e33e886b1710be79eeb8fa3154acc9e41b9f0c14_2 phases=1 bus1=2782465-10863488.2.4 conn=wye kv=0.1270 pf=1 pmpp=3.39 kva=3.39 irradiance=1 temperature=25 %cutin=20 %cutout=20 effcurve=MyEff P-TCurve=MyPvsT Daily=IRRAD_DIA TDaily=TEMP_DIA
New PVSystem.GD_9cd5e0460789124804a7c044e33e886b1710be79eeb8fa3154acc9e41b9f0c14_3 phases=1 bus1=2782465-10863488.3.4 conn=wye kv=0.1270 pf=1 pmpp=3.39 kva=3.39 irradiance=1 temperature=25 %cutin=20 %cutout=20 effcurve=MyEff P-TCurve=MyPvsT Daily=IRRAD_DIA TDaily=TEMP_DIA
New PVSystem.GD_d0337ffa8a777efb52e2607a2b1b059e855af1cecb78495d5711d6057cc23d32_1 phases=1 bus1=2782465-10863488.1.4 conn=wye kv=0.1270 pf=1 pmpp=1.65 kva=1.65 irradiance=1 temperature=25 %cutin=20 %cutout=20 effcurve=MyEff P-TCurve=MyPvsT Daily=IRRAD_DIA TDaily=TEMP_DIA
New PVSystem.GD_d0337ffa8a777efb52e2607a2b1b059e855af1cecb78495d5711d6057cc23d32_2 phases=1 bus1=2782465-10863488.2.4 conn=wye kv=0.1270 pf=1 pmpp=1.65 kva=1.65 irradiance=1 temperature=25 %cutin=20 %cutout=20 effcurve=MyEff P-TCurve=MyPvsT Daily=IRRAD_DIA TDaily=TEMP_DIA
New PVSystem.GD_d0337ffa8a777efb52e2607a2b1b059e855af1cecb78495d5711d6057cc23d32_3 phases=1 bus1=2782465-10863488.3.4 conn=wye kv=0.1270 pf=1 pmpp=1.65 kva=1.65 irradiance=1 temperature=25 %cutin=20 %cutout=20 effcurve=MyEff P-TCurve=MyPvsT Daily=IRRAD_DIA TDaily=TEMP_DIA
New PVSystem.GD_4fc4fa219dd946a71b1db65d7c887e47a36b11528dd02b07ecb6149dc01165ee_1 phases=1 bus1=2782497-10863339v.1.4 conn=wye kv=0.1270 pf=1 pmpp=4.48 kva=4.48 irradiance=1 temperature=25 %cutin=20 %cutout=20 effcurve=MyEff P-TCurve=MyPvsT Daily=IRRAD_DIA TDaily=TEMP_DIA
New PVSystem.GD_4fc4fa219dd946a71b1db65d7c887e47a36b11528dd02b07ecb6149dc01165ee_2 phases=1 bus1=2782497-10863339v.2.4 conn=wye kv=0.1270 pf=1 pmpp=4.48 kva=4.48 irradiance=1 temperature=25 %cutin=20 %cutout=20 effcurve=MyEff P-TCurve=MyPvsT Daily=IRRAD_DIA TDaily=TEMP_DIA
New PVSystem.GD_4fc4fa219dd946a71b1db65d7c887e47a36b11528dd02b07ecb6149dc01165ee_3 phases=1 bus1=2782497-10863339v.3.4 conn=wye kv=0.1270 pf=1 pmpp=4.48 kva=4.48 irradiance=1 temperature=25 %cutin=20 %cutout=20 effcurve=MyEff P-TCurve=MyPvsT Daily=IRRAD_DIA TDaily=TEMP_DIA
New PVSystem.GD_361a90ed44eb378ab71a06464e2371fa72474ffa3798164a0dcded232d3897b0_1 phases=1 bus1=3092577-10865018.1.4 conn=wye kv=0.1270 pf=1 pmpp=0.60 kva=0.60 irradiance=1 temperature=25 %cutin=20 %cutout=20 effcurve=MyEff P-TCurve=MyPvsT Daily=IRRAD_DIA TDaily=TEMP_DIA
New PVSystem.GD_361a90ed44eb378ab71a06464e2371fa72474ffa3798164a0dcded232d3897b0_2 phases=1 bus1=3092577-10865018.2.4 conn=wye kv=0.1270 pf=1 pmpp=0.60 kva=0.60 irradiance=1 temperature=25 %cutin=20 %cutout=20 effcurve=MyEff P-TCurve=MyPvsT Daily=IRRAD_DIA TDaily=TEMP_DIA
New PVSystem.GD_361a90ed44eb378ab71a06464e2371fa72474ffa3798164a0dcded232d3897b0_3 phases=1 bus1=3092577-10865018.3.4 conn=wye kv=0.1270 pf=1 pmpp=0.60 kva=0.60 irradiance=1 temperature=25 %cutin=20 %cutout=20 effcurve=MyEff P-TCurve=MyPvsT Daily=IRRAD_DIA TDaily=TEMP_DIA
New PVSystem.GD_2bb2728c0acfc67540226fc3195fa03cd4dff32665f99d76f3354b3e8a761179_1 phases=1 bus1=3092577-10865018.1.4 conn=wye kv=0.1270 pf=1 pmpp=6.88 kva=6.88 irradiance=1 temperature=25 %cutin=20 %cutout=20 effcurve=MyEff P-TCurve=MyPvsT Daily=IRRAD_DIA TDaily=TEMP_DIA
New PVSystem.GD_2bb2728c0acfc67540226fc3195fa03cd4dff32665f99d76f3354b3e8a761179_2 phases=1 bus1=3092577-10865018.2.4 conn=wye kv=0.1270 pf=1 pmpp=6.88 kva=6.88 irradiance=1 temperature=25 %cutin=20 %cutout=20 effcurve=MyEff P-TCurve=MyPvsT Daily=IRRAD_DIA TDaily=TEMP_DIA
New PVSystem.GD_2bb2728c0acfc67540226fc3195fa03cd4dff32665f99d76f3354b3e8a761179_3 phases=1 bus1=3092577-10865018.3.4 conn=wye kv=0.1270 pf=1 pmpp=6.88 kva=6.88 irradiance=1 temperature=25 %cutin=20 %cutout=20 effcurve=MyEff P-TCurve=MyPvsT Daily=IRRAD_DIA TDaily=TEMP_DIA
New PVSystem.GD_5073984d39a6b2c13aaefc6bee4afac6f83e0059914d27615a89ad87a8004892_1 phases=1 bus1=3092577-10865018.1.4 conn=wye kv=0.1270 pf=1 pmpp=1.10 kva=1.10 irradiance=1 temperature=25 %cutin=20 %cutout=20 effcurve=MyEff P-TCurve=MyPvsT Daily=IRRAD_DIA TDaily=TEMP_DIA
New PVSystem.GD_5073984d39a6b2c13aaefc6bee4afac6f83e0059914d27615a89ad87a8004892_2 phases=1 bus1=3092577-10865018.2.4 conn=wye kv=0.1270 pf=1 pmpp=1.10 kva=1.10 irradiance=1 temperature=25 %cutin=20 %cutout=20 effcurve=MyEff P-TCurve=MyPvsT Daily=IRRAD_DIA TDaily=TEMP_DIA
New PVSystem.GD_5073984d39a6b2c13aaefc6bee4afac6f83e0059914d27615a89ad87a8004892_3 phases=1 bus1=3092577-10865018.3.4 conn=wye kv=0.1270 pf=1 pmpp=1.10 kva=1.10 irradiance=1 temperature=25 %cutin=20 %cutout=20 effcurve=MyEff P-TCurve=MyPvsT Daily=IRRAD_DIA TDaily=TEMP_DIA
New PVSystem.GD_415f578c6a59338a155eb137f719d1320531a72f2d4fd0f46703fd201f064921_1 phases=1 bus1=3092577-10865018.1.4 conn=wye kv=0.1270 pf=1 pmpp=0.58 kva=0.58 irradiance=1 temperature=25 %cutin=20 %cutout=20 effcurve=MyEff P-TCurve=MyPvsT Daily=IRRAD_DIA TDaily=TEMP_DIA
New PVSystem.GD_415f578c6a59338a155eb137f719d1320531a72f2d4fd0f46703fd201f064921_2 phases=1 bus1=3092577-10865018.2.4 conn=wye kv=0.1270 pf=1 pmpp=0.58 kva=0.58 irradiance=1 temperature=25 %cutin=20 %cutout=20 effcurve=MyEff P-TCurve=MyPvsT Daily=IRRAD_DIA TDaily=TEMP_DIA
New PVSystem.GD_415f578c6a59338a155eb137f719d1320531a72f2d4fd0f46703fd201f064921_3 phases=1 bus1=3092577-10865018.3.4 conn=wye kv=0.1270 pf=1 pmpp=0.58 kva=0.58 irradiance=1 temperature=25 %cutin=20 %cutout=20 effcurve=MyEff P-TCurve=MyPvsT Daily=IRRAD_DIA TDaily=TEMP_DIA
New PVSystem.GD_75a03a71de7b9ac3a12940ac551de59fad0c7bef079fb622e982cb5db572db3b_1 phases=1 bus1=2782665-10864379.1.4 conn=wye kv=0.1270 pf=1 pmpp=8.32 kva=8.32 irradiance=1 temperature=25 %cutin=20 %cutout=20 effcurve=MyEff P-TCurve=MyPvsT Daily=IRRAD_DIA TDaily=TEMP_DIA
New PVSystem.GD_75a03a71de7b9ac3a12940ac551de59fad0c7bef079fb622e982cb5db572db3b_2 phases=1 bus1=2782665-10864379.2.4 conn=wye kv=0.1270 pf=1 pmpp=8.32 kva=8.32 irradiance=1 temperature=25 %cutin=20 %cutout=20 effcurve=MyEff P-TCurve=MyPvsT Daily=IRRAD_DIA TDaily=TEMP_DIA
New PVSystem.GD_75a03a71de7b9ac3a12940ac551de59fad0c7bef079fb622e982cb5db572db3b_3 phases=1 bus1=2782665-10864379.3.4 conn=wye kv=0.1270 pf=1 pmpp=8.32 kva=8.32 irradiance=1 temperature=25 %cutin=20 %cutout=20 effcurve=MyEff P-TCurve=MyPvsT Daily=IRRAD_DIA TDaily=TEMP_DIA
New PVSystem.GD_03405a58c67551eee6259bf8b7e8eb9eba40b96d6fb58f1ae3917ee6532c0909_1 phases=1 bus1=2782665-10864379.1.4 conn=wye kv=0.1270 pf=1 pmpp=4.32 kva=4.32 irradiance=1 temperature=25 %cutin=20 %cutout=20 effcurve=MyEff P-TCurve=MyPvsT Daily=IRRAD_DIA TDaily=TEMP_DIA
New PVSystem.GD_03405a58c67551eee6259bf8b7e8eb9eba40b96d6fb58f1ae3917ee6532c0909_2 phases=1 bus1=2782665-10864379.2.4 conn=wye kv=0.1270 pf=1 pmpp=4.32 kva=4.32 irradiance=1 temperature=25 %cutin=20 %cutout=20 effcurve=MyEff P-TCurve=MyPvsT Daily=IRRAD_DIA TDaily=TEMP_DIA
New PVSystem.GD_03405a58c67551eee6259bf8b7e8eb9eba40b96d6fb58f1ae3917ee6532c0909_3 phases=1 bus1=2782665-10864379.3.4 conn=wye kv=0.1270 pf=1 pmpp=4.32 kva=4.32 irradiance=1 temperature=25 %cutin=20 %cutout=20 effcurve=MyEff P-TCurve=MyPvsT Daily=IRRAD_DIA TDaily=TEMP_DIA
New PVSystem.GD_db492b17b38b6b49a1301fc73dd47a215d7b66380d4e001e018d94c17f1adeac_1 phases=1 bus1=2782521-10863545.1.4 conn=wye kv=0.1270 pf=1 pmpp=0.46 kva=0.46 irradiance=1 temperature=25 %cutin=20 %cutout=20 effcurve=MyEff P-TCurve=MyPvsT Daily=IRRAD_DIA TDaily=TEMP_DIA
New PVSystem.GD_db492b17b38b6b49a1301fc73dd47a215d7b66380d4e001e018d94c17f1adeac_2 phases=1 bus1=2782521-10863545.2.4 conn=wye kv=0.1270 pf=1 pmpp=0.46 kva=0.46 irradiance=1 temperature=25 %cutin=20 %cutout=20 effcurve=MyEff P-TCurve=MyPvsT Daily=IRRAD_DIA TDaily=TEMP_DIA
New PVSystem.GD_db492b17b38b6b49a1301fc73dd47a215d7b66380d4e001e018d94c17f1adeac_3 phases=1 bus1=2782521-10863545.3.4 conn=wye kv=0.1270 pf=1 pmpp=0.46 kva=0.46 irradiance=1 temperature=25 %cutin=20 %cutout=20 effcurve=MyEff P-TCurve=MyPvsT Daily=IRRAD_DIA TDaily=TEMP_DIA
New PVSystem.GD_ed9692eec3fb5862713b1af4d9e5545e04b7f0ae0da2626305a39e587450028a_1 phases=1 bus1=2782521-10863545.1.4 conn=wye kv=0.1270 pf=1 pmpp=13.43 kva=13.43 irradiance=1 temperature=25 %cutin=20 %cutout=20 effcurve=MyEff P-TCurve=MyPvsT Daily=IRRAD_DIA TDaily=TEMP_DIA
New PVSystem.GD_ed9692eec3fb5862713b1af4d9e5545e04b7f0ae0da2626305a39e587450028a_2 phases=1 bus1=2782521-10863545.2.4 conn=wye kv=0.1270 pf=1 pmpp=13.43 kva=13.43 irradiance=1 temperature=25 %cutin=20 %cutout=20 effcurve=MyEff P-TCurve=MyPvsT Daily=IRRAD_DIA TDaily=TEMP_DIA
New PVSystem.GD_ed9692eec3fb5862713b1af4d9e5545e04b7f0ae0da2626305a39e587450028a_3 phases=1 bus1=2782521-10863545.3.4 conn=wye kv=0.1270 pf=1 pmpp=13.43 kva=13.43 irradiance=1 temperature=25 %cutin=20 %cutout=20 effcurve=MyEff P-TCurve=MyPvsT Daily=IRRAD_DIA TDaily=TEMP_DIA
New PVSystem.GD_5c99bdd8a57203144220f3ea73139a5d9b7da98012c488cac0e5fdcbdf392640_1 phases=1 bus1=3129112-12531718v.1.4 conn=wye kv=0.1270 pf=1 pmpp=9.09 kva=9.09 irradiance=1 temperature=25 %cutin=20 %cutout=20 effcurve=MyEff P-TCurve=MyPvsT Daily=IRRAD_DIA TDaily=TEMP_DIA
New PVSystem.GD_5c99bdd8a57203144220f3ea73139a5d9b7da98012c488cac0e5fdcbdf392640_2 phases=1 bus1=3129112-12531718v.2.4 conn=wye kv=0.1270 pf=1 pmpp=9.09 kva=9.09 irradiance=1 temperature=25 %cutin=20 %cutout=20 effcurve=MyEff P-TCurve=MyPvsT Daily=IRRAD_DIA TDaily=TEMP_DIA
New PVSystem.GD_5c99bdd8a57203144220f3ea73139a5d9b7da98012c488cac0e5fdcbdf392640_3 phases=1 bus1=3129112-12531718v.3.4 conn=wye kv=0.1270 pf=1 pmpp=9.09 kva=9.09 irradiance=1 temperature=25 %cutin=20 %cutout=20 effcurve=MyEff P-TCurve=MyPvsT Daily=IRRAD_DIA TDaily=TEMP_DIA
New PVSystem.GD_9ae644ba6f1631e18999937000efc00c36b49d286a2b63a43c44f280577dc5a5_1 phases=1 bus1=2782818-10865043.1.4 conn=wye kv=0.1270 pf=1 pmpp=1.01 kva=1.01 irradiance=1 temperature=25 %cutin=20 %cutout=20 effcurve=MyEff P-TCurve=MyPvsT Daily=IRRAD_DIA TDaily=TEMP_DIA
New PVSystem.GD_9ae644ba6f1631e18999937000efc00c36b49d286a2b63a43c44f280577dc5a5_2 phases=1 bus1=2782818-10865043.2.4 conn=wye kv=0.1270 pf=1 pmpp=1.01 kva=1.01 irradiance=1 temperature=25 %cutin=20 %cutout=20 effcurve=MyEff P-TCurve=MyPvsT Daily=IRRAD_DIA TDaily=TEMP_DIA
New PVSystem.GD_9ae644ba6f1631e18999937000efc00c36b49d286a2b63a43c44f280577dc5a5_3 phases=1 bus1=2782818-10865043.3.4 conn=wye kv=0.1270 pf=1 pmpp=1.01 kva=1.01 irradiance=1 temperature=25 %cutin=20 %cutout=20 effcurve=MyEff P-TCurve=MyPvsT Daily=IRRAD_DIA TDaily=TEMP_DIA
New PVSystem.GD_1e121ddd0c9c5c507cc541658164bda098fe9607e99a278949d437af43697d7f_1 phases=1 bus1=2782818-10865043.1.4 conn=wye kv=0.1270 pf=1 pmpp=1.30 kva=1.30 irradiance=1 temperature=25 %cutin=20 %cutout=20 effcurve=MyEff P-TCurve=MyPvsT Daily=IRRAD_DIA TDaily=TEMP_DIA
New PVSystem.GD_1e121ddd0c9c5c507cc541658164bda098fe9607e99a278949d437af43697d7f_2 phases=1 bus1=2782818-10865043.2.4 conn=wye kv=0.1270 pf=1 pmpp=1.30 kva=1.30 irradiance=1 temperature=25 %cutin=20 %cutout=20 effcurve=MyEff P-TCurve=MyPvsT Daily=IRRAD_DIA TDaily=TEMP_DIA
New PVSystem.GD_1e121ddd0c9c5c507cc541658164bda098fe9607e99a278949d437af43697d7f_3 phases=1 bus1=2782818-10865043.3.4 conn=wye kv=0.1270 pf=1 pmpp=1.30 kva=1.30 irradiance=1 temperature=25 %cutin=20 %cutout=20 effcurve=MyEff P-TCurve=MyPvsT Daily=IRRAD_DIA TDaily=TEMP_DIA
New PVSystem.GD_6496cda50a3b8ca9c9b9e303f753a61f4809b730ea1d8bdf922cf1356f7f70b0_1 phases=1 bus1=2782818-10865043.1.4 conn=wye kv=0.1270 pf=1 pmpp=0.58 kva=0.58 irradiance=1 temperature=25 %cutin=20 %cutout=20 effcurve=MyEff P-TCurve=MyPvsT Daily=IRRAD_DIA TDaily=TEMP_DIA
New PVSystem.GD_6496cda50a3b8ca9c9b9e303f753a61f4809b730ea1d8bdf922cf1356f7f70b0_2 phases=1 bus1=2782818-10865043.2.4 conn=wye kv=0.1270 pf=1 pmpp=0.58 kva=0.58 irradiance=1 temperature=25 %cutin=20 %cutout=20 effcurve=MyEff P-TCurve=MyPvsT Daily=IRRAD_DIA TDaily=TEMP_DIA
New PVSystem.GD_6496cda50a3b8ca9c9b9e303f753a61f4809b730ea1d8bdf922cf1356f7f70b0_3 phases=1 bus1=2782818-10865043.3.4 conn=wye kv=0.1270 pf=1 pmpp=0.58 kva=0.58 irradiance=1 temperature=25 %cutin=20 %cutout=20 effcurve=MyEff P-TCurve=MyPvsT Daily=IRRAD_DIA TDaily=TEMP_DIA
New PVSystem.GD_30f866a59759edff20814b3de33b094856aa5f73b61b5e13f735ae6b21f881a0_1 phases=1 bus1=2782818-10865043.1.4 conn=wye kv=0.1270 pf=1 pmpp=0.80 kva=0.80 irradiance=1 temperature=25 %cutin=20 %cutout=20 effcurve=MyEff P-TCurve=MyPvsT Daily=IRRAD_DIA TDaily=TEMP_DIA
New PVSystem.GD_30f866a59759edff20814b3de33b094856aa5f73b61b5e13f735ae6b21f881a0_2 phases=1 bus1=2782818-10865043.2.4 conn=wye kv=0.1270 pf=1 pmpp=0.80 kva=0.80 irradiance=1 temperature=25 %cutin=20 %cutout=20 effcurve=MyEff P-TCurve=MyPvsT Daily=IRRAD_DIA TDaily=TEMP_DIA
New PVSystem.GD_30f866a59759edff20814b3de33b094856aa5f73b61b5e13f735ae6b21f881a0_3 phases=1 bus1=2782818-10865043.3.4 conn=wye kv=0.1270 pf=1 pmpp=0.80 kva=0.80 irradiance=1 temperature=25 %cutin=20 %cutout=20 effcurve=MyEff P-TCurve=MyPvsT Daily=IRRAD_DIA TDaily=TEMP_DIA
New PVSystem.GD_a57fe7f4d9aa19134bf52cbc4434a8eb6a5692c633b97a716c36c945558dcd78_1 phases=1 bus1=2782818-10865043.1.4 conn=wye kv=0.1270 pf=1 pmpp=1.32 kva=1.32 irradiance=1 temperature=25 %cutin=20 %cutout=20 effcurve=MyEff P-TCurve=MyPvsT Daily=IRRAD_DIA TDaily=TEMP_DIA
New PVSystem.GD_a57fe7f4d9aa19134bf52cbc4434a8eb6a5692c633b97a716c36c945558dcd78_2 phases=1 bus1=2782818-10865043.2.4 conn=wye kv=0.1270 pf=1 pmpp=1.32 kva=1.32 irradiance=1 temperature=25 %cutin=20 %cutout=20 effcurve=MyEff P-TCurve=MyPvsT Daily=IRRAD_DIA TDaily=TEMP_DIA
New PVSystem.GD_a57fe7f4d9aa19134bf52cbc4434a8eb6a5692c633b97a716c36c945558dcd78_3 phases=1 bus1=2782818-10865043.3.4 conn=wye kv=0.1270 pf=1 pmpp=1.32 kva=1.32 irradiance=1 temperature=25 %cutin=20 %cutout=20 effcurve=MyEff P-TCurve=MyPvsT Daily=IRRAD_DIA TDaily=TEMP_DIA
New PVSystem.GD_03573f1c3a02768465d1626e373fec43fcc03149a05962d9e22d2180becb73ae_1 phases=1 bus1=2782818-10865043.1.4 conn=wye kv=0.1270 pf=1 pmpp=1.76 kva=1.76 irradiance=1 temperature=25 %cutin=20 %cutout=20 effcurve=MyEff P-TCurve=MyPvsT Daily=IRRAD_DIA TDaily=TEMP_DIA
New PVSystem.GD_03573f1c3a02768465d1626e373fec43fcc03149a05962d9e22d2180becb73ae_2 phases=1 bus1=2782818-10865043.2.4 conn=wye kv=0.1270 pf=1 pmpp=1.76 kva=1.76 irradiance=1 temperature=25 %cutin=20 %cutout=20 effcurve=MyEff P-TCurve=MyPvsT Daily=IRRAD_DIA TDaily=TEMP_DIA
New PVSystem.GD_03573f1c3a02768465d1626e373fec43fcc03149a05962d9e22d2180becb73ae_3 phases=1 bus1=2782818-10865043.3.4 conn=wye kv=0.1270 pf=1 pmpp=1.76 kva=1.76 irradiance=1 temperature=25 %cutin=20 %cutout=20 effcurve=MyEff P-TCurve=MyPvsT Daily=IRRAD_DIA TDaily=TEMP_DIA
New PVSystem.GD_964f2f93381f330c189f5346f5caec7b8d239b09d402234e62e702cf75ec3153_1 phases=1 bus1=2783160-10867819.1.4 conn=wye kv=0.1100 pf=1 pmpp=8.07 kva=8.07 irradiance=1 temperature=25 %cutin=20 %cutout=20 effcurve=MyEff P-TCurve=MyPvsT Daily=IRRAD_DIA TDaily=TEMP_DIA
New PVSystem.GD_964f2f93381f330c189f5346f5caec7b8d239b09d402234e62e702cf75ec3153_2 phases=1 bus1=2783160-10867819.2.4 conn=wye kv=0.1100 pf=1 pmpp=8.07 kva=8.07 irradiance=1 temperature=25 %cutin=20 %cutout=20 effcurve=MyEff P-TCurve=MyPvsT Daily=IRRAD_DIA TDaily=TEMP_DIA
New PVSystem.GD_0cdaf351f1487edd348849e08934d558e0009bf35c2ab1763bdb474034c51d1a_1 phases=1 bus1=2783160-10867819.1.4 conn=wye kv=0.1100 pf=1 pmpp=0.73 kva=0.73 irradiance=1 temperature=25 %cutin=20 %cutout=20 effcurve=MyEff P-TCurve=MyPvsT Daily=IRRAD_DIA TDaily=TEMP_DIA
New PVSystem.GD_0cdaf351f1487edd348849e08934d558e0009bf35c2ab1763bdb474034c51d1a_2 phases=1 bus1=2783160-10867819.2.4 conn=wye kv=0.1100 pf=1 pmpp=0.73 kva=0.73 irradiance=1 temperature=25 %cutin=20 %cutout=20 effcurve=MyEff P-TCurve=MyPvsT Daily=IRRAD_DIA TDaily=TEMP_DIA
New PVSystem.GD_00686bf9bad699a15e63ab32f572e48f753eb04826521895e1353af64ce7b7a3_1 phases=1 bus1=2783160-10867819.1.4 conn=wye kv=0.1100 pf=1 pmpp=3.70 kva=3.70 irradiance=1 temperature=25 %cutin=20 %cutout=20 effcurve=MyEff P-TCurve=MyPvsT Daily=IRRAD_DIA TDaily=TEMP_DIA
New PVSystem.GD_00686bf9bad699a15e63ab32f572e48f753eb04826521895e1353af64ce7b7a3_2 phases=1 bus1=2783160-10867819.2.4 conn=wye kv=0.1100 pf=1 pmpp=3.70 kva=3.70 irradiance=1 temperature=25 %cutin=20 %cutout=20 effcurve=MyEff P-TCurve=MyPvsT Daily=IRRAD_DIA TDaily=TEMP_DIA
New PVSystem.GD_d35362e245a522f8ac0169a72f42a96e6980aff81ff73f3be2678da0d3126f9a_1 phases=1 bus1=2912032-11394803.1.4 conn=wye kv=0.1270 pf=1 pmpp=2.13 kva=2.13 irradiance=1 temperature=25 %cutin=20 %cutout=20 effcurve=MyEff P-TCurve=MyPvsT Daily=IRRAD_DIA TDaily=TEMP_DIA
New PVSystem.GD_d35362e245a522f8ac0169a72f42a96e6980aff81ff73f3be2678da0d3126f9a_2 phases=1 bus1=2912032-11394803.2.4 conn=wye kv=0.1270 pf=1 pmpp=2.13 kva=2.13 irradiance=1 temperature=25 %cutin=20 %cutout=20 effcurve=MyEff P-TCurve=MyPvsT Daily=IRRAD_DIA TDaily=TEMP_DIA
New PVSystem.GD_d35362e245a522f8ac0169a72f42a96e6980aff81ff73f3be2678da0d3126f9a_3 phases=1 bus1=2912032-11394803.3.4 conn=wye kv=0.1270 pf=1 pmpp=2.13 kva=2.13 irradiance=1 temperature=25 %cutin=20 %cutout=20 effcurve=MyEff P-TCurve=MyPvsT Daily=IRRAD_DIA TDaily=TEMP_DIA
New PVSystem.GD_c5561ac04e580e48a054174129f73242cb970ca5f8d7dfbbd0439da86b665923_1 phases=1 bus1=2912032-11394803.1.4 conn=wye kv=0.1270 pf=1 pmpp=1.82 kva=1.82 irradiance=1 temperature=25 %cutin=20 %cutout=20 effcurve=MyEff P-TCurve=MyPvsT Daily=IRRAD_DIA TDaily=TEMP_DIA
New PVSystem.GD_c5561ac04e580e48a054174129f73242cb970ca5f8d7dfbbd0439da86b665923_2 phases=1 bus1=2912032-11394803.2.4 conn=wye kv=0.1270 pf=1 pmpp=1.82 kva=1.82 irradiance=1 temperature=25 %cutin=20 %cutout=20 effcurve=MyEff P-TCurve=MyPvsT Daily=IRRAD_DIA TDaily=TEMP_DIA
New PVSystem.GD_c5561ac04e580e48a054174129f73242cb970ca5f8d7dfbbd0439da86b665923_3 phases=1 bus1=2912032-11394803.3.4 conn=wye kv=0.1270 pf=1 pmpp=1.82 kva=1.82 irradiance=1 temperature=25 %cutin=20 %cutout=20 effcurve=MyEff P-TCurve=MyPvsT Daily=IRRAD_DIA TDaily=TEMP_DIA
New PVSystem.GD_05a37f476763f68083db104d26b99ef1bf688bd81b3ec9c7bd758f9e7e463cde_1 phases=1 bus1=2782498-10863280.1.4 conn=wye kv=0.1270 pf=1 pmpp=1.53 kva=1.53 irradiance=1 temperature=25 %cutin=20 %cutout=20 effcurve=MyEff P-TCurve=MyPvsT Daily=IRRAD_DIA TDaily=TEMP_DIA
New PVSystem.GD_05a37f476763f68083db104d26b99ef1bf688bd81b3ec9c7bd758f9e7e463cde_2 phases=1 bus1=2782498-10863280.2.4 conn=wye kv=0.1270 pf=1 pmpp=1.53 kva=1.53 irradiance=1 temperature=25 %cutin=20 %cutout=20 effcurve=MyEff P-TCurve=MyPvsT Daily=IRRAD_DIA TDaily=TEMP_DIA
New PVSystem.GD_05a37f476763f68083db104d26b99ef1bf688bd81b3ec9c7bd758f9e7e463cde_3 phases=1 bus1=2782498-10863280.3.4 conn=wye kv=0.1270 pf=1 pmpp=1.53 kva=1.53 irradiance=1 temperature=25 %cutin=20 %cutout=20 effcurve=MyEff P-TCurve=MyPvsT Daily=IRRAD_DIA TDaily=TEMP_DIA
New PVSystem.GD_5dac0c1237964c1caf5b93f6820f4596b6b09b799f18c2c8c298419ca65ef0ee_1 phases=1 bus1=3020520-11839497v.1.4 conn=wye kv=0.1100 pf=1 pmpp=1.62 kva=1.62 irradiance=1 temperature=25 %cutin=20 %cutout=20 effcurve=MyEff P-TCurve=MyPvsT Daily=IRRAD_DIA TDaily=TEMP_DIA
New PVSystem.GD_5dac0c1237964c1caf5b93f6820f4596b6b09b799f18c2c8c298419ca65ef0ee_2 phases=1 bus1=3020520-11839497v.2.4 conn=wye kv=0.1100 pf=1 pmpp=1.62 kva=1.62 irradiance=1 temperature=25 %cutin=20 %cutout=20 effcurve=MyEff P-TCurve=MyPvsT Daily=IRRAD_DIA TDaily=TEMP_DIA
New PVSystem.GD_35cf82976fcad860dab3fd6b56bcd5b339145b5134b6f9cf8a1e39b94dfa25a8_1 phases=1 bus1=2782719-10864429.1.4 conn=wye kv=0.1270 pf=1 pmpp=3.04 kva=3.04 irradiance=1 temperature=25 %cutin=20 %cutout=20 effcurve=MyEff P-TCurve=MyPvsT Daily=IRRAD_DIA TDaily=TEMP_DIA
New PVSystem.GD_35cf82976fcad860dab3fd6b56bcd5b339145b5134b6f9cf8a1e39b94dfa25a8_2 phases=1 bus1=2782719-10864429.2.4 conn=wye kv=0.1270 pf=1 pmpp=3.04 kva=3.04 irradiance=1 temperature=25 %cutin=20 %cutout=20 effcurve=MyEff P-TCurve=MyPvsT Daily=IRRAD_DIA TDaily=TEMP_DIA
New PVSystem.GD_35cf82976fcad860dab3fd6b56bcd5b339145b5134b6f9cf8a1e39b94dfa25a8_3 phases=1 bus1=2782719-10864429.3.4 conn=wye kv=0.1270 pf=1 pmpp=3.04 kva=3.04 irradiance=1 temperature=25 %cutin=20 %cutout=20 effcurve=MyEff P-TCurve=MyPvsT Daily=IRRAD_DIA TDaily=TEMP_DIA
New PVSystem.GD_23ea4ebf16e1fef4ddd1ac9b81683046135a4582bc37b2db06f5644c73676007_1 phases=1 bus1=2782719-10864429.1.4 conn=wye kv=0.1270 pf=1 pmpp=1.09 kva=1.09 irradiance=1 temperature=25 %cutin=20 %cutout=20 effcurve=MyEff P-TCurve=MyPvsT Daily=IRRAD_DIA TDaily=TEMP_DIA
New PVSystem.GD_23ea4ebf16e1fef4ddd1ac9b81683046135a4582bc37b2db06f5644c73676007_2 phases=1 bus1=2782719-10864429.2.4 conn=wye kv=0.1270 pf=1 pmpp=1.09 kva=1.09 irradiance=1 temperature=25 %cutin=20 %cutout=20 effcurve=MyEff P-TCurve=MyPvsT Daily=IRRAD_DIA TDaily=TEMP_DIA
New PVSystem.GD_23ea4ebf16e1fef4ddd1ac9b81683046135a4582bc37b2db06f5644c73676007_3 phases=1 bus1=2782719-10864429.3.4 conn=wye kv=0.1270 pf=1 pmpp=1.09 kva=1.09 irradiance=1 temperature=25 %cutin=20 %cutout=20 effcurve=MyEff P-TCurve=MyPvsT Daily=IRRAD_DIA TDaily=TEMP_DIA
New PVSystem.GD_061ba114ecf76708515890f045476b71bf1ca9e002bdc854baa1c439fe27e765_1 phases=1 bus1=2782719-10864429.1.4 conn=wye kv=0.1270 pf=1 pmpp=1.39 kva=1.39 irradiance=1 temperature=25 %cutin=20 %cutout=20 effcurve=MyEff P-TCurve=MyPvsT Daily=IRRAD_DIA TDaily=TEMP_DIA
New PVSystem.GD_061ba114ecf76708515890f045476b71bf1ca9e002bdc854baa1c439fe27e765_2 phases=1 bus1=2782719-10864429.2.4 conn=wye kv=0.1270 pf=1 pmpp=1.39 kva=1.39 irradiance=1 temperature=25 %cutin=20 %cutout=20 effcurve=MyEff P-TCurve=MyPvsT Daily=IRRAD_DIA TDaily=TEMP_DIA
New PVSystem.GD_061ba114ecf76708515890f045476b71bf1ca9e002bdc854baa1c439fe27e765_3 phases=1 bus1=2782719-10864429.3.4 conn=wye kv=0.1270 pf=1 pmpp=1.39 kva=1.39 irradiance=1 temperature=25 %cutin=20 %cutout=20 effcurve=MyEff P-TCurve=MyPvsT Daily=IRRAD_DIA TDaily=TEMP_DIA
New PVSystem.GD_28ee4dc64591ffbe58953dc57acab33f171d712e8dbd3c5fdb405d137f3759d3_1 phases=1 bus1=3017372-10867802.1.4 conn=wye kv=0.1270 pf=1 pmpp=3.90 kva=3.90 irradiance=1 temperature=25 %cutin=20 %cutout=20 effcurve=MyEff P-TCurve=MyPvsT Daily=IRRAD_DIA TDaily=TEMP_DIA
New PVSystem.GD_28ee4dc64591ffbe58953dc57acab33f171d712e8dbd3c5fdb405d137f3759d3_2 phases=1 bus1=3017372-10867802.2.4 conn=wye kv=0.1270 pf=1 pmpp=3.90 kva=3.90 irradiance=1 temperature=25 %cutin=20 %cutout=20 effcurve=MyEff P-TCurve=MyPvsT Daily=IRRAD_DIA TDaily=TEMP_DIA
New PVSystem.GD_28ee4dc64591ffbe58953dc57acab33f171d712e8dbd3c5fdb405d137f3759d3_3 phases=1 bus1=3017372-10867802.3.4 conn=wye kv=0.1270 pf=1 pmpp=3.90 kva=3.90 irradiance=1 temperature=25 %cutin=20 %cutout=20 effcurve=MyEff P-TCurve=MyPvsT Daily=IRRAD_DIA TDaily=TEMP_DIA
New PVSystem.GD_82e8beb3e698572fdb193387c4f20a820b67e937d4b51320a20ac5f4fc58f5bb_1 phases=1 bus1=2205071-7500492.1.4 conn=wye kv=0.1270 pf=1 pmpp=2.46 kva=2.46 irradiance=1 temperature=25 %cutin=20 %cutout=20 effcurve=MyEff P-TCurve=MyPvsT Daily=IRRAD_DIA TDaily=TEMP_DIA
New PVSystem.GD_82e8beb3e698572fdb193387c4f20a820b67e937d4b51320a20ac5f4fc58f5bb_2 phases=1 bus1=2205071-7500492.2.4 conn=wye kv=0.1270 pf=1 pmpp=2.46 kva=2.46 irradiance=1 temperature=25 %cutin=20 %cutout=20 effcurve=MyEff P-TCurve=MyPvsT Daily=IRRAD_DIA TDaily=TEMP_DIA
New PVSystem.GD_82e8beb3e698572fdb193387c4f20a820b67e937d4b51320a20ac5f4fc58f5bb_3 phases=1 bus1=2205071-7500492.3.4 conn=wye kv=0.1270 pf=1 pmpp=2.46 kva=2.46 irradiance=1 temperature=25 %cutin=20 %cutout=20 effcurve=MyEff P-TCurve=MyPvsT Daily=IRRAD_DIA TDaily=TEMP_DIA
New PVSystem.GD_47915f42a8573b5751182afc472a3992895279998d34b4654c6c3bb298993e5e_1 phases=1 bus1=2782688-10864800.1.4 conn=wye kv=0.1270 pf=1 pmpp=1.79 kva=1.79 irradiance=1 temperature=25 %cutin=20 %cutout=20 effcurve=MyEff P-TCurve=MyPvsT Daily=IRRAD_DIA TDaily=TEMP_DIA
New PVSystem.GD_47915f42a8573b5751182afc472a3992895279998d34b4654c6c3bb298993e5e_2 phases=1 bus1=2782688-10864800.2.4 conn=wye kv=0.1270 pf=1 pmpp=1.79 kva=1.79 irradiance=1 temperature=25 %cutin=20 %cutout=20 effcurve=MyEff P-TCurve=MyPvsT Daily=IRRAD_DIA TDaily=TEMP_DIA
New PVSystem.GD_47915f42a8573b5751182afc472a3992895279998d34b4654c6c3bb298993e5e_3 phases=1 bus1=2782688-10864800.3.4 conn=wye kv=0.1270 pf=1 pmpp=1.79 kva=1.79 irradiance=1 temperature=25 %cutin=20 %cutout=20 effcurve=MyEff P-TCurve=MyPvsT Daily=IRRAD_DIA TDaily=TEMP_DIA
New PVSystem.GD_81bc82d9440f647a7a73a2ad5998396463c0213ec6a675e369d25ad30c7d6ff3_1 phases=1 bus1=2782688-10864800.1.4 conn=wye kv=0.1270 pf=1 pmpp=1.09 kva=1.09 irradiance=1 temperature=25 %cutin=20 %cutout=20 effcurve=MyEff P-TCurve=MyPvsT Daily=IRRAD_DIA TDaily=TEMP_DIA
New PVSystem.GD_81bc82d9440f647a7a73a2ad5998396463c0213ec6a675e369d25ad30c7d6ff3_2 phases=1 bus1=2782688-10864800.2.4 conn=wye kv=0.1270 pf=1 pmpp=1.09 kva=1.09 irradiance=1 temperature=25 %cutin=20 %cutout=20 effcurve=MyEff P-TCurve=MyPvsT Daily=IRRAD_DIA TDaily=TEMP_DIA
New PVSystem.GD_81bc82d9440f647a7a73a2ad5998396463c0213ec6a675e369d25ad30c7d6ff3_3 phases=1 bus1=2782688-10864800.3.4 conn=wye kv=0.1270 pf=1 pmpp=1.09 kva=1.09 irradiance=1 temperature=25 %cutin=20 %cutout=20 effcurve=MyEff P-TCurve=MyPvsT Daily=IRRAD_DIA TDaily=TEMP_DIA
New PVSystem.GD_abdffaeb3f4886757d7ac85ec88d042239c596e69b599dcaed391b41e70b112e_1 phases=1 bus1=3062820-10868025v.1.4 conn=wye kv=0.1270 pf=1 pmpp=1.66 kva=1.66 irradiance=1 temperature=25 %cutin=20 %cutout=20 effcurve=MyEff P-TCurve=MyPvsT Daily=IRRAD_DIA TDaily=TEMP_DIA
New PVSystem.GD_abdffaeb3f4886757d7ac85ec88d042239c596e69b599dcaed391b41e70b112e_2 phases=1 bus1=3062820-10868025v.2.4 conn=wye kv=0.1270 pf=1 pmpp=1.66 kva=1.66 irradiance=1 temperature=25 %cutin=20 %cutout=20 effcurve=MyEff P-TCurve=MyPvsT Daily=IRRAD_DIA TDaily=TEMP_DIA
New PVSystem.GD_abdffaeb3f4886757d7ac85ec88d042239c596e69b599dcaed391b41e70b112e_3 phases=1 bus1=3062820-10868025v.3.4 conn=wye kv=0.1270 pf=1 pmpp=1.66 kva=1.66 irradiance=1 temperature=25 %cutin=20 %cutout=20 effcurve=MyEff P-TCurve=MyPvsT Daily=IRRAD_DIA TDaily=TEMP_DIA
New PVSystem.GD_078ae45ebc992fde5bfbd32826843b4eb0fa5dea8daac93395215c4c1c30eab9_1 phases=1 bus1=2205274-7497404.1.4 conn=wye kv=0.1270 pf=1 pmpp=0.04 kva=0.10 irradiance=1 temperature=25 %cutin=20 %cutout=20 effcurve=MyEff P-TCurve=MyPvsT Daily=IRRAD_DIA TDaily=TEMP_DIA
New PVSystem.GD_078ae45ebc992fde5bfbd32826843b4eb0fa5dea8daac93395215c4c1c30eab9_2 phases=1 bus1=2205274-7497404.2.4 conn=wye kv=0.1270 pf=1 pmpp=0.04 kva=0.10 irradiance=1 temperature=25 %cutin=20 %cutout=20 effcurve=MyEff P-TCurve=MyPvsT Daily=IRRAD_DIA TDaily=TEMP_DIA
New PVSystem.GD_078ae45ebc992fde5bfbd32826843b4eb0fa5dea8daac93395215c4c1c30eab9_3 phases=1 bus1=2205274-7497404.3.4 conn=wye kv=0.1270 pf=1 pmpp=0.04 kva=0.10 irradiance=1 temperature=25 %cutin=20 %cutout=20 effcurve=MyEff P-TCurve=MyPvsT Daily=IRRAD_DIA TDaily=TEMP_DIA
New PVSystem.GD_557afe6c0feff00947ade03bebd6a98fa4a8a57ef235afbdc7e4a8cc663cee7b_1 phases=1 bus1=2205274-7497404.1.4 conn=wye kv=0.1270 pf=1 pmpp=0.41 kva=0.41 irradiance=1 temperature=25 %cutin=20 %cutout=20 effcurve=MyEff P-TCurve=MyPvsT Daily=IRRAD_DIA TDaily=TEMP_DIA
New PVSystem.GD_557afe6c0feff00947ade03bebd6a98fa4a8a57ef235afbdc7e4a8cc663cee7b_2 phases=1 bus1=2205274-7497404.2.4 conn=wye kv=0.1270 pf=1 pmpp=0.41 kva=0.41 irradiance=1 temperature=25 %cutin=20 %cutout=20 effcurve=MyEff P-TCurve=MyPvsT Daily=IRRAD_DIA TDaily=TEMP_DIA
New PVSystem.GD_557afe6c0feff00947ade03bebd6a98fa4a8a57ef235afbdc7e4a8cc663cee7b_3 phases=1 bus1=2205274-7497404.3.4 conn=wye kv=0.1270 pf=1 pmpp=0.41 kva=0.41 irradiance=1 temperature=25 %cutin=20 %cutout=20 effcurve=MyEff P-TCurve=MyPvsT Daily=IRRAD_DIA TDaily=TEMP_DIA
New PVSystem.GD_2317bc9b118a84094bd5777882055d94f056b0311bbeafae0854a9cb0ce09eba_1 phases=1 bus1=2782510-12693770.1.4 conn=wye kv=0.1270 pf=1 pmpp=4.15 kva=4.15 irradiance=1 temperature=25 %cutin=20 %cutout=20 effcurve=MyEff P-TCurve=MyPvsT Daily=IRRAD_DIA TDaily=TEMP_DIA
New PVSystem.GD_2317bc9b118a84094bd5777882055d94f056b0311bbeafae0854a9cb0ce09eba_2 phases=1 bus1=2782510-12693770.2.4 conn=wye kv=0.1270 pf=1 pmpp=4.15 kva=4.15 irradiance=1 temperature=25 %cutin=20 %cutout=20 effcurve=MyEff P-TCurve=MyPvsT Daily=IRRAD_DIA TDaily=TEMP_DIA
New PVSystem.GD_2317bc9b118a84094bd5777882055d94f056b0311bbeafae0854a9cb0ce09eba_3 phases=1 bus1=2782510-12693770.3.4 conn=wye kv=0.1270 pf=1 pmpp=4.15 kva=4.15 irradiance=1 temperature=25 %cutin=20 %cutout=20 effcurve=MyEff P-TCurve=MyPvsT Daily=IRRAD_DIA TDaily=TEMP_DIA
New PVSystem.GD_df9b1506e1c062a39a53974e7c922a707599cca37a505ac501135f78fca0a857_1 phases=1 bus1=2782533-10863567.1.4 conn=wye kv=0.1270 pf=1 pmpp=6.14 kva=6.14 irradiance=1 temperature=25 %cutin=20 %cutout=20 effcurve=MyEff P-TCurve=MyPvsT Daily=IRRAD_DIA TDaily=TEMP_DIA
New PVSystem.GD_df9b1506e1c062a39a53974e7c922a707599cca37a505ac501135f78fca0a857_2 phases=1 bus1=2782533-10863567.2.4 conn=wye kv=0.1270 pf=1 pmpp=6.14 kva=6.14 irradiance=1 temperature=25 %cutin=20 %cutout=20 effcurve=MyEff P-TCurve=MyPvsT Daily=IRRAD_DIA TDaily=TEMP_DIA
New PVSystem.GD_df9b1506e1c062a39a53974e7c922a707599cca37a505ac501135f78fca0a857_3 phases=1 bus1=2782533-10863567.3.4 conn=wye kv=0.1270 pf=1 pmpp=6.14 kva=6.14 irradiance=1 temperature=25 %cutin=20 %cutout=20 effcurve=MyEff P-TCurve=MyPvsT Daily=IRRAD_DIA TDaily=TEMP_DIA
New PVSystem.GD_aec93a6cd1a6a71ad9d5000f5b2e426e114ff44b834a92adf514cae2779218d3_1 phases=1 bus1=2205300-7500252.1.4 conn=wye kv=0.1270 pf=1 pmpp=0.66 kva=0.66 irradiance=1 temperature=25 %cutin=20 %cutout=20 effcurve=MyEff P-TCurve=MyPvsT Daily=IRRAD_DIA TDaily=TEMP_DIA
New PVSystem.GD_aec93a6cd1a6a71ad9d5000f5b2e426e114ff44b834a92adf514cae2779218d3_2 phases=1 bus1=2205300-7500252.2.4 conn=wye kv=0.1270 pf=1 pmpp=0.66 kva=0.66 irradiance=1 temperature=25 %cutin=20 %cutout=20 effcurve=MyEff P-TCurve=MyPvsT Daily=IRRAD_DIA TDaily=TEMP_DIA
New PVSystem.GD_aec93a6cd1a6a71ad9d5000f5b2e426e114ff44b834a92adf514cae2779218d3_3 phases=1 bus1=2205300-7500252.3.4 conn=wye kv=0.1270 pf=1 pmpp=0.66 kva=0.66 irradiance=1 temperature=25 %cutin=20 %cutout=20 effcurve=MyEff P-TCurve=MyPvsT Daily=IRRAD_DIA TDaily=TEMP_DIA
New PVSystem.GD_a479cd0ac0e3e4bf8627e7b8bdbe74b6a6938b34d902a89b0bf1f625099a3afd_1 phases=1 bus1=2782680-10864463.1.4 conn=wye kv=0.1270 pf=1 pmpp=0.84 kva=0.84 irradiance=1 temperature=25 %cutin=20 %cutout=20 effcurve=MyEff P-TCurve=MyPvsT Daily=IRRAD_DIA TDaily=TEMP_DIA
New PVSystem.GD_a479cd0ac0e3e4bf8627e7b8bdbe74b6a6938b34d902a89b0bf1f625099a3afd_2 phases=1 bus1=2782680-10864463.2.4 conn=wye kv=0.1270 pf=1 pmpp=0.84 kva=0.84 irradiance=1 temperature=25 %cutin=20 %cutout=20 effcurve=MyEff P-TCurve=MyPvsT Daily=IRRAD_DIA TDaily=TEMP_DIA
New PVSystem.GD_a479cd0ac0e3e4bf8627e7b8bdbe74b6a6938b34d902a89b0bf1f625099a3afd_3 phases=1 bus1=2782680-10864463.3.4 conn=wye kv=0.1270 pf=1 pmpp=0.84 kva=0.84 irradiance=1 temperature=25 %cutin=20 %cutout=20 effcurve=MyEff P-TCurve=MyPvsT Daily=IRRAD_DIA TDaily=TEMP_DIA
New PVSystem.GD_433ee2df0c0d0c36bb7787ef1e72cd9dcc599415f1bab885ffdd65389bb30430_1 phases=1 bus1=2782680-10864463.1.4 conn=wye kv=0.1270 pf=1 pmpp=0.73 kva=0.73 irradiance=1 temperature=25 %cutin=20 %cutout=20 effcurve=MyEff P-TCurve=MyPvsT Daily=IRRAD_DIA TDaily=TEMP_DIA
New PVSystem.GD_433ee2df0c0d0c36bb7787ef1e72cd9dcc599415f1bab885ffdd65389bb30430_2 phases=1 bus1=2782680-10864463.2.4 conn=wye kv=0.1270 pf=1 pmpp=0.73 kva=0.73 irradiance=1 temperature=25 %cutin=20 %cutout=20 effcurve=MyEff P-TCurve=MyPvsT Daily=IRRAD_DIA TDaily=TEMP_DIA
New PVSystem.GD_433ee2df0c0d0c36bb7787ef1e72cd9dcc599415f1bab885ffdd65389bb30430_3 phases=1 bus1=2782680-10864463.3.4 conn=wye kv=0.1270 pf=1 pmpp=0.73 kva=0.73 irradiance=1 temperature=25 %cutin=20 %cutout=20 effcurve=MyEff P-TCurve=MyPvsT Daily=IRRAD_DIA TDaily=TEMP_DIA
New PVSystem.GD_e81a1e7df21cdaf3136f22c539e6c3b98d7b78e6451bec35b66c1723a5f919aa_1 phases=1 bus1=2782513-10862811.1.4 conn=wye kv=0.1270 pf=1 pmpp=1.81 kva=1.81 irradiance=1 temperature=25 %cutin=20 %cutout=20 effcurve=MyEff P-TCurve=MyPvsT Daily=IRRAD_DIA TDaily=TEMP_DIA
New PVSystem.GD_e81a1e7df21cdaf3136f22c539e6c3b98d7b78e6451bec35b66c1723a5f919aa_2 phases=1 bus1=2782513-10862811.2.4 conn=wye kv=0.1270 pf=1 pmpp=1.81 kva=1.81 irradiance=1 temperature=25 %cutin=20 %cutout=20 effcurve=MyEff P-TCurve=MyPvsT Daily=IRRAD_DIA TDaily=TEMP_DIA
New PVSystem.GD_e81a1e7df21cdaf3136f22c539e6c3b98d7b78e6451bec35b66c1723a5f919aa_3 phases=1 bus1=2782513-10862811.3.4 conn=wye kv=0.1270 pf=1 pmpp=1.81 kva=1.81 irradiance=1 temperature=25 %cutin=20 %cutout=20 effcurve=MyEff P-TCurve=MyPvsT Daily=IRRAD_DIA TDaily=TEMP_DIA
New PVSystem.GD_e9f4b898c9ee06ff12f635b03ea5ea73662e4f5240566aaec7ed59b64a25238d_1 phases=1 bus1=2885897-11355755v.1.4 conn=wye kv=0.1100 pf=1 pmpp=2.23 kva=2.23 irradiance=1 temperature=25 %cutin=20 %cutout=20 effcurve=MyEff P-TCurve=MyPvsT Daily=IRRAD_DIA TDaily=TEMP_DIA
New PVSystem.GD_e9f4b898c9ee06ff12f635b03ea5ea73662e4f5240566aaec7ed59b64a25238d_2 phases=1 bus1=2885897-11355755v.2.4 conn=wye kv=0.1100 pf=1 pmpp=2.23 kva=2.23 irradiance=1 temperature=25 %cutin=20 %cutout=20 effcurve=MyEff P-TCurve=MyPvsT Daily=IRRAD_DIA TDaily=TEMP_DIA
New PVSystem.GD_4bbc49ebb9597f0b10c855c55992b7498dc669b01654a2b0e36d12c82d0b0a0d_1 phases=1 bus1=3107356-12389066v.1.4 conn=wye kv=0.1270 pf=1 pmpp=0.83 kva=0.83 irradiance=1 temperature=25 %cutin=20 %cutout=20 effcurve=MyEff P-TCurve=MyPvsT Daily=IRRAD_DIA TDaily=TEMP_DIA
New PVSystem.GD_4bbc49ebb9597f0b10c855c55992b7498dc669b01654a2b0e36d12c82d0b0a0d_2 phases=1 bus1=3107356-12389066v.2.4 conn=wye kv=0.1270 pf=1 pmpp=0.83 kva=0.83 irradiance=1 temperature=25 %cutin=20 %cutout=20 effcurve=MyEff P-TCurve=MyPvsT Daily=IRRAD_DIA TDaily=TEMP_DIA
New PVSystem.GD_4bbc49ebb9597f0b10c855c55992b7498dc669b01654a2b0e36d12c82d0b0a0d_3 phases=1 bus1=3107356-12389066v.3.4 conn=wye kv=0.1270 pf=1 pmpp=0.83 kva=0.83 irradiance=1 temperature=25 %cutin=20 %cutout=20 effcurve=MyEff P-TCurve=MyPvsT Daily=IRRAD_DIA TDaily=TEMP_DIA
New PVSystem.GD_dea916e1b4f9a603b4a75872e0f8c033fd7723d0e188ddc524b478d58bf6cb24_1 phases=1 bus1=2884144-11352967v.1.4 conn=wye kv=0.1100 pf=1 pmpp=1.66 kva=1.66 irradiance=1 temperature=25 %cutin=20 %cutout=20 effcurve=MyEff P-TCurve=MyPvsT Daily=IRRAD_DIA TDaily=TEMP_DIA
New PVSystem.GD_dea916e1b4f9a603b4a75872e0f8c033fd7723d0e188ddc524b478d58bf6cb24_2 phases=1 bus1=2884144-11352967v.2.4 conn=wye kv=0.1100 pf=1 pmpp=1.66 kva=1.66 irradiance=1 temperature=25 %cutin=20 %cutout=20 effcurve=MyEff P-TCurve=MyPvsT Daily=IRRAD_DIA TDaily=TEMP_DIA
New PVSystem.GD_28e942ffe7d8c8b715ca7cb2ee8d4803f82fb150f18bfefdbea745a42b025489_1 phases=1 bus1=2783057-10865788v.1.4 conn=wye kv=0.1100 pf=1 pmpp=3.26 kva=3.26 irradiance=1 temperature=25 %cutin=20 %cutout=20 effcurve=MyEff P-TCurve=MyPvsT Daily=IRRAD_DIA TDaily=TEMP_DIA
New PVSystem.GD_28e942ffe7d8c8b715ca7cb2ee8d4803f82fb150f18bfefdbea745a42b025489_2 phases=1 bus1=2783057-10865788v.2.4 conn=wye kv=0.1100 pf=1 pmpp=3.26 kva=3.26 irradiance=1 temperature=25 %cutin=20 %cutout=20 effcurve=MyEff P-TCurve=MyPvsT Daily=IRRAD_DIA TDaily=TEMP_DIA
New PVSystem.GD_b415c3f017da71b6ee403567f09b9f08c1271e420dbfa568a9f2fbc84a55e1ed_1 phases=1 bus1=2204890-7499562v.1.4 conn=wye kv=0.1100 pf=1 pmpp=0.90 kva=0.90 irradiance=1 temperature=25 %cutin=20 %cutout=20 effcurve=MyEff P-TCurve=MyPvsT Daily=IRRAD_DIA TDaily=TEMP_DIA
New PVSystem.GD_b415c3f017da71b6ee403567f09b9f08c1271e420dbfa568a9f2fbc84a55e1ed_2 phases=1 bus1=2204890-7499562v.2.4 conn=wye kv=0.1100 pf=1 pmpp=0.90 kva=0.90 irradiance=1 temperature=25 %cutin=20 %cutout=20 effcurve=MyEff P-TCurve=MyPvsT Daily=IRRAD_DIA TDaily=TEMP_DIA
New PVSystem.GD_b7712fdfb97a95707e4e853b305332351b91d07a19e38b1e64219e98b6f835a4_1 phases=1 bus1=2782466-10862859.1.4 conn=wye kv=0.1270 pf=1 pmpp=1.45 kva=1.45 irradiance=1 temperature=25 %cutin=20 %cutout=20 effcurve=MyEff P-TCurve=MyPvsT Daily=IRRAD_DIA TDaily=TEMP_DIA
New PVSystem.GD_b7712fdfb97a95707e4e853b305332351b91d07a19e38b1e64219e98b6f835a4_2 phases=1 bus1=2782466-10862859.2.4 conn=wye kv=0.1270 pf=1 pmpp=1.45 kva=1.45 irradiance=1 temperature=25 %cutin=20 %cutout=20 effcurve=MyEff P-TCurve=MyPvsT Daily=IRRAD_DIA TDaily=TEMP_DIA
New PVSystem.GD_b7712fdfb97a95707e4e853b305332351b91d07a19e38b1e64219e98b6f835a4_3 phases=1 bus1=2782466-10862859.3.4 conn=wye kv=0.1270 pf=1 pmpp=1.45 kva=1.45 irradiance=1 temperature=25 %cutin=20 %cutout=20 effcurve=MyEff P-TCurve=MyPvsT Daily=IRRAD_DIA TDaily=TEMP_DIA
New PVSystem.GD_7633c5b16dd277f0da05194be36947e390cc85e02c420e27a66d20b0c64646b3_1 phases=1 bus1=2782466-10862859.1.4 conn=wye kv=0.1270 pf=1 pmpp=1.35 kva=1.35 irradiance=1 temperature=25 %cutin=20 %cutout=20 effcurve=MyEff P-TCurve=MyPvsT Daily=IRRAD_DIA TDaily=TEMP_DIA
New PVSystem.GD_7633c5b16dd277f0da05194be36947e390cc85e02c420e27a66d20b0c64646b3_2 phases=1 bus1=2782466-10862859.2.4 conn=wye kv=0.1270 pf=1 pmpp=1.35 kva=1.35 irradiance=1 temperature=25 %cutin=20 %cutout=20 effcurve=MyEff P-TCurve=MyPvsT Daily=IRRAD_DIA TDaily=TEMP_DIA
New PVSystem.GD_7633c5b16dd277f0da05194be36947e390cc85e02c420e27a66d20b0c64646b3_3 phases=1 bus1=2782466-10862859.3.4 conn=wye kv=0.1270 pf=1 pmpp=1.35 kva=1.35 irradiance=1 temperature=25 %cutin=20 %cutout=20 effcurve=MyEff P-TCurve=MyPvsT Daily=IRRAD_DIA TDaily=TEMP_DIA
New PVSystem.GD_4a7926f5db6889886f8fa7861cb9334268fb7e13568498c9c8e86ab9f5f9734f_1 phases=1 bus1=2782466-10862859.1.4 conn=wye kv=0.1270 pf=1 pmpp=1.08 kva=1.08 irradiance=1 temperature=25 %cutin=20 %cutout=20 effcurve=MyEff P-TCurve=MyPvsT Daily=IRRAD_DIA TDaily=TEMP_DIA
New PVSystem.GD_4a7926f5db6889886f8fa7861cb9334268fb7e13568498c9c8e86ab9f5f9734f_2 phases=1 bus1=2782466-10862859.2.4 conn=wye kv=0.1270 pf=1 pmpp=1.08 kva=1.08 irradiance=1 temperature=25 %cutin=20 %cutout=20 effcurve=MyEff P-TCurve=MyPvsT Daily=IRRAD_DIA TDaily=TEMP_DIA
New PVSystem.GD_4a7926f5db6889886f8fa7861cb9334268fb7e13568498c9c8e86ab9f5f9734f_3 phases=1 bus1=2782466-10862859.3.4 conn=wye kv=0.1270 pf=1 pmpp=1.08 kva=1.08 irradiance=1 temperature=25 %cutin=20 %cutout=20 effcurve=MyEff P-TCurve=MyPvsT Daily=IRRAD_DIA TDaily=TEMP_DIA
New PVSystem.GD_18629530cee6329e950b7b97e5f140e8ca8c2ba9498a0097cc903145e9657f21_1 phases=1 bus1=2204839-7497949v.1.4 conn=wye kv=0.1100 pf=1 pmpp=5.09 kva=5.09 irradiance=1 temperature=25 %cutin=20 %cutout=20 effcurve=MyEff P-TCurve=MyPvsT Daily=IRRAD_DIA TDaily=TEMP_DIA
New PVSystem.GD_18629530cee6329e950b7b97e5f140e8ca8c2ba9498a0097cc903145e9657f21_2 phases=1 bus1=2204839-7497949v.2.4 conn=wye kv=0.1100 pf=1 pmpp=5.09 kva=5.09 irradiance=1 temperature=25 %cutin=20 %cutout=20 effcurve=MyEff P-TCurve=MyPvsT Daily=IRRAD_DIA TDaily=TEMP_DIA
New PVSystem.GD_67f71cee67a879598c2586fcb0d47b9589814218c6d82af39fc6a1669c73b5c8_1 phases=1 bus1=2782538-10862947.1.4 conn=wye kv=0.1270 pf=1 pmpp=0.95 kva=0.95 irradiance=1 temperature=25 %cutin=20 %cutout=20 effcurve=MyEff P-TCurve=MyPvsT Daily=IRRAD_DIA TDaily=TEMP_DIA
New PVSystem.GD_67f71cee67a879598c2586fcb0d47b9589814218c6d82af39fc6a1669c73b5c8_2 phases=1 bus1=2782538-10862947.2.4 conn=wye kv=0.1270 pf=1 pmpp=0.95 kva=0.95 irradiance=1 temperature=25 %cutin=20 %cutout=20 effcurve=MyEff P-TCurve=MyPvsT Daily=IRRAD_DIA TDaily=TEMP_DIA
New PVSystem.GD_67f71cee67a879598c2586fcb0d47b9589814218c6d82af39fc6a1669c73b5c8_3 phases=1 bus1=2782538-10862947.3.4 conn=wye kv=0.1270 pf=1 pmpp=0.95 kva=0.95 irradiance=1 temperature=25 %cutin=20 %cutout=20 effcurve=MyEff P-TCurve=MyPvsT Daily=IRRAD_DIA TDaily=TEMP_DIA
New PVSystem.GD_c498e2b586a8c361e7982b986e9b6bc8d4badb2cd116d277e59fb3c77cb8aca6_1 phases=1 bus1=2205318-7499139v.1.4 conn=wye kv=0.1100 pf=1 pmpp=2.75 kva=2.75 irradiance=1 temperature=25 %cutin=20 %cutout=20 effcurve=MyEff P-TCurve=MyPvsT Daily=IRRAD_DIA TDaily=TEMP_DIA
New PVSystem.GD_c498e2b586a8c361e7982b986e9b6bc8d4badb2cd116d277e59fb3c77cb8aca6_2 phases=1 bus1=2205318-7499139v.2.4 conn=wye kv=0.1100 pf=1 pmpp=2.75 kva=2.75 irradiance=1 temperature=25 %cutin=20 %cutout=20 effcurve=MyEff P-TCurve=MyPvsT Daily=IRRAD_DIA TDaily=TEMP_DIA
New PVSystem.GD_46869bc54874bf68e1905f380f898a14f2a98f64c328e7a8cd9d81b51dc21be5_1 phases=1 bus1=2887592-11359061.1.4 conn=wye kv=0.1100 pf=1 pmpp=1.04 kva=1.04 irradiance=1 temperature=25 %cutin=20 %cutout=20 effcurve=MyEff P-TCurve=MyPvsT Daily=IRRAD_DIA TDaily=TEMP_DIA
New PVSystem.GD_46869bc54874bf68e1905f380f898a14f2a98f64c328e7a8cd9d81b51dc21be5_2 phases=1 bus1=2887592-11359061.2.4 conn=wye kv=0.1100 pf=1 pmpp=1.04 kva=1.04 irradiance=1 temperature=25 %cutin=20 %cutout=20 effcurve=MyEff P-TCurve=MyPvsT Daily=IRRAD_DIA TDaily=TEMP_DIA
New PVSystem.GD_9f15f7d996333f0142d1cbc64314134c87720671a25030baad4ec2d88e2c230d_1 phases=1 bus1=2888174-11360715v.1.4 conn=wye kv=0.1100 pf=1 pmpp=2.50 kva=2.50 irradiance=1 temperature=25 %cutin=20 %cutout=20 effcurve=MyEff P-TCurve=MyPvsT Daily=IRRAD_DIA TDaily=TEMP_DIA
New PVSystem.GD_9f15f7d996333f0142d1cbc64314134c87720671a25030baad4ec2d88e2c230d_2 phases=1 bus1=2888174-11360715v.2.4 conn=wye kv=0.1100 pf=1 pmpp=2.50 kva=2.50 irradiance=1 temperature=25 %cutin=20 %cutout=20 effcurve=MyEff P-TCurve=MyPvsT Daily=IRRAD_DIA TDaily=TEMP_DIA
New PVSystem.GD_da697ffa5112aa5a4967e9ee8917620e60fb2dd36ba08199511f3a93869b210b_1 phases=1 bus1=2782950-10868286v.1.4 conn=wye kv=0.1100 pf=1 pmpp=2.48 kva=2.48 irradiance=1 temperature=25 %cutin=20 %cutout=20 effcurve=MyEff P-TCurve=MyPvsT Daily=IRRAD_DIA TDaily=TEMP_DIA
New PVSystem.GD_da697ffa5112aa5a4967e9ee8917620e60fb2dd36ba08199511f3a93869b210b_2 phases=1 bus1=2782950-10868286v.2.4 conn=wye kv=0.1100 pf=1 pmpp=2.48 kva=2.48 irradiance=1 temperature=25 %cutin=20 %cutout=20 effcurve=MyEff P-TCurve=MyPvsT Daily=IRRAD_DIA TDaily=TEMP_DIA
New PVSystem.GD_d08b74ff5b9f1883bb35ff04747e9a36dd234727e55c9f8146b9eed9bbb5a075_1 phases=1 bus1=2783056-10866358.1.4 conn=wye kv=0.1100 pf=1 pmpp=1.13 kva=1.13 irradiance=1 temperature=25 %cutin=20 %cutout=20 effcurve=MyEff P-TCurve=MyPvsT Daily=IRRAD_DIA TDaily=TEMP_DIA
New PVSystem.GD_d08b74ff5b9f1883bb35ff04747e9a36dd234727e55c9f8146b9eed9bbb5a075_2 phases=1 bus1=2783056-10866358.2.4 conn=wye kv=0.1100 pf=1 pmpp=1.13 kva=1.13 irradiance=1 temperature=25 %cutin=20 %cutout=20 effcurve=MyEff P-TCurve=MyPvsT Daily=IRRAD_DIA TDaily=TEMP_DIA
New PVSystem.GD_da9163e1315290c592102ed62eaf5fc5d65c4e9f71c4a03408f0a9e2416119da_1 phases=1 bus1=2783155-10867092.1.4 conn=wye kv=0.1270 pf=1 pmpp=2.71 kva=2.71 irradiance=1 temperature=25 %cutin=20 %cutout=20 effcurve=MyEff P-TCurve=MyPvsT Daily=IRRAD_DIA TDaily=TEMP_DIA
New PVSystem.GD_da9163e1315290c592102ed62eaf5fc5d65c4e9f71c4a03408f0a9e2416119da_2 phases=1 bus1=2783155-10867092.2.4 conn=wye kv=0.1270 pf=1 pmpp=2.71 kva=2.71 irradiance=1 temperature=25 %cutin=20 %cutout=20 effcurve=MyEff P-TCurve=MyPvsT Daily=IRRAD_DIA TDaily=TEMP_DIA
New PVSystem.GD_da9163e1315290c592102ed62eaf5fc5d65c4e9f71c4a03408f0a9e2416119da_3 phases=1 bus1=2783155-10867092.3.4 conn=wye kv=0.1270 pf=1 pmpp=2.71 kva=2.71 irradiance=1 temperature=25 %cutin=20 %cutout=20 effcurve=MyEff P-TCurve=MyPvsT Daily=IRRAD_DIA TDaily=TEMP_DIA
New PVSystem.GD_76d44f22a8f8869d09be5247668612efc3ad24b0298cf308adcd94c11b140587_1 phases=1 bus1=2783155-10867092.1.4 conn=wye kv=0.1270 pf=1 pmpp=1.44 kva=1.44 irradiance=1 temperature=25 %cutin=20 %cutout=20 effcurve=MyEff P-TCurve=MyPvsT Daily=IRRAD_DIA TDaily=TEMP_DIA
New PVSystem.GD_76d44f22a8f8869d09be5247668612efc3ad24b0298cf308adcd94c11b140587_2 phases=1 bus1=2783155-10867092.2.4 conn=wye kv=0.1270 pf=1 pmpp=1.44 kva=1.44 irradiance=1 temperature=25 %cutin=20 %cutout=20 effcurve=MyEff P-TCurve=MyPvsT Daily=IRRAD_DIA TDaily=TEMP_DIA
New PVSystem.GD_76d44f22a8f8869d09be5247668612efc3ad24b0298cf308adcd94c11b140587_3 phases=1 bus1=2783155-10867092.3.4 conn=wye kv=0.1270 pf=1 pmpp=1.44 kva=1.44 irradiance=1 temperature=25 %cutin=20 %cutout=20 effcurve=MyEff P-TCurve=MyPvsT Daily=IRRAD_DIA TDaily=TEMP_DIA
New PVSystem.GD_35e283adcc22958ff260573b3a61bbbe6f476c2977fce5777c5871a8f9ffef36_1 phases=1 bus1=2783155-10867092.1.4 conn=wye kv=0.1270 pf=1 pmpp=0.94 kva=0.94 irradiance=1 temperature=25 %cutin=20 %cutout=20 effcurve=MyEff P-TCurve=MyPvsT Daily=IRRAD_DIA TDaily=TEMP_DIA
New PVSystem.GD_35e283adcc22958ff260573b3a61bbbe6f476c2977fce5777c5871a8f9ffef36_2 phases=1 bus1=2783155-10867092.2.4 conn=wye kv=0.1270 pf=1 pmpp=0.94 kva=0.94 irradiance=1 temperature=25 %cutin=20 %cutout=20 effcurve=MyEff P-TCurve=MyPvsT Daily=IRRAD_DIA TDaily=TEMP_DIA
New PVSystem.GD_35e283adcc22958ff260573b3a61bbbe6f476c2977fce5777c5871a8f9ffef36_3 phases=1 bus1=2783155-10867092.3.4 conn=wye kv=0.1270 pf=1 pmpp=0.94 kva=0.94 irradiance=1 temperature=25 %cutin=20 %cutout=20 effcurve=MyEff P-TCurve=MyPvsT Daily=IRRAD_DIA TDaily=TEMP_DIA
New PVSystem.GD_3fe407d6e5e44d8185911e7a5410db7d9f8a21a9f9b0afc623e22061edbdf409_1 phases=1 bus1=2204753-7498939.1.4 conn=wye kv=0.1100 pf=1 pmpp=1.91 kva=1.91 irradiance=1 temperature=25 %cutin=20 %cutout=20 effcurve=MyEff P-TCurve=MyPvsT Daily=IRRAD_DIA TDaily=TEMP_DIA
New PVSystem.GD_3fe407d6e5e44d8185911e7a5410db7d9f8a21a9f9b0afc623e22061edbdf409_2 phases=1 bus1=2204753-7498939.2.4 conn=wye kv=0.1100 pf=1 pmpp=1.91 kva=1.91 irradiance=1 temperature=25 %cutin=20 %cutout=20 effcurve=MyEff P-TCurve=MyPvsT Daily=IRRAD_DIA TDaily=TEMP_DIA
New PVSystem.GD_9deb8569cc3ff7c1809057decfd5089ecc1122c51a1668dbc399d3b88ea0249c_1 phases=1 bus1=2782482-10862992.1.4 conn=wye kv=0.1270 pf=1 pmpp=0.92 kva=0.92 irradiance=1 temperature=25 %cutin=20 %cutout=20 effcurve=MyEff P-TCurve=MyPvsT Daily=IRRAD_DIA TDaily=TEMP_DIA
New PVSystem.GD_9deb8569cc3ff7c1809057decfd5089ecc1122c51a1668dbc399d3b88ea0249c_2 phases=1 bus1=2782482-10862992.2.4 conn=wye kv=0.1270 pf=1 pmpp=0.92 kva=0.92 irradiance=1 temperature=25 %cutin=20 %cutout=20 effcurve=MyEff P-TCurve=MyPvsT Daily=IRRAD_DIA TDaily=TEMP_DIA
New PVSystem.GD_9deb8569cc3ff7c1809057decfd5089ecc1122c51a1668dbc399d3b88ea0249c_3 phases=1 bus1=2782482-10862992.3.4 conn=wye kv=0.1270 pf=1 pmpp=0.92 kva=0.92 irradiance=1 temperature=25 %cutin=20 %cutout=20 effcurve=MyEff P-TCurve=MyPvsT Daily=IRRAD_DIA TDaily=TEMP_DIA
New PVSystem.GD_4ecb98c1cea72cade43c4e8a8f3cfd9a2da5ca26bf4ecded4b758cffd336acde_1 phases=1 bus1=2204878-7497417v.1.4 conn=wye kv=0.1100 pf=1 pmpp=0.83 kva=0.83 irradiance=1 temperature=25 %cutin=20 %cutout=20 effcurve=MyEff P-TCurve=MyPvsT Daily=IRRAD_DIA TDaily=TEMP_DIA
New PVSystem.GD_4ecb98c1cea72cade43c4e8a8f3cfd9a2da5ca26bf4ecded4b758cffd336acde_2 phases=1 bus1=2204878-7497417v.2.4 conn=wye kv=0.1100 pf=1 pmpp=0.83 kva=0.83 irradiance=1 temperature=25 %cutin=20 %cutout=20 effcurve=MyEff P-TCurve=MyPvsT Daily=IRRAD_DIA TDaily=TEMP_DIA
New PVSystem.GD_614aa9a6a81ac68309a1bb214d1e69bef86603e08a7b1d03e67edb9f545bcef2_1 phases=1 bus1=2782458-10862893.1.4 conn=wye kv=0.1270 pf=1 pmpp=0.53 kva=0.53 irradiance=1 temperature=25 %cutin=20 %cutout=20 effcurve=MyEff P-TCurve=MyPvsT Daily=IRRAD_DIA TDaily=TEMP_DIA
New PVSystem.GD_614aa9a6a81ac68309a1bb214d1e69bef86603e08a7b1d03e67edb9f545bcef2_2 phases=1 bus1=2782458-10862893.2.4 conn=wye kv=0.1270 pf=1 pmpp=0.53 kva=0.53 irradiance=1 temperature=25 %cutin=20 %cutout=20 effcurve=MyEff P-TCurve=MyPvsT Daily=IRRAD_DIA TDaily=TEMP_DIA
New PVSystem.GD_614aa9a6a81ac68309a1bb214d1e69bef86603e08a7b1d03e67edb9f545bcef2_3 phases=1 bus1=2782458-10862893.3.4 conn=wye kv=0.1270 pf=1 pmpp=0.53 kva=0.53 irradiance=1 temperature=25 %cutin=20 %cutout=20 effcurve=MyEff P-TCurve=MyPvsT Daily=IRRAD_DIA TDaily=TEMP_DIA
New PVSystem.GD_82be3ea0414220a5988e40afc1603142e35006a0bbf44a9aafdd95bf054ba6d4_1 phases=1 bus1=2204888-7499134.1.4 conn=wye kv=0.1270 pf=1 pmpp=0.37 kva=0.37 irradiance=1 temperature=25 %cutin=20 %cutout=20 effcurve=MyEff P-TCurve=MyPvsT Daily=IRRAD_DIA TDaily=TEMP_DIA
New PVSystem.GD_82be3ea0414220a5988e40afc1603142e35006a0bbf44a9aafdd95bf054ba6d4_2 phases=1 bus1=2204888-7499134.2.4 conn=wye kv=0.1270 pf=1 pmpp=0.37 kva=0.37 irradiance=1 temperature=25 %cutin=20 %cutout=20 effcurve=MyEff P-TCurve=MyPvsT Daily=IRRAD_DIA TDaily=TEMP_DIA
New PVSystem.GD_82be3ea0414220a5988e40afc1603142e35006a0bbf44a9aafdd95bf054ba6d4_3 phases=1 bus1=2204888-7499134.3.4 conn=wye kv=0.1270 pf=1 pmpp=0.37 kva=0.37 irradiance=1 temperature=25 %cutin=20 %cutout=20 effcurve=MyEff P-TCurve=MyPvsT Daily=IRRAD_DIA TDaily=TEMP_DIA
New PVSystem.GD_1702f0aefd9b18c2b1c5974fd5032f530563002ca8c69e2b03ce9f29a29cb7aa_1 phases=1 bus1=2782839-12866941.1.4 conn=wye kv=0.1100 pf=1 pmpp=2.42 kva=2.42 irradiance=1 temperature=25 %cutin=20 %cutout=20 effcurve=MyEff P-TCurve=MyPvsT Daily=IRRAD_DIA TDaily=TEMP_DIA
New PVSystem.GD_1702f0aefd9b18c2b1c5974fd5032f530563002ca8c69e2b03ce9f29a29cb7aa_2 phases=1 bus1=2782839-12866941.2.4 conn=wye kv=0.1100 pf=1 pmpp=2.42 kva=2.42 irradiance=1 temperature=25 %cutin=20 %cutout=20 effcurve=MyEff P-TCurve=MyPvsT Daily=IRRAD_DIA TDaily=TEMP_DIA
New PVSystem.GD_9630f90efe88d9c6e7e4302f6f67eae43766b26fb33c3922cefba84e6f1124b6_1 phases=1 bus1=2782951-10867795.1.4 conn=wye kv=0.1100 pf=1 pmpp=1.28 kva=1.28 irradiance=1 temperature=25 %cutin=20 %cutout=20 effcurve=MyEff P-TCurve=MyPvsT Daily=IRRAD_DIA TDaily=TEMP_DIA
New PVSystem.GD_9630f90efe88d9c6e7e4302f6f67eae43766b26fb33c3922cefba84e6f1124b6_2 phases=1 bus1=2782951-10867795.2.4 conn=wye kv=0.1100 pf=1 pmpp=1.28 kva=1.28 irradiance=1 temperature=25 %cutin=20 %cutout=20 effcurve=MyEff P-TCurve=MyPvsT Daily=IRRAD_DIA TDaily=TEMP_DIA
New PVSystem.GD_e19bbcdfa4d297588a6023180f2edc34c09dbac97c3384f8a26433c91d58f167_1 phases=1 bus1=2782494-10863276.1.4 conn=wye kv=0.1270 pf=1 pmpp=0.98 kva=0.98 irradiance=1 temperature=25 %cutin=20 %cutout=20 effcurve=MyEff P-TCurve=MyPvsT Daily=IRRAD_DIA TDaily=TEMP_DIA
New PVSystem.GD_e19bbcdfa4d297588a6023180f2edc34c09dbac97c3384f8a26433c91d58f167_2 phases=1 bus1=2782494-10863276.2.4 conn=wye kv=0.1270 pf=1 pmpp=0.98 kva=0.98 irradiance=1 temperature=25 %cutin=20 %cutout=20 effcurve=MyEff P-TCurve=MyPvsT Daily=IRRAD_DIA TDaily=TEMP_DIA
New PVSystem.GD_e19bbcdfa4d297588a6023180f2edc34c09dbac97c3384f8a26433c91d58f167_3 phases=1 bus1=2782494-10863276.3.4 conn=wye kv=0.1270 pf=1 pmpp=0.98 kva=0.98 irradiance=1 temperature=25 %cutin=20 %cutout=20 effcurve=MyEff P-TCurve=MyPvsT Daily=IRRAD_DIA TDaily=TEMP_DIA
New PVSystem.GD_7df81c1e0cf660d0323d38fbc01622703833b6f88d24681f4790e9a183e8be61_1 phases=1 bus1=2782511-10863265.1.4 conn=wye kv=0.1270 pf=1 pmpp=1.32 kva=1.32 irradiance=1 temperature=25 %cutin=20 %cutout=20 effcurve=MyEff P-TCurve=MyPvsT Daily=IRRAD_DIA TDaily=TEMP_DIA
New PVSystem.GD_7df81c1e0cf660d0323d38fbc01622703833b6f88d24681f4790e9a183e8be61_2 phases=1 bus1=2782511-10863265.2.4 conn=wye kv=0.1270 pf=1 pmpp=1.32 kva=1.32 irradiance=1 temperature=25 %cutin=20 %cutout=20 effcurve=MyEff P-TCurve=MyPvsT Daily=IRRAD_DIA TDaily=TEMP_DIA
New PVSystem.GD_7df81c1e0cf660d0323d38fbc01622703833b6f88d24681f4790e9a183e8be61_3 phases=1 bus1=2782511-10863265.3.4 conn=wye kv=0.1270 pf=1 pmpp=1.32 kva=1.32 irradiance=1 temperature=25 %cutin=20 %cutout=20 effcurve=MyEff P-TCurve=MyPvsT Daily=IRRAD_DIA TDaily=TEMP_DIA
New PVSystem.GD_880d136f8f7cb6b887380ed0a3662980f1fce4e0b54fee70b8aff3097e2910ed_1 phases=1 bus1=2782511-10863265.1.4 conn=wye kv=0.1270 pf=1 pmpp=0.92 kva=0.92 irradiance=1 temperature=25 %cutin=20 %cutout=20 effcurve=MyEff P-TCurve=MyPvsT Daily=IRRAD_DIA TDaily=TEMP_DIA
New PVSystem.GD_880d136f8f7cb6b887380ed0a3662980f1fce4e0b54fee70b8aff3097e2910ed_2 phases=1 bus1=2782511-10863265.2.4 conn=wye kv=0.1270 pf=1 pmpp=0.92 kva=0.92 irradiance=1 temperature=25 %cutin=20 %cutout=20 effcurve=MyEff P-TCurve=MyPvsT Daily=IRRAD_DIA TDaily=TEMP_DIA
New PVSystem.GD_880d136f8f7cb6b887380ed0a3662980f1fce4e0b54fee70b8aff3097e2910ed_3 phases=1 bus1=2782511-10863265.3.4 conn=wye kv=0.1270 pf=1 pmpp=0.92 kva=0.92 irradiance=1 temperature=25 %cutin=20 %cutout=20 effcurve=MyEff P-TCurve=MyPvsT Daily=IRRAD_DIA TDaily=TEMP_DIA
New PVSystem.GD_2b1e86689b45939930e12b546a706efa2c10bc510afc474c14825c56de671c6a_1 phases=1 bus1=2782477-10863493.1.4 conn=wye kv=0.1270 pf=1 pmpp=0.36 kva=0.36 irradiance=1 temperature=25 %cutin=20 %cutout=20 effcurve=MyEff P-TCurve=MyPvsT Daily=IRRAD_DIA TDaily=TEMP_DIA
New PVSystem.GD_2b1e86689b45939930e12b546a706efa2c10bc510afc474c14825c56de671c6a_2 phases=1 bus1=2782477-10863493.2.4 conn=wye kv=0.1270 pf=1 pmpp=0.36 kva=0.36 irradiance=1 temperature=25 %cutin=20 %cutout=20 effcurve=MyEff P-TCurve=MyPvsT Daily=IRRAD_DIA TDaily=TEMP_DIA
New PVSystem.GD_2b1e86689b45939930e12b546a706efa2c10bc510afc474c14825c56de671c6a_3 phases=1 bus1=2782477-10863493.3.4 conn=wye kv=0.1270 pf=1 pmpp=0.36 kva=0.36 irradiance=1 temperature=25 %cutin=20 %cutout=20 effcurve=MyEff P-TCurve=MyPvsT Daily=IRRAD_DIA TDaily=TEMP_DIA
New PVSystem.GD_9418ab9798fb55a0e4634a3738dbaf7ebd89668050d93433e1fd28dc9b3e8126_1 phases=1 bus1=2782483-10863278v.1.4 conn=wye kv=0.1100 pf=1 pmpp=3.46 kva=3.46 irradiance=1 temperature=25 %cutin=20 %cutout=20 effcurve=MyEff P-TCurve=MyPvsT Daily=IRRAD_DIA TDaily=TEMP_DIA
New PVSystem.GD_9418ab9798fb55a0e4634a3738dbaf7ebd89668050d93433e1fd28dc9b3e8126_2 phases=1 bus1=2782483-10863278v.2.4 conn=wye kv=0.1100 pf=1 pmpp=3.46 kva=3.46 irradiance=1 temperature=25 %cutin=20 %cutout=20 effcurve=MyEff P-TCurve=MyPvsT Daily=IRRAD_DIA TDaily=TEMP_DIA
New PVSystem.GD_8d9ed93e69737d907b64239f400c4276973c791388c57dfa7d963ddd605ac40a_1 phases=1 bus1=2783137-10865396.1.4 conn=wye kv=0.1100 pf=1 pmpp=1.40 kva=1.40 irradiance=1 temperature=25 %cutin=20 %cutout=20 effcurve=MyEff P-TCurve=MyPvsT Daily=IRRAD_DIA TDaily=TEMP_DIA
New PVSystem.GD_8d9ed93e69737d907b64239f400c4276973c791388c57dfa7d963ddd605ac40a_2 phases=1 bus1=2783137-10865396.2.4 conn=wye kv=0.1100 pf=1 pmpp=1.40 kva=1.40 irradiance=1 temperature=25 %cutin=20 %cutout=20 effcurve=MyEff P-TCurve=MyPvsT Daily=IRRAD_DIA TDaily=TEMP_DIA
New PVSystem.GD_d26c31075705c580f80937c2b07b34c468e3ccaa73eac48d8c9bf71fc8d6fce1_1 phases=1 bus1=2783137-10865396.1.4 conn=wye kv=0.1100 pf=1 pmpp=1.35 kva=1.35 irradiance=1 temperature=25 %cutin=20 %cutout=20 effcurve=MyEff P-TCurve=MyPvsT Daily=IRRAD_DIA TDaily=TEMP_DIA
New PVSystem.GD_d26c31075705c580f80937c2b07b34c468e3ccaa73eac48d8c9bf71fc8d6fce1_2 phases=1 bus1=2783137-10865396.2.4 conn=wye kv=0.1100 pf=1 pmpp=1.35 kva=1.35 irradiance=1 temperature=25 %cutin=20 %cutout=20 effcurve=MyEff P-TCurve=MyPvsT Daily=IRRAD_DIA TDaily=TEMP_DIA
New PVSystem.GD_62eb3fa0f561888543969e5d9da72d3ccfde5479fb924d68102457ad986bb4e3_1 phases=1 bus1=2205111-7498600v.1.4 conn=wye kv=0.1100 pf=1 pmpp=2.99 kva=2.99 irradiance=1 temperature=25 %cutin=20 %cutout=20 effcurve=MyEff P-TCurve=MyPvsT Daily=IRRAD_DIA TDaily=TEMP_DIA
New PVSystem.GD_62eb3fa0f561888543969e5d9da72d3ccfde5479fb924d68102457ad986bb4e3_2 phases=1 bus1=2205111-7498600v.2.4 conn=wye kv=0.1100 pf=1 pmpp=2.99 kva=2.99 irradiance=1 temperature=25 %cutin=20 %cutout=20 effcurve=MyEff P-TCurve=MyPvsT Daily=IRRAD_DIA TDaily=TEMP_DIA
New PVSystem.GD_5827aa317b5b01118293acc728d6bb7d98919f66bee63160ce270d63600220ae_1 phases=1 bus1=2782534-10862809.1.4 conn=wye kv=0.1270 pf=1 pmpp=1.14 kva=1.14 irradiance=1 temperature=25 %cutin=20 %cutout=20 effcurve=MyEff P-TCurve=MyPvsT Daily=IRRAD_DIA TDaily=TEMP_DIA
New PVSystem.GD_5827aa317b5b01118293acc728d6bb7d98919f66bee63160ce270d63600220ae_2 phases=1 bus1=2782534-10862809.2.4 conn=wye kv=0.1270 pf=1 pmpp=1.14 kva=1.14 irradiance=1 temperature=25 %cutin=20 %cutout=20 effcurve=MyEff P-TCurve=MyPvsT Daily=IRRAD_DIA TDaily=TEMP_DIA
New PVSystem.GD_5827aa317b5b01118293acc728d6bb7d98919f66bee63160ce270d63600220ae_3 phases=1 bus1=2782534-10862809.3.4 conn=wye kv=0.1270 pf=1 pmpp=1.14 kva=1.14 irradiance=1 temperature=25 %cutin=20 %cutout=20 effcurve=MyEff P-TCurve=MyPvsT Daily=IRRAD_DIA TDaily=TEMP_DIA
New PVSystem.GD_c96387b5de661ffaf8210aced9a9484f6b27ba40907edebea9906b2cb1dd4001_1 phases=1 bus1=2782534-10862809.1.4 conn=wye kv=0.1270 pf=1 pmpp=2.45 kva=2.45 irradiance=1 temperature=25 %cutin=20 %cutout=20 effcurve=MyEff P-TCurve=MyPvsT Daily=IRRAD_DIA TDaily=TEMP_DIA
New PVSystem.GD_c96387b5de661ffaf8210aced9a9484f6b27ba40907edebea9906b2cb1dd4001_2 phases=1 bus1=2782534-10862809.2.4 conn=wye kv=0.1270 pf=1 pmpp=2.45 kva=2.45 irradiance=1 temperature=25 %cutin=20 %cutout=20 effcurve=MyEff P-TCurve=MyPvsT Daily=IRRAD_DIA TDaily=TEMP_DIA
New PVSystem.GD_c96387b5de661ffaf8210aced9a9484f6b27ba40907edebea9906b2cb1dd4001_3 phases=1 bus1=2782534-10862809.3.4 conn=wye kv=0.1270 pf=1 pmpp=2.45 kva=2.45 irradiance=1 temperature=25 %cutin=20 %cutout=20 effcurve=MyEff P-TCurve=MyPvsT Daily=IRRAD_DIA TDaily=TEMP_DIA
New PVSystem.GD_fad2ada4a700778d7d97dfe50d686df4cb3611c777fabc4f28e42090bff5a5f9_1 phases=1 bus1=3177765-12874947.1.4 conn=wye kv=0.1270 pf=1 pmpp=6.56 kva=6.56 irradiance=1 temperature=25 %cutin=20 %cutout=20 effcurve=MyEff P-TCurve=MyPvsT Daily=IRRAD_DIA TDaily=TEMP_DIA
New PVSystem.GD_fad2ada4a700778d7d97dfe50d686df4cb3611c777fabc4f28e42090bff5a5f9_2 phases=1 bus1=3177765-12874947.2.4 conn=wye kv=0.1270 pf=1 pmpp=6.56 kva=6.56 irradiance=1 temperature=25 %cutin=20 %cutout=20 effcurve=MyEff P-TCurve=MyPvsT Daily=IRRAD_DIA TDaily=TEMP_DIA
New PVSystem.GD_fad2ada4a700778d7d97dfe50d686df4cb3611c777fabc4f28e42090bff5a5f9_3 phases=1 bus1=3177765-12874947.3.4 conn=wye kv=0.1270 pf=1 pmpp=6.56 kva=6.56 irradiance=1 temperature=25 %cutin=20 %cutout=20 effcurve=MyEff P-TCurve=MyPvsT Daily=IRRAD_DIA TDaily=TEMP_DIA
New PVSystem.GD_9f7ea73ec9bfb31d2e8cd6f3966e628d0fbfa512e776d2705206463080b36af7_1 phases=1 bus1=2858361-11315546v.1.4 conn=wye kv=0.1100 pf=1 pmpp=2.50 kva=2.50 irradiance=1 temperature=25 %cutin=20 %cutout=20 effcurve=MyEff P-TCurve=MyPvsT Daily=IRRAD_DIA TDaily=TEMP_DIA
New PVSystem.GD_9f7ea73ec9bfb31d2e8cd6f3966e628d0fbfa512e776d2705206463080b36af7_2 phases=1 bus1=2858361-11315546v.2.4 conn=wye kv=0.1100 pf=1 pmpp=2.50 kva=2.50 irradiance=1 temperature=25 %cutin=20 %cutout=20 effcurve=MyEff P-TCurve=MyPvsT Daily=IRRAD_DIA TDaily=TEMP_DIA
New PVSystem.GD_034d86466f85960042bbd1e617ad7bd8811d43d4ff8664ff8c8e51b5084e64c0_1 phases=1 bus1=2204713-7497414v.1.4 conn=wye kv=0.1100 pf=1 pmpp=0.28 kva=0.28 irradiance=1 temperature=25 %cutin=20 %cutout=20 effcurve=MyEff P-TCurve=MyPvsT Daily=IRRAD_DIA TDaily=TEMP_DIA
New PVSystem.GD_034d86466f85960042bbd1e617ad7bd8811d43d4ff8664ff8c8e51b5084e64c0_2 phases=1 bus1=2204713-7497414v.2.4 conn=wye kv=0.1100 pf=1 pmpp=0.28 kva=0.28 irradiance=1 temperature=25 %cutin=20 %cutout=20 effcurve=MyEff P-TCurve=MyPvsT Daily=IRRAD_DIA TDaily=TEMP_DIA
New PVSystem.GD_b585e05ed2b5b4e998f8f1ff7bbdf46d0c7472601cf6f4e2f279af4d24bfb582_1 phases=1 bus1=2782457-10863573.1.4 conn=wye kv=0.1270 pf=1 pmpp=1.11 kva=1.11 irradiance=1 temperature=25 %cutin=20 %cutout=20 effcurve=MyEff P-TCurve=MyPvsT Daily=IRRAD_DIA TDaily=TEMP_DIA
New PVSystem.GD_b585e05ed2b5b4e998f8f1ff7bbdf46d0c7472601cf6f4e2f279af4d24bfb582_2 phases=1 bus1=2782457-10863573.2.4 conn=wye kv=0.1270 pf=1 pmpp=1.11 kva=1.11 irradiance=1 temperature=25 %cutin=20 %cutout=20 effcurve=MyEff P-TCurve=MyPvsT Daily=IRRAD_DIA TDaily=TEMP_DIA
New PVSystem.GD_b585e05ed2b5b4e998f8f1ff7bbdf46d0c7472601cf6f4e2f279af4d24bfb582_3 phases=1 bus1=2782457-10863573.3.4 conn=wye kv=0.1270 pf=1 pmpp=1.11 kva=1.11 irradiance=1 temperature=25 %cutin=20 %cutout=20 effcurve=MyEff P-TCurve=MyPvsT Daily=IRRAD_DIA TDaily=TEMP_DIA
New PVSystem.GD_a2760b9540b6fcc4b2ce0f1f7e1fa4677ffa0f3205c542715331e7ed42bfe76f_1 phases=1 bus1=2782457-10863573.1.4 conn=wye kv=0.1270 pf=1 pmpp=0.83 kva=0.83 irradiance=1 temperature=25 %cutin=20 %cutout=20 effcurve=MyEff P-TCurve=MyPvsT Daily=IRRAD_DIA TDaily=TEMP_DIA
New PVSystem.GD_a2760b9540b6fcc4b2ce0f1f7e1fa4677ffa0f3205c542715331e7ed42bfe76f_2 phases=1 bus1=2782457-10863573.2.4 conn=wye kv=0.1270 pf=1 pmpp=0.83 kva=0.83 irradiance=1 temperature=25 %cutin=20 %cutout=20 effcurve=MyEff P-TCurve=MyPvsT Daily=IRRAD_DIA TDaily=TEMP_DIA
New PVSystem.GD_a2760b9540b6fcc4b2ce0f1f7e1fa4677ffa0f3205c542715331e7ed42bfe76f_3 phases=1 bus1=2782457-10863573.3.4 conn=wye kv=0.1270 pf=1 pmpp=0.83 kva=0.83 irradiance=1 temperature=25 %cutin=20 %cutout=20 effcurve=MyEff P-TCurve=MyPvsT Daily=IRRAD_DIA TDaily=TEMP_DIA
New PVSystem.GD_2b9b3cab730b40a145913ef6982680cfe4c023162d06bd5f5b7815a6770d34d7_1 phases=1 bus1=2783039-12866938.1.4 conn=wye kv=0.1100 pf=1 pmpp=1.45 kva=1.45 irradiance=1 temperature=25 %cutin=20 %cutout=20 effcurve=MyEff P-TCurve=MyPvsT Daily=IRRAD_DIA TDaily=TEMP_DIA
New PVSystem.GD_2b9b3cab730b40a145913ef6982680cfe4c023162d06bd5f5b7815a6770d34d7_2 phases=1 bus1=2783039-12866938.2.4 conn=wye kv=0.1100 pf=1 pmpp=1.45 kva=1.45 irradiance=1 temperature=25 %cutin=20 %cutout=20 effcurve=MyEff P-TCurve=MyPvsT Daily=IRRAD_DIA TDaily=TEMP_DIA
New PVSystem.GD_d800a46da00123a10797c54ecbcd6340ed68f7989b53be253e5adb3da50789ce_1 phases=1 bus1=2204887-7497934.1.4 conn=wye kv=0.1270 pf=1 pmpp=0.61 kva=0.61 irradiance=1 temperature=25 %cutin=20 %cutout=20 effcurve=MyEff P-TCurve=MyPvsT Daily=IRRAD_DIA TDaily=TEMP_DIA
New PVSystem.GD_d800a46da00123a10797c54ecbcd6340ed68f7989b53be253e5adb3da50789ce_2 phases=1 bus1=2204887-7497934.2.4 conn=wye kv=0.1270 pf=1 pmpp=0.61 kva=0.61 irradiance=1 temperature=25 %cutin=20 %cutout=20 effcurve=MyEff P-TCurve=MyPvsT Daily=IRRAD_DIA TDaily=TEMP_DIA
New PVSystem.GD_d800a46da00123a10797c54ecbcd6340ed68f7989b53be253e5adb3da50789ce_3 phases=1 bus1=2204887-7497934.3.4 conn=wye kv=0.1270 pf=1 pmpp=0.61 kva=0.61 irradiance=1 temperature=25 %cutin=20 %cutout=20 effcurve=MyEff P-TCurve=MyPvsT Daily=IRRAD_DIA TDaily=TEMP_DIA
New PVSystem.GD_e2295f665d559f1f6f6cebee4963abdcfe6ff398b1e7388934d8747d038e5b59_1 phases=1 bus1=3088509-12272664v.1.4 conn=wye kv=0.1100 pf=1 pmpp=2.50 kva=2.50 irradiance=1 temperature=25 %cutin=20 %cutout=20 effcurve=MyEff P-TCurve=MyPvsT Daily=IRRAD_DIA TDaily=TEMP_DIA
New PVSystem.GD_e2295f665d559f1f6f6cebee4963abdcfe6ff398b1e7388934d8747d038e5b59_2 phases=1 bus1=3088509-12272664v.2.4 conn=wye kv=0.1100 pf=1 pmpp=2.50 kva=2.50 irradiance=1 temperature=25 %cutin=20 %cutout=20 effcurve=MyEff P-TCurve=MyPvsT Daily=IRRAD_DIA TDaily=TEMP_DIA
New PVSystem.GD_37262d064ecd3eaddb5ed2b46c0d7b669e2b9f6b823e88adb0dd1f427f6f4ebb_1 phases=1 bus1=2782495-10862945.1.4 conn=wye kv=0.1270 pf=1 pmpp=0.91 kva=0.91 irradiance=1 temperature=25 %cutin=20 %cutout=20 effcurve=MyEff P-TCurve=MyPvsT Daily=IRRAD_DIA TDaily=TEMP_DIA
New PVSystem.GD_37262d064ecd3eaddb5ed2b46c0d7b669e2b9f6b823e88adb0dd1f427f6f4ebb_2 phases=1 bus1=2782495-10862945.2.4 conn=wye kv=0.1270 pf=1 pmpp=0.91 kva=0.91 irradiance=1 temperature=25 %cutin=20 %cutout=20 effcurve=MyEff P-TCurve=MyPvsT Daily=IRRAD_DIA TDaily=TEMP_DIA
New PVSystem.GD_37262d064ecd3eaddb5ed2b46c0d7b669e2b9f6b823e88adb0dd1f427f6f4ebb_3 phases=1 bus1=2782495-10862945.3.4 conn=wye kv=0.1270 pf=1 pmpp=0.91 kva=0.91 irradiance=1 temperature=25 %cutin=20 %cutout=20 effcurve=MyEff P-TCurve=MyPvsT Daily=IRRAD_DIA TDaily=TEMP_DIA
New PVSystem.GD_134ef887bc634be3f8640253a09b8c5342ab48f25ee2969087a93346543ba599_1 phases=1 bus1=2858422-11315773v.1.4 conn=wye kv=0.1100 pf=1 pmpp=1.54 kva=1.54 irradiance=1 temperature=25 %cutin=20 %cutout=20 effcurve=MyEff P-TCurve=MyPvsT Daily=IRRAD_DIA TDaily=TEMP_DIA
New PVSystem.GD_134ef887bc634be3f8640253a09b8c5342ab48f25ee2969087a93346543ba599_2 phases=1 bus1=2858422-11315773v.2.4 conn=wye kv=0.1100 pf=1 pmpp=1.54 kva=1.54 irradiance=1 temperature=25 %cutin=20 %cutout=20 effcurve=MyEff P-TCurve=MyPvsT Daily=IRRAD_DIA TDaily=TEMP_DIA
New PVSystem.GD_950c76d1827f1d8135147cf2466ffa2255cb11c9a6dd8988a9f2bf4d7dc417a5_1 phases=1 bus1=2782687-10864801v.1.4 conn=wye kv=0.1100 pf=1 pmpp=1.03 kva=1.03 irradiance=1 temperature=25 %cutin=20 %cutout=20 effcurve=MyEff P-TCurve=MyPvsT Daily=IRRAD_DIA TDaily=TEMP_DIA
New PVSystem.GD_950c76d1827f1d8135147cf2466ffa2255cb11c9a6dd8988a9f2bf4d7dc417a5_2 phases=1 bus1=2782687-10864801v.2.4 conn=wye kv=0.1100 pf=1 pmpp=1.03 kva=1.03 irradiance=1 temperature=25 %cutin=20 %cutout=20 effcurve=MyEff P-TCurve=MyPvsT Daily=IRRAD_DIA TDaily=TEMP_DIA
New PVSystem.GD_bb1f3f1831239b6a472d438e98d42a300f996f067c7272cff595cf92629893b9_1 phases=1 bus1=3186968-10867063.1.4 conn=wye kv=0.1270 pf=1 pmpp=6.53 kva=6.53 irradiance=1 temperature=25 %cutin=20 %cutout=20 effcurve=MyEff P-TCurve=MyPvsT Daily=IRRAD_DIA TDaily=TEMP_DIA
New PVSystem.GD_bb1f3f1831239b6a472d438e98d42a300f996f067c7272cff595cf92629893b9_2 phases=1 bus1=3186968-10867063.2.4 conn=wye kv=0.1270 pf=1 pmpp=6.53 kva=6.53 irradiance=1 temperature=25 %cutin=20 %cutout=20 effcurve=MyEff P-TCurve=MyPvsT Daily=IRRAD_DIA TDaily=TEMP_DIA
New PVSystem.GD_bb1f3f1831239b6a472d438e98d42a300f996f067c7272cff595cf92629893b9_3 phases=1 bus1=3186968-10867063.3.4 conn=wye kv=0.1270 pf=1 pmpp=6.53 kva=6.53 irradiance=1 temperature=25 %cutin=20 %cutout=20 effcurve=MyEff P-TCurve=MyPvsT Daily=IRRAD_DIA TDaily=TEMP_DIA
New PVSystem.GD_8debf3989f0a10805d7ffdf986471fe2f634096663bee35dc81dcc946fcb2dba_1 phases=1 bus1=2782690-10864728v.1.4 conn=wye kv=0.1100 pf=1 pmpp=2.47 kva=2.47 irradiance=1 temperature=25 %cutin=20 %cutout=20 effcurve=MyEff P-TCurve=MyPvsT Daily=IRRAD_DIA TDaily=TEMP_DIA
New PVSystem.GD_8debf3989f0a10805d7ffdf986471fe2f634096663bee35dc81dcc946fcb2dba_2 phases=1 bus1=2782690-10864728v.2.4 conn=wye kv=0.1100 pf=1 pmpp=2.47 kva=2.47 irradiance=1 temperature=25 %cutin=20 %cutout=20 effcurve=MyEff P-TCurve=MyPvsT Daily=IRRAD_DIA TDaily=TEMP_DIA
New PVSystem.GD_f5b8b7c65c515373cdb6cbe915b8a2c2f2440f94cd37e3b29729d5f31aed7eaf_1 phases=1 bus1=2782487-10863577.1.4 conn=wye kv=0.1270 pf=1 pmpp=1.74 kva=1.74 irradiance=1 temperature=25 %cutin=20 %cutout=20 effcurve=MyEff P-TCurve=MyPvsT Daily=IRRAD_DIA TDaily=TEMP_DIA
New PVSystem.GD_f5b8b7c65c515373cdb6cbe915b8a2c2f2440f94cd37e3b29729d5f31aed7eaf_2 phases=1 bus1=2782487-10863577.2.4 conn=wye kv=0.1270 pf=1 pmpp=1.74 kva=1.74 irradiance=1 temperature=25 %cutin=20 %cutout=20 effcurve=MyEff P-TCurve=MyPvsT Daily=IRRAD_DIA TDaily=TEMP_DIA
New PVSystem.GD_f5b8b7c65c515373cdb6cbe915b8a2c2f2440f94cd37e3b29729d5f31aed7eaf_3 phases=1 bus1=2782487-10863577.3.4 conn=wye kv=0.1270 pf=1 pmpp=1.74 kva=1.74 irradiance=1 temperature=25 %cutin=20 %cutout=20 effcurve=MyEff P-TCurve=MyPvsT Daily=IRRAD_DIA TDaily=TEMP_DIA
New PVSystem.GD_6d75f19eb4e8fa277daada6ed1ea9ecc2ecabd241581763bae0e2847d0e32e96_1 phases=1 bus1=2782487-10863577.1.4 conn=wye kv=0.1270 pf=1 pmpp=1.74 kva=1.74 irradiance=1 temperature=25 %cutin=20 %cutout=20 effcurve=MyEff P-TCurve=MyPvsT Daily=IRRAD_DIA TDaily=TEMP_DIA
New PVSystem.GD_6d75f19eb4e8fa277daada6ed1ea9ecc2ecabd241581763bae0e2847d0e32e96_2 phases=1 bus1=2782487-10863577.2.4 conn=wye kv=0.1270 pf=1 pmpp=1.74 kva=1.74 irradiance=1 temperature=25 %cutin=20 %cutout=20 effcurve=MyEff P-TCurve=MyPvsT Daily=IRRAD_DIA TDaily=TEMP_DIA
New PVSystem.GD_6d75f19eb4e8fa277daada6ed1ea9ecc2ecabd241581763bae0e2847d0e32e96_3 phases=1 bus1=2782487-10863577.3.4 conn=wye kv=0.1270 pf=1 pmpp=1.74 kva=1.74 irradiance=1 temperature=25 %cutin=20 %cutout=20 effcurve=MyEff P-TCurve=MyPvsT Daily=IRRAD_DIA TDaily=TEMP_DIA
New PVSystem.GD_a3c10c3fef91bd484a3b760f59a622b2c96d224c3ab61bda29dc4ff41145faf6_1 phases=1 bus1=2204751-7499557v.1.4 conn=wye kv=0.1100 pf=1 pmpp=3.10 kva=3.10 irradiance=1 temperature=25 %cutin=20 %cutout=20 effcurve=MyEff P-TCurve=MyPvsT Daily=IRRAD_DIA TDaily=TEMP_DIA
New PVSystem.GD_a3c10c3fef91bd484a3b760f59a622b2c96d224c3ab61bda29dc4ff41145faf6_2 phases=1 bus1=2204751-7499557v.2.4 conn=wye kv=0.1100 pf=1 pmpp=3.10 kva=3.10 irradiance=1 temperature=25 %cutin=20 %cutout=20 effcurve=MyEff P-TCurve=MyPvsT Daily=IRRAD_DIA TDaily=TEMP_DIA
New PVSystem.GD_3231069efa7ae31df7b9273908d484bc8efadcd5d681ce0d10923e110211538f_1 phases=1 bus1=2783147-10868275.1.4 conn=wye kv=0.1270 pf=1 pmpp=1.28 kva=1.28 irradiance=1 temperature=25 %cutin=20 %cutout=20 effcurve=MyEff P-TCurve=MyPvsT Daily=IRRAD_DIA TDaily=TEMP_DIA
New PVSystem.GD_3231069efa7ae31df7b9273908d484bc8efadcd5d681ce0d10923e110211538f_2 phases=1 bus1=2783147-10868275.2.4 conn=wye kv=0.1270 pf=1 pmpp=1.28 kva=1.28 irradiance=1 temperature=25 %cutin=20 %cutout=20 effcurve=MyEff P-TCurve=MyPvsT Daily=IRRAD_DIA TDaily=TEMP_DIA
New PVSystem.GD_3231069efa7ae31df7b9273908d484bc8efadcd5d681ce0d10923e110211538f_3 phases=1 bus1=2783147-10868275.3.4 conn=wye kv=0.1270 pf=1 pmpp=1.28 kva=1.28 irradiance=1 temperature=25 %cutin=20 %cutout=20 effcurve=MyEff P-TCurve=MyPvsT Daily=IRRAD_DIA TDaily=TEMP_DIA
New PVSystem.GD_19ea2ae48c1922514d11f1a6e5b73ee56c1e23ec28a9d3f6963bf113fe1a4a81_1 phases=1 bus1=2885930-11355858v.1.4 conn=wye kv=0.1100 pf=1 pmpp=0.99 kva=0.99 irradiance=1 temperature=25 %cutin=20 %cutout=20 effcurve=MyEff P-TCurve=MyPvsT Daily=IRRAD_DIA TDaily=TEMP_DIA
New PVSystem.GD_19ea2ae48c1922514d11f1a6e5b73ee56c1e23ec28a9d3f6963bf113fe1a4a81_2 phases=1 bus1=2885930-11355858v.2.4 conn=wye kv=0.1100 pf=1 pmpp=0.99 kva=0.99 irradiance=1 temperature=25 %cutin=20 %cutout=20 effcurve=MyEff P-TCurve=MyPvsT Daily=IRRAD_DIA TDaily=TEMP_DIA
New PVSystem.GD_8872926b9da90d7458abc153a76a0797750cfb4a65c1a130b19a5aaabf169b88_1 phases=1 bus1=2782918-11308409.1.4 conn=wye kv=0.1100 pf=1 pmpp=0.95 kva=0.95 irradiance=1 temperature=25 %cutin=20 %cutout=20 effcurve=MyEff P-TCurve=MyPvsT Daily=IRRAD_DIA TDaily=TEMP_DIA
New PVSystem.GD_8872926b9da90d7458abc153a76a0797750cfb4a65c1a130b19a5aaabf169b88_2 phases=1 bus1=2782918-11308409.2.4 conn=wye kv=0.1100 pf=1 pmpp=0.95 kva=0.95 irradiance=1 temperature=25 %cutin=20 %cutout=20 effcurve=MyEff P-TCurve=MyPvsT Daily=IRRAD_DIA TDaily=TEMP_DIA
New PVSystem.GD_8ce538f42866833803b45d4f51315dbb446749ba12fae539fc169b100e86f088_1 phases=1 bus1=2783005-10867444v.1.4 conn=wye kv=0.1100 pf=1 pmpp=4.70 kva=4.70 irradiance=1 temperature=25 %cutin=20 %cutout=20 effcurve=MyEff P-TCurve=MyPvsT Daily=IRRAD_DIA TDaily=TEMP_DIA
New PVSystem.GD_8ce538f42866833803b45d4f51315dbb446749ba12fae539fc169b100e86f088_2 phases=1 bus1=2783005-10867444v.2.4 conn=wye kv=0.1100 pf=1 pmpp=4.70 kva=4.70 irradiance=1 temperature=25 %cutin=20 %cutout=20 effcurve=MyEff P-TCurve=MyPvsT Daily=IRRAD_DIA TDaily=TEMP_DIA
New PVSystem.GD_283c0f57297f9fa9acf665e3ac01168b26246f3a4ea2bfa2c9765011b7c7f0eb_1 phases=1 bus1=2783111-10868279v.1.4 conn=wye kv=0.1100 pf=1 pmpp=1.09 kva=1.09 irradiance=1 temperature=25 %cutin=20 %cutout=20 effcurve=MyEff P-TCurve=MyPvsT Daily=IRRAD_DIA TDaily=TEMP_DIA
New PVSystem.GD_283c0f57297f9fa9acf665e3ac01168b26246f3a4ea2bfa2c9765011b7c7f0eb_2 phases=1 bus1=2783111-10868279v.2.4 conn=wye kv=0.1100 pf=1 pmpp=1.09 kva=1.09 irradiance=1 temperature=25 %cutin=20 %cutout=20 effcurve=MyEff P-TCurve=MyPvsT Daily=IRRAD_DIA TDaily=TEMP_DIA
