! ==========================================================
! VAOS DE SAIDA — barra de MT da SE -> cabeceira do alimentador
! Derivado de CTMT.BARR e CTMT.UNI_TR_AT: a BDGD nao modela o
! arranjo interno da subestacao, so o vinculo logico.
! Cada vao e o disjuntor de saida do alimentador.
! ==========================================================
New Line.VAO_CSOCO-01 phases=3 Bus1=cso01b1.1.2.3 Bus2=16087-10864488.1.2.3 Switch=y r1=0.0001 r0=0.0001 x1=0 x0=0 c1=0 c0=0
New Monitor.M_CSOCO-01 element=Line.VAO_CSOCO-01 terminal=1 mode=1 ppolar=no
New Line.VAO_CSOCO-02 phases=3 Bus1=cso01b1.1.2.3 Bus2=16085-10863597.1.2.3 Switch=y r1=0.0001 r0=0.0001 x1=0 x0=0 c1=0 c0=0
New Monitor.M_CSOCO-02 element=Line.VAO_CSOCO-02 terminal=1 mode=1 ppolar=no
