clear
set defaultbasefrequency=60

! ==========================================================================
!  MASTER-AT — subtransmissao com as subestacoes como carga equivalente
! ==========================================================================
!  8 subestacoes | 86 MW agregados
!
!  POR QUE ESTE MODELO EXISTE
!  --------------------------
!  O MASTER-GERAL junta tudo num arquivo so: 2,39 milhoes de elementos na
!  Enel SP, que nao cabem em 15,8 GB de RAM. Este aqui e a metade de cima da
!  decomposicao: a rede de AT inteira, com cada subestacao representada pela
!  demanda que ela de fato tem.
!
!  Sao ~19.500 elementos, menos de 1% do modelo monolitico, e por isso cabe
!  em qualquer maquina e continua cabendo em qualquer distribuidora — o porte
!  dele escala com a subtransmissao, nao com a concessao.
!
!  O QUE ELE MEDE, E QUE HOJE E SUPOSTO
!  ------------------------------------
!  A tensao na barra de MT de cada subestacao. Nos modelos por subestacao ela
!  e DECLARADA (CTMT.TEN_OPE, que na Enel SP e 1,09 em 1.586 dos 1.806
!  alimentadores) e nao calculada. Aqui ela sai do fluxo, com a impedancia da
!  malha de 88 kV e o carregamento dos transformadores de potencia.
!
!  A CARGA EQUIVALENTE E UMA PREMISSA, e esta declarada
!  ---------------------------------------------------
!  Cada subestacao vira uma carga de potencia constante na sua barra de MT.
!  Isso e exato para rede radial abaixo do transformador — que e o caso — a
!  menos do acoplamento: a demanda real depende da tensao, e a tensao depende
!  da demanda. O laco do `decompor.py` resolve isso iterando.
! ==========================================================================

redirect _AT/Fontes.dss
redirect _global/LineCodes.dss
redirect _global/Curvas.dss
redirect _global/_XYCURVES.dss
redirect _AT/Linhas_AT.dss
redirect _AT/Chaves_AT.dss
redirect _AT/Barras_AT.dss
redirect _AT/Trafos_AT.dss
redirect _AT/Cargas_AT.dss
redirect _AT/GD_AT.dss
redirect _AT/Capacitores_AT.dss

! ---------------------- subestacoes como carga equivalente
New Load.SE_ABA Bus1=aba09b1.1.2.3 Phases=3 Conn=wye Model=1 kV=34.5000 kW=33543.900 pf=0.92 Vminpu=0.5 Vmaxpu=1.5
New Load.SE_CAP Bus1=cap01b1.1.2.3 Phases=3 Conn=wye Model=1 kV=13.8000 kW=14482.900 pf=0.92 Vminpu=0.5 Vmaxpu=1.5
New Load.SE_CSO Bus1=cso01b1.1.2.3 Phases=3 Conn=wye Model=1 kV=13.8000 kW=3158.600 pf=0.92 Vminpu=0.5 Vmaxpu=1.5
New Load.SE_GOI Bus1=goi01b1.1.2.3 Phases=3 Conn=wye Model=1 kV=13.8000 kW=2165.500 pf=0.92 Vminpu=0.5 Vmaxpu=1.5
New Load.SE_MOL Bus1=mol01b1.1.2.3 Phases=3 Conn=wye Model=1 kV=13.8000 kW=4927.300 pf=0.92 Vminpu=0.5 Vmaxpu=1.5
New Load.SE_RIM Bus1=rim01b1_34p5kv.1.2.3 Phases=3 Conn=wye Model=1 kV=34.5000 kW=6755.000 pf=0.92 Vminpu=0.5 Vmaxpu=1.5
New Load.SE_TAI Bus1=tai01b1_34p5kv.1.2.3 Phases=3 Conn=wye Model=1 kV=34.5000 kW=9595.300 pf=0.92 Vminpu=0.5 Vmaxpu=1.5
New Load.SE_TUM Bus1=tum01b1_34p5kv.1.2.3 Phases=3 Conn=wye Model=1 kV=34.5000 kW=11175.800 pf=0.92 Vminpu=0.5 Vmaxpu=1.5

Set Voltagebases=[138 88 34.5 13.8 0.44 0.38 0.254 0.24 0.23 0.22 0.208]
CalcVoltagebases

Set maxcontroliter=200
Set maxiterations=100
Set controlmode=static

Set mode=snap
Solve
CalcVoltagebases
Solve
Buscoords _AT/BusCoords_AT.dat
