! ==========================================================
! VAOS DE SAIDA — barra de MT da SE -> cabeceira do alimentador
! Derivado de CTMT.BARR e CTMT.UNI_TR_AT: a BDGD nao modela o
! arranjo interno da subestacao, so o vinculo logico.
! Cada vao e o disjuntor de saida do alimentador.
! ==========================================================
New Line.VAO_MOL01C1 phases=3 Bus1=mol01b1.1.2.3 Bus2=25526-11901644.1.2.3 Switch=y r1=0.0001 r0=0.0001 x1=0 x0=0 c1=0 c0=0
New Monitor.M_MOL01C1 element=Line.VAO_MOL01C1 terminal=1 mode=1 ppolar=no
New Line.VAO_MOL01C2 phases=3 Bus1=mol01b1.1.2.3 Bus2=25527-11901641.1.2.3 Switch=y r1=0.0001 r0=0.0001 x1=0 x0=0 c1=0 c0=0
New Monitor.M_MOL01C2 element=Line.VAO_MOL01C2 terminal=1 mode=1 ppolar=no
