! CAPACITORES — gerados de UNCRMT
! Emitidos como banco FIXO. A BDGD nao traz o ajuste do CapControl;
! se houver controle em campo, incluir CapControl aqui.
! 0 bancos descartados por PAC ausente da rede.
New Capacitor.3101304 Bus1=12779-8041794.1.2.3 Phases=3 Conn=wye kV=13.8 kvar=6.0
New Capacitor.2958735 Bus1=18422-8075467.1.2.3 Phases=3 Conn=wye kV=13.8 kvar=6.0
New Capacitor.3058720 Bus1=18422-8076565.1.2.3 Phases=3 Conn=wye kV=13.8 kvar=10.0
New Capacitor.2994683 Bus1=16307-11089759.1.2.3 Phases=3 Conn=wye kV=13.8 kvar=10.0
New Capacitor.2995484 Bus1=21682-11701494.1.2.3 Phases=3 Conn=wye kV=13.8 kvar=10.0
New Capacitor.3129852 Bus1=12786-12738312.1.2.3 Phases=3 Conn=wye kV=13.8 kvar=10.0
New Capacitor.2280791 Bus1=12786-12181661.1.2.3 Phases=3 Conn=wye kV=13.8 kvar=6.0
New Capacitor.PA-SL-SE-TUM-TRM-BCSE-01H1 Bus1=12786-8075839.1.2.3 Phases=3 Conn=wye kV=13.8 kvar=14.0
New Capacitor.PA-SL-SE-TUM-TRM-BCSE-01H2 Bus1=12786-8075839.1.2.3 Phases=3 Conn=wye kV=13.8 kvar=14.0
