! GERACAO DISTRIBUIDA — gerada de UGBT_tab e UGMT_tab
! Unidades com potencia nula sao omitidas (gerariam NaN).
! 21 unidades descartadas por potencia nula.
! 35 unidades de BT realocadas para o secundario do transformador (rede secundaria nao modelada).
! 0 unidades descartadas por ponto de conexao ausente da rede.
! irradiance=1 — ver o docstring: 1,0 e meio-dia de ceu claro, nao a ponta de carga.
! 0 barras tiveram a GD limitada a capacidade do transformador (0 kW cortados).
! inversores em pf=1 — ver o docstring de _pv: 0,92 e capacidade exigida pelo PRODIST, nao despacho.
! 0 unidades de MT ligadas pelo PAC da carga (casadas por CEG_GD): o PAC da UGMT nao existe na SSDMT.
New PVSystem.GD_2492a9b1c308020756ce29990646eac04e3ab079caea86a15d5fc5bdafa2827b_1 phases=1 bus1=node_418027371.1.4 conn=wye kv=0.1270 pf=1 pmpp=2.76 kva=2.76 irradiance=1 temperature=25 %cutin=20 %cutout=20 effcurve=MyEff P-TCurve=MyPvsT Daily=IRRAD_DIA TDaily=TEMP_DIA
New PVSystem.GD_2492a9b1c308020756ce29990646eac04e3ab079caea86a15d5fc5bdafa2827b_2 phases=1 bus1=node_418027371.2.4 conn=wye kv=0.1270 pf=1 pmpp=2.76 kva=2.76 irradiance=1 temperature=25 %cutin=20 %cutout=20 effcurve=MyEff P-TCurve=MyPvsT Daily=IRRAD_DIA TDaily=TEMP_DIA
New PVSystem.GD_2492a9b1c308020756ce29990646eac04e3ab079caea86a15d5fc5bdafa2827b_3 phases=1 bus1=node_418027371.3.4 conn=wye kv=0.1270 pf=1 pmpp=2.76 kva=2.76 irradiance=1 temperature=25 %cutin=20 %cutout=20 effcurve=MyEff P-TCurve=MyPvsT Daily=IRRAD_DIA TDaily=TEMP_DIA
New PVSystem.GD_bb609e25de85bdf7fd5f1d2fb9a12d807d0f03917e02306f379a9ca659ce620d_1 phases=1 bus1=node_421016138.1.4 conn=wye kv=0.1270 pf=1 pmpp=1.48 kva=1.48 irradiance=1 temperature=25 %cutin=20 %cutout=20 effcurve=MyEff P-TCurve=MyPvsT Daily=IRRAD_DIA TDaily=TEMP_DIA
New PVSystem.GD_bb609e25de85bdf7fd5f1d2fb9a12d807d0f03917e02306f379a9ca659ce620d_2 phases=1 bus1=node_421016138.2.4 conn=wye kv=0.1270 pf=1 pmpp=1.48 kva=1.48 irradiance=1 temperature=25 %cutin=20 %cutout=20 effcurve=MyEff P-TCurve=MyPvsT Daily=IRRAD_DIA TDaily=TEMP_DIA
New PVSystem.GD_bb609e25de85bdf7fd5f1d2fb9a12d807d0f03917e02306f379a9ca659ce620d_3 phases=1 bus1=node_421016138.3.4 conn=wye kv=0.1270 pf=1 pmpp=1.48 kva=1.48 irradiance=1 temperature=25 %cutin=20 %cutout=20 effcurve=MyEff P-TCurve=MyPvsT Daily=IRRAD_DIA TDaily=TEMP_DIA
New PVSystem.GD_5515ab2e447bc0eb9f4a8d57d9b62cc7274e48ab2260dedb1daef03ecf355954_1 phases=1 bus1=node_421016138.1.4 conn=wye kv=0.1270 pf=1 pmpp=5.32 kva=5.32 irradiance=1 temperature=25 %cutin=20 %cutout=20 effcurve=MyEff P-TCurve=MyPvsT Daily=IRRAD_DIA TDaily=TEMP_DIA
New PVSystem.GD_5515ab2e447bc0eb9f4a8d57d9b62cc7274e48ab2260dedb1daef03ecf355954_2 phases=1 bus1=node_421016138.2.4 conn=wye kv=0.1270 pf=1 pmpp=5.32 kva=5.32 irradiance=1 temperature=25 %cutin=20 %cutout=20 effcurve=MyEff P-TCurve=MyPvsT Daily=IRRAD_DIA TDaily=TEMP_DIA
New PVSystem.GD_5515ab2e447bc0eb9f4a8d57d9b62cc7274e48ab2260dedb1daef03ecf355954_3 phases=1 bus1=node_421016138.3.4 conn=wye kv=0.1270 pf=1 pmpp=5.32 kva=5.32 irradiance=1 temperature=25 %cutin=20 %cutout=20 effcurve=MyEff P-TCurve=MyPvsT Daily=IRRAD_DIA TDaily=TEMP_DIA
New PVSystem.GD_c954eaf1c1b248cb80f9c807aedeee957ea647da973e9cac9df83c0c3c153a3a_1 phases=1 bus1=node_421016348.1.4 conn=wye kv=0.1270 pf=1 pmpp=1.66 kva=1.66 irradiance=1 temperature=25 %cutin=20 %cutout=20 effcurve=MyEff P-TCurve=MyPvsT Daily=IRRAD_DIA TDaily=TEMP_DIA
New PVSystem.GD_c954eaf1c1b248cb80f9c807aedeee957ea647da973e9cac9df83c0c3c153a3a_2 phases=1 bus1=node_421016348.2.4 conn=wye kv=0.1270 pf=1 pmpp=1.66 kva=1.66 irradiance=1 temperature=25 %cutin=20 %cutout=20 effcurve=MyEff P-TCurve=MyPvsT Daily=IRRAD_DIA TDaily=TEMP_DIA
New PVSystem.GD_c954eaf1c1b248cb80f9c807aedeee957ea647da973e9cac9df83c0c3c153a3a_3 phases=1 bus1=node_421016348.3.4 conn=wye kv=0.1270 pf=1 pmpp=1.66 kva=1.66 irradiance=1 temperature=25 %cutin=20 %cutout=20 effcurve=MyEff P-TCurve=MyPvsT Daily=IRRAD_DIA TDaily=TEMP_DIA
New PVSystem.GD_7babbbceaed64ed3ab05382043b1a32f7b91fdd9d750f5b64e618f6ddc22bfc9_1 phases=1 bus1=node_421016348.1.4 conn=wye kv=0.1270 pf=1 pmpp=0.19 kva=0.19 irradiance=1 temperature=25 %cutin=20 %cutout=20 effcurve=MyEff P-TCurve=MyPvsT Daily=IRRAD_DIA TDaily=TEMP_DIA
New PVSystem.GD_7babbbceaed64ed3ab05382043b1a32f7b91fdd9d750f5b64e618f6ddc22bfc9_2 phases=1 bus1=node_421016348.2.4 conn=wye kv=0.1270 pf=1 pmpp=0.19 kva=0.19 irradiance=1 temperature=25 %cutin=20 %cutout=20 effcurve=MyEff P-TCurve=MyPvsT Daily=IRRAD_DIA TDaily=TEMP_DIA
New PVSystem.GD_7babbbceaed64ed3ab05382043b1a32f7b91fdd9d750f5b64e618f6ddc22bfc9_3 phases=1 bus1=node_421016348.3.4 conn=wye kv=0.1270 pf=1 pmpp=0.19 kva=0.19 irradiance=1 temperature=25 %cutin=20 %cutout=20 effcurve=MyEff P-TCurve=MyPvsT Daily=IRRAD_DIA TDaily=TEMP_DIA
New PVSystem.GD_6aadd9c43a679e7b9e9250e436b21d40cbecafc88ecad83823c9a87c7fa36bdd_1 phases=1 bus1=node_421016348.1.4 conn=wye kv=0.1270 pf=1 pmpp=1.14 kva=1.14 irradiance=1 temperature=25 %cutin=20 %cutout=20 effcurve=MyEff P-TCurve=MyPvsT Daily=IRRAD_DIA TDaily=TEMP_DIA
New PVSystem.GD_6aadd9c43a679e7b9e9250e436b21d40cbecafc88ecad83823c9a87c7fa36bdd_2 phases=1 bus1=node_421016348.2.4 conn=wye kv=0.1270 pf=1 pmpp=1.14 kva=1.14 irradiance=1 temperature=25 %cutin=20 %cutout=20 effcurve=MyEff P-TCurve=MyPvsT Daily=IRRAD_DIA TDaily=TEMP_DIA
New PVSystem.GD_6aadd9c43a679e7b9e9250e436b21d40cbecafc88ecad83823c9a87c7fa36bdd_3 phases=1 bus1=node_421016348.3.4 conn=wye kv=0.1270 pf=1 pmpp=1.14 kva=1.14 irradiance=1 temperature=25 %cutin=20 %cutout=20 effcurve=MyEff P-TCurve=MyPvsT Daily=IRRAD_DIA TDaily=TEMP_DIA
New PVSystem.GD_6e7717e20def1a6595a0ba5524f0432b11d78a44f9dd71e2a9f45c34e2cb3ec9_1 phases=1 bus1=node_421016312.1.4 conn=wye kv=0.1270 pf=1 pmpp=0.50 kva=0.50 irradiance=1 temperature=25 %cutin=20 %cutout=20 effcurve=MyEff P-TCurve=MyPvsT Daily=IRRAD_DIA TDaily=TEMP_DIA
New PVSystem.GD_6e7717e20def1a6595a0ba5524f0432b11d78a44f9dd71e2a9f45c34e2cb3ec9_2 phases=1 bus1=node_421016312.2.4 conn=wye kv=0.1270 pf=1 pmpp=0.50 kva=0.50 irradiance=1 temperature=25 %cutin=20 %cutout=20 effcurve=MyEff P-TCurve=MyPvsT Daily=IRRAD_DIA TDaily=TEMP_DIA
New PVSystem.GD_6e7717e20def1a6595a0ba5524f0432b11d78a44f9dd71e2a9f45c34e2cb3ec9_3 phases=1 bus1=node_421016312.3.4 conn=wye kv=0.1270 pf=1 pmpp=0.50 kva=0.50 irradiance=1 temperature=25 %cutin=20 %cutout=20 effcurve=MyEff P-TCurve=MyPvsT Daily=IRRAD_DIA TDaily=TEMP_DIA
New PVSystem.GD_ecae70ef1d440622c911a666e63713b62e5af8e355d56588b69a8bf863fbe91c_1 phases=1 bus1=node_421016309.1.4 conn=wye kv=0.1270 pf=1 pmpp=6.38 kva=6.38 irradiance=1 temperature=25 %cutin=20 %cutout=20 effcurve=MyEff P-TCurve=MyPvsT Daily=IRRAD_DIA TDaily=TEMP_DIA
New PVSystem.GD_ecae70ef1d440622c911a666e63713b62e5af8e355d56588b69a8bf863fbe91c_2 phases=1 bus1=node_421016309.2.4 conn=wye kv=0.1270 pf=1 pmpp=6.38 kva=6.38 irradiance=1 temperature=25 %cutin=20 %cutout=20 effcurve=MyEff P-TCurve=MyPvsT Daily=IRRAD_DIA TDaily=TEMP_DIA
New PVSystem.GD_ecae70ef1d440622c911a666e63713b62e5af8e355d56588b69a8bf863fbe91c_3 phases=1 bus1=node_421016309.3.4 conn=wye kv=0.1270 pf=1 pmpp=6.38 kva=6.38 irradiance=1 temperature=25 %cutin=20 %cutout=20 effcurve=MyEff P-TCurve=MyPvsT Daily=IRRAD_DIA TDaily=TEMP_DIA
New PVSystem.GD_5965bd76a53aad1218d4fdb05ede4245182c2f156b6ba197e964c72cec4a7bbb_1 phases=1 bus1=node_421006726.1.4 conn=wye kv=0.1270 pf=1 pmpp=1.26 kva=1.26 irradiance=1 temperature=25 %cutin=20 %cutout=20 effcurve=MyEff P-TCurve=MyPvsT Daily=IRRAD_DIA TDaily=TEMP_DIA
New PVSystem.GD_5965bd76a53aad1218d4fdb05ede4245182c2f156b6ba197e964c72cec4a7bbb_2 phases=1 bus1=node_421006726.2.4 conn=wye kv=0.1270 pf=1 pmpp=1.26 kva=1.26 irradiance=1 temperature=25 %cutin=20 %cutout=20 effcurve=MyEff P-TCurve=MyPvsT Daily=IRRAD_DIA TDaily=TEMP_DIA
New PVSystem.GD_5965bd76a53aad1218d4fdb05ede4245182c2f156b6ba197e964c72cec4a7bbb_3 phases=1 bus1=node_421006726.3.4 conn=wye kv=0.1270 pf=1 pmpp=1.26 kva=1.26 irradiance=1 temperature=25 %cutin=20 %cutout=20 effcurve=MyEff P-TCurve=MyPvsT Daily=IRRAD_DIA TDaily=TEMP_DIA
New PVSystem.GD_4bcba0c1c00a29c1e72cccad3abda593aa78b751e8374cedf6e8131aca4615b5_1 phases=1 bus1=node_421006726.1.4 conn=wye kv=0.1270 pf=1 pmpp=0.64 kva=0.64 irradiance=1 temperature=25 %cutin=20 %cutout=20 effcurve=MyEff P-TCurve=MyPvsT Daily=IRRAD_DIA TDaily=TEMP_DIA
New PVSystem.GD_4bcba0c1c00a29c1e72cccad3abda593aa78b751e8374cedf6e8131aca4615b5_2 phases=1 bus1=node_421006726.2.4 conn=wye kv=0.1270 pf=1 pmpp=0.64 kva=0.64 irradiance=1 temperature=25 %cutin=20 %cutout=20 effcurve=MyEff P-TCurve=MyPvsT Daily=IRRAD_DIA TDaily=TEMP_DIA
New PVSystem.GD_4bcba0c1c00a29c1e72cccad3abda593aa78b751e8374cedf6e8131aca4615b5_3 phases=1 bus1=node_421006726.3.4 conn=wye kv=0.1270 pf=1 pmpp=0.64 kva=0.64 irradiance=1 temperature=25 %cutin=20 %cutout=20 effcurve=MyEff P-TCurve=MyPvsT Daily=IRRAD_DIA TDaily=TEMP_DIA
New PVSystem.GD_ecf0d6a252b593b63e275fb169fe0c3430182c44dbbe5a4c5494c99ddcfe5477_1 phases=1 bus1=node_418028562.1.4 conn=wye kv=0.1270 pf=1 pmpp=1.75 kva=1.75 irradiance=1 temperature=25 %cutin=20 %cutout=20 effcurve=MyEff P-TCurve=MyPvsT Daily=IRRAD_DIA TDaily=TEMP_DIA
New PVSystem.GD_ecf0d6a252b593b63e275fb169fe0c3430182c44dbbe5a4c5494c99ddcfe5477_2 phases=1 bus1=node_418028562.2.4 conn=wye kv=0.1270 pf=1 pmpp=1.75 kva=1.75 irradiance=1 temperature=25 %cutin=20 %cutout=20 effcurve=MyEff P-TCurve=MyPvsT Daily=IRRAD_DIA TDaily=TEMP_DIA
New PVSystem.GD_ecf0d6a252b593b63e275fb169fe0c3430182c44dbbe5a4c5494c99ddcfe5477_3 phases=1 bus1=node_418028562.3.4 conn=wye kv=0.1270 pf=1 pmpp=1.75 kva=1.75 irradiance=1 temperature=25 %cutin=20 %cutout=20 effcurve=MyEff P-TCurve=MyPvsT Daily=IRRAD_DIA TDaily=TEMP_DIA
New PVSystem.GD_eece39f217a4150bb1112e0bfcc6f650fe6620c721faa9f569940331d0cb1eb9_1 phases=1 bus1=node_418028562.1.4 conn=wye kv=0.1270 pf=1 pmpp=0.79 kva=0.79 irradiance=1 temperature=25 %cutin=20 %cutout=20 effcurve=MyEff P-TCurve=MyPvsT Daily=IRRAD_DIA TDaily=TEMP_DIA
New PVSystem.GD_eece39f217a4150bb1112e0bfcc6f650fe6620c721faa9f569940331d0cb1eb9_2 phases=1 bus1=node_418028562.2.4 conn=wye kv=0.1270 pf=1 pmpp=0.79 kva=0.79 irradiance=1 temperature=25 %cutin=20 %cutout=20 effcurve=MyEff P-TCurve=MyPvsT Daily=IRRAD_DIA TDaily=TEMP_DIA
New PVSystem.GD_eece39f217a4150bb1112e0bfcc6f650fe6620c721faa9f569940331d0cb1eb9_3 phases=1 bus1=node_418028562.3.4 conn=wye kv=0.1270 pf=1 pmpp=0.79 kva=0.79 irradiance=1 temperature=25 %cutin=20 %cutout=20 effcurve=MyEff P-TCurve=MyPvsT Daily=IRRAD_DIA TDaily=TEMP_DIA
New PVSystem.GD_c01a1a57b090b74ec5a4dcce70964cac75c95205f2c0c65aaa9f38aa04003978_1 phases=1 bus1=node_418027221.1.4 conn=wye kv=0.1270 pf=1 pmpp=1.27 kva=1.27 irradiance=1 temperature=25 %cutin=20 %cutout=20 effcurve=MyEff P-TCurve=MyPvsT Daily=IRRAD_DIA TDaily=TEMP_DIA
New PVSystem.GD_c01a1a57b090b74ec5a4dcce70964cac75c95205f2c0c65aaa9f38aa04003978_2 phases=1 bus1=node_418027221.2.4 conn=wye kv=0.1270 pf=1 pmpp=1.27 kva=1.27 irradiance=1 temperature=25 %cutin=20 %cutout=20 effcurve=MyEff P-TCurve=MyPvsT Daily=IRRAD_DIA TDaily=TEMP_DIA
New PVSystem.GD_c01a1a57b090b74ec5a4dcce70964cac75c95205f2c0c65aaa9f38aa04003978_3 phases=1 bus1=node_418027221.3.4 conn=wye kv=0.1270 pf=1 pmpp=1.27 kva=1.27 irradiance=1 temperature=25 %cutin=20 %cutout=20 effcurve=MyEff P-TCurve=MyPvsT Daily=IRRAD_DIA TDaily=TEMP_DIA
New PVSystem.GD_57b2ead8a92346970e2faa0434edf324875af39201354e0073bd7b576b49292d_1 phases=1 bus1=node_555043209.1.4 conn=wye kv=0.1270 pf=1 pmpp=0.28 kva=0.28 irradiance=1 temperature=25 %cutin=20 %cutout=20 effcurve=MyEff P-TCurve=MyPvsT Daily=IRRAD_DIA TDaily=TEMP_DIA
New PVSystem.GD_57b2ead8a92346970e2faa0434edf324875af39201354e0073bd7b576b49292d_2 phases=1 bus1=node_555043209.2.4 conn=wye kv=0.1270 pf=1 pmpp=0.28 kva=0.28 irradiance=1 temperature=25 %cutin=20 %cutout=20 effcurve=MyEff P-TCurve=MyPvsT Daily=IRRAD_DIA TDaily=TEMP_DIA
New PVSystem.GD_57b2ead8a92346970e2faa0434edf324875af39201354e0073bd7b576b49292d_3 phases=1 bus1=node_555043209.3.4 conn=wye kv=0.1270 pf=1 pmpp=0.28 kva=0.28 irradiance=1 temperature=25 %cutin=20 %cutout=20 effcurve=MyEff P-TCurve=MyPvsT Daily=IRRAD_DIA TDaily=TEMP_DIA
New PVSystem.GD_f80f4b3db4465caefe75f3ebe8ea11119d54deef3ab2a79a606336f42d6db143_1 phases=1 bus1=node_418028334.1.4 conn=wye kv=0.1270 pf=1 pmpp=0.50 kva=0.50 irradiance=1 temperature=25 %cutin=20 %cutout=20 effcurve=MyEff P-TCurve=MyPvsT Daily=IRRAD_DIA TDaily=TEMP_DIA
New PVSystem.GD_f80f4b3db4465caefe75f3ebe8ea11119d54deef3ab2a79a606336f42d6db143_2 phases=1 bus1=node_418028334.2.4 conn=wye kv=0.1270 pf=1 pmpp=0.50 kva=0.50 irradiance=1 temperature=25 %cutin=20 %cutout=20 effcurve=MyEff P-TCurve=MyPvsT Daily=IRRAD_DIA TDaily=TEMP_DIA
New PVSystem.GD_f80f4b3db4465caefe75f3ebe8ea11119d54deef3ab2a79a606336f42d6db143_3 phases=1 bus1=node_418028334.3.4 conn=wye kv=0.1270 pf=1 pmpp=0.50 kva=0.50 irradiance=1 temperature=25 %cutin=20 %cutout=20 effcurve=MyEff P-TCurve=MyPvsT Daily=IRRAD_DIA TDaily=TEMP_DIA
New PVSystem.GD_57e440697b469959fc8038a24b2e82fbbba4d187f62b111c8d977ad3f09d604a_1 phases=1 bus1=node_418028334.1.4 conn=wye kv=0.1270 pf=1 pmpp=1.54 kva=1.54 irradiance=1 temperature=25 %cutin=20 %cutout=20 effcurve=MyEff P-TCurve=MyPvsT Daily=IRRAD_DIA TDaily=TEMP_DIA
New PVSystem.GD_57e440697b469959fc8038a24b2e82fbbba4d187f62b111c8d977ad3f09d604a_2 phases=1 bus1=node_418028334.2.4 conn=wye kv=0.1270 pf=1 pmpp=1.54 kva=1.54 irradiance=1 temperature=25 %cutin=20 %cutout=20 effcurve=MyEff P-TCurve=MyPvsT Daily=IRRAD_DIA TDaily=TEMP_DIA
New PVSystem.GD_57e440697b469959fc8038a24b2e82fbbba4d187f62b111c8d977ad3f09d604a_3 phases=1 bus1=node_418028334.3.4 conn=wye kv=0.1270 pf=1 pmpp=1.54 kva=1.54 irradiance=1 temperature=25 %cutin=20 %cutout=20 effcurve=MyEff P-TCurve=MyPvsT Daily=IRRAD_DIA TDaily=TEMP_DIA
New PVSystem.GD_bfc6c49c95582777a8dfe33b64edbd11fc6f1ecf6bf6c7e6d283738b290d8a7d_1 phases=1 bus1=node_418027620.1.4 conn=wye kv=0.1270 pf=1 pmpp=4.10 kva=4.10 irradiance=1 temperature=25 %cutin=20 %cutout=20 effcurve=MyEff P-TCurve=MyPvsT Daily=IRRAD_DIA TDaily=TEMP_DIA
New PVSystem.GD_bfc6c49c95582777a8dfe33b64edbd11fc6f1ecf6bf6c7e6d283738b290d8a7d_2 phases=1 bus1=node_418027620.2.4 conn=wye kv=0.1270 pf=1 pmpp=4.10 kva=4.10 irradiance=1 temperature=25 %cutin=20 %cutout=20 effcurve=MyEff P-TCurve=MyPvsT Daily=IRRAD_DIA TDaily=TEMP_DIA
New PVSystem.GD_bfc6c49c95582777a8dfe33b64edbd11fc6f1ecf6bf6c7e6d283738b290d8a7d_3 phases=1 bus1=node_418027620.3.4 conn=wye kv=0.1270 pf=1 pmpp=4.10 kva=4.10 irradiance=1 temperature=25 %cutin=20 %cutout=20 effcurve=MyEff P-TCurve=MyPvsT Daily=IRRAD_DIA TDaily=TEMP_DIA
New PVSystem.GD_670e12a1e0f47e1137f3344c2d25e6bc681133a41e8d4d64678173f44b0f5c3d_1 phases=1 bus1=node_418509501.1.4 conn=wye kv=0.1270 pf=1 pmpp=4.24 kva=4.24 irradiance=1 temperature=25 %cutin=20 %cutout=20 effcurve=MyEff P-TCurve=MyPvsT Daily=IRRAD_DIA TDaily=TEMP_DIA
New PVSystem.GD_670e12a1e0f47e1137f3344c2d25e6bc681133a41e8d4d64678173f44b0f5c3d_2 phases=1 bus1=node_418509501.2.4 conn=wye kv=0.1270 pf=1 pmpp=4.24 kva=4.24 irradiance=1 temperature=25 %cutin=20 %cutout=20 effcurve=MyEff P-TCurve=MyPvsT Daily=IRRAD_DIA TDaily=TEMP_DIA
New PVSystem.GD_670e12a1e0f47e1137f3344c2d25e6bc681133a41e8d4d64678173f44b0f5c3d_3 phases=1 bus1=node_418509501.3.4 conn=wye kv=0.1270 pf=1 pmpp=4.24 kva=4.24 irradiance=1 temperature=25 %cutin=20 %cutout=20 effcurve=MyEff P-TCurve=MyPvsT Daily=IRRAD_DIA TDaily=TEMP_DIA
New PVSystem.GD_8f5ea4ef108007d613b6daa73fd3548aaaa8581eb8e308f5847dc81fb399a733_1 phases=1 bus1=node_419430029.1.4 conn=wye kv=0.1200 pf=1 pmpp=0.71 kva=0.71 irradiance=1 temperature=25 %cutin=20 %cutout=20 effcurve=MyEff P-TCurve=MyPvsT Daily=IRRAD_DIA TDaily=TEMP_DIA
New PVSystem.GD_8f5ea4ef108007d613b6daa73fd3548aaaa8581eb8e308f5847dc81fb399a733_2 phases=1 bus1=node_419430029.2.4 conn=wye kv=0.1200 pf=1 pmpp=0.71 kva=0.71 irradiance=1 temperature=25 %cutin=20 %cutout=20 effcurve=MyEff P-TCurve=MyPvsT Daily=IRRAD_DIA TDaily=TEMP_DIA
New PVSystem.GD_adc14ef42bd6fb463f39e63201c919a082a67cbecefa867932bc909bddbbeaa8_1 phases=1 bus1=node_418837186.1.4 conn=wye kv=0.1200 pf=1 pmpp=5.53 kva=5.53 irradiance=1 temperature=25 %cutin=20 %cutout=20 effcurve=MyEff P-TCurve=MyPvsT Daily=IRRAD_DIA TDaily=TEMP_DIA
New PVSystem.GD_adc14ef42bd6fb463f39e63201c919a082a67cbecefa867932bc909bddbbeaa8_2 phases=1 bus1=node_418837186.2.4 conn=wye kv=0.1200 pf=1 pmpp=5.53 kva=5.53 irradiance=1 temperature=25 %cutin=20 %cutout=20 effcurve=MyEff P-TCurve=MyPvsT Daily=IRRAD_DIA TDaily=TEMP_DIA
New PVSystem.GD_a5b4f60dd7063d860e0e445a262190cc19fc87b3f91845d6fff7793fd2a946ba_1 phases=1 bus1=node_419368621.1.4 conn=wye kv=0.1200 pf=1 pmpp=1.27 kva=1.27 irradiance=1 temperature=25 %cutin=20 %cutout=20 effcurve=MyEff P-TCurve=MyPvsT Daily=IRRAD_DIA TDaily=TEMP_DIA
New PVSystem.GD_a5b4f60dd7063d860e0e445a262190cc19fc87b3f91845d6fff7793fd2a946ba_2 phases=1 bus1=node_419368621.2.4 conn=wye kv=0.1200 pf=1 pmpp=1.27 kva=1.27 irradiance=1 temperature=25 %cutin=20 %cutout=20 effcurve=MyEff P-TCurve=MyPvsT Daily=IRRAD_DIA TDaily=TEMP_DIA
New PVSystem.GD_333e638e600c3fe4ed2aacc5ea10b7088527704038634789704e96015423b7fe_1 phases=1 bus1=node_419333133.1.4 conn=wye kv=0.1200 pf=1 pmpp=2.01 kva=2.01 irradiance=1 temperature=25 %cutin=20 %cutout=20 effcurve=MyEff P-TCurve=MyPvsT Daily=IRRAD_DIA TDaily=TEMP_DIA
New PVSystem.GD_333e638e600c3fe4ed2aacc5ea10b7088527704038634789704e96015423b7fe_2 phases=1 bus1=node_419333133.2.4 conn=wye kv=0.1200 pf=1 pmpp=2.01 kva=2.01 irradiance=1 temperature=25 %cutin=20 %cutout=20 effcurve=MyEff P-TCurve=MyPvsT Daily=IRRAD_DIA TDaily=TEMP_DIA
New PVSystem.GD_52a4eb10065d6ab84a498929324394e797de17fd85684bd31f4b1c6f13ea88c5_1 phases=1 bus1=node_421016318.1.4 conn=wye kv=0.1270 pf=1 pmpp=0.78 kva=0.78 irradiance=1 temperature=25 %cutin=20 %cutout=20 effcurve=MyEff P-TCurve=MyPvsT Daily=IRRAD_DIA TDaily=TEMP_DIA
New PVSystem.GD_52a4eb10065d6ab84a498929324394e797de17fd85684bd31f4b1c6f13ea88c5_2 phases=1 bus1=node_421016318.2.4 conn=wye kv=0.1270 pf=1 pmpp=0.78 kva=0.78 irradiance=1 temperature=25 %cutin=20 %cutout=20 effcurve=MyEff P-TCurve=MyPvsT Daily=IRRAD_DIA TDaily=TEMP_DIA
New PVSystem.GD_52a4eb10065d6ab84a498929324394e797de17fd85684bd31f4b1c6f13ea88c5_3 phases=1 bus1=node_421016318.3.4 conn=wye kv=0.1270 pf=1 pmpp=0.78 kva=0.78 irradiance=1 temperature=25 %cutin=20 %cutout=20 effcurve=MyEff P-TCurve=MyPvsT Daily=IRRAD_DIA TDaily=TEMP_DIA
New PVSystem.GD_aa89feaa4c01c7a566d4d40d2973abc50557c45eca6f56d725c3c946917ce856_1 phases=1 bus1=node_421016126.1.4 conn=wye kv=0.1270 pf=1 pmpp=1.79 kva=1.79 irradiance=1 temperature=25 %cutin=20 %cutout=20 effcurve=MyEff P-TCurve=MyPvsT Daily=IRRAD_DIA TDaily=TEMP_DIA
New PVSystem.GD_aa89feaa4c01c7a566d4d40d2973abc50557c45eca6f56d725c3c946917ce856_2 phases=1 bus1=node_421016126.2.4 conn=wye kv=0.1270 pf=1 pmpp=1.79 kva=1.79 irradiance=1 temperature=25 %cutin=20 %cutout=20 effcurve=MyEff P-TCurve=MyPvsT Daily=IRRAD_DIA TDaily=TEMP_DIA
New PVSystem.GD_aa89feaa4c01c7a566d4d40d2973abc50557c45eca6f56d725c3c946917ce856_3 phases=1 bus1=node_421016126.3.4 conn=wye kv=0.1270 pf=1 pmpp=1.79 kva=1.79 irradiance=1 temperature=25 %cutin=20 %cutout=20 effcurve=MyEff P-TCurve=MyPvsT Daily=IRRAD_DIA TDaily=TEMP_DIA
New PVSystem.GD_feb5d3b2df6f777fcf50cb6e7e9d93da5e5f51bb52a450f54dc20cdef0e4799d_1 phases=1 bus1=node_421016126.1.4 conn=wye kv=0.1270 pf=1 pmpp=0.33 kva=0.33 irradiance=1 temperature=25 %cutin=20 %cutout=20 effcurve=MyEff P-TCurve=MyPvsT Daily=IRRAD_DIA TDaily=TEMP_DIA
New PVSystem.GD_feb5d3b2df6f777fcf50cb6e7e9d93da5e5f51bb52a450f54dc20cdef0e4799d_2 phases=1 bus1=node_421016126.2.4 conn=wye kv=0.1270 pf=1 pmpp=0.33 kva=0.33 irradiance=1 temperature=25 %cutin=20 %cutout=20 effcurve=MyEff P-TCurve=MyPvsT Daily=IRRAD_DIA TDaily=TEMP_DIA
New PVSystem.GD_feb5d3b2df6f777fcf50cb6e7e9d93da5e5f51bb52a450f54dc20cdef0e4799d_3 phases=1 bus1=node_421016126.3.4 conn=wye kv=0.1270 pf=1 pmpp=0.33 kva=0.33 irradiance=1 temperature=25 %cutin=20 %cutout=20 effcurve=MyEff P-TCurve=MyPvsT Daily=IRRAD_DIA TDaily=TEMP_DIA
New PVSystem.GD_78e3bfd1786578f0e8aa6909f6b9e082ff25bff8028a4888d6c195213bde06e8_1 phases=1 bus1=node_421016060.1.4 conn=wye kv=0.1270 pf=1 pmpp=1.20 kva=1.20 irradiance=1 temperature=25 %cutin=20 %cutout=20 effcurve=MyEff P-TCurve=MyPvsT Daily=IRRAD_DIA TDaily=TEMP_DIA
New PVSystem.GD_78e3bfd1786578f0e8aa6909f6b9e082ff25bff8028a4888d6c195213bde06e8_2 phases=1 bus1=node_421016060.2.4 conn=wye kv=0.1270 pf=1 pmpp=1.20 kva=1.20 irradiance=1 temperature=25 %cutin=20 %cutout=20 effcurve=MyEff P-TCurve=MyPvsT Daily=IRRAD_DIA TDaily=TEMP_DIA
New PVSystem.GD_78e3bfd1786578f0e8aa6909f6b9e082ff25bff8028a4888d6c195213bde06e8_3 phases=1 bus1=node_421016060.3.4 conn=wye kv=0.1270 pf=1 pmpp=1.20 kva=1.20 irradiance=1 temperature=25 %cutin=20 %cutout=20 effcurve=MyEff P-TCurve=MyPvsT Daily=IRRAD_DIA TDaily=TEMP_DIA
New PVSystem.GD_7fd83724a87f05e3e46a3d80b91c9c55ac5acbd90cf1ac454533c876220f47ea_1 phases=1 bus1=node_419597181.1.4 conn=wye kv=0.1200 pf=1 pmpp=1.74 kva=1.74 irradiance=1 temperature=25 %cutin=20 %cutout=20 effcurve=MyEff P-TCurve=MyPvsT Daily=IRRAD_DIA TDaily=TEMP_DIA
New PVSystem.GD_7fd83724a87f05e3e46a3d80b91c9c55ac5acbd90cf1ac454533c876220f47ea_2 phases=1 bus1=node_419597181.2.4 conn=wye kv=0.1200 pf=1 pmpp=1.74 kva=1.74 irradiance=1 temperature=25 %cutin=20 %cutout=20 effcurve=MyEff P-TCurve=MyPvsT Daily=IRRAD_DIA TDaily=TEMP_DIA
New PVSystem.GD_eaa924e725dbbcedf47d4756b19b340a2d3c661fadeff49233b8ebbe73277349_1 phases=1 bus1=node_421007098.1.4 conn=wye kv=0.1270 pf=1 pmpp=1.24 kva=1.24 irradiance=1 temperature=25 %cutin=20 %cutout=20 effcurve=MyEff P-TCurve=MyPvsT Daily=IRRAD_DIA TDaily=TEMP_DIA
New PVSystem.GD_eaa924e725dbbcedf47d4756b19b340a2d3c661fadeff49233b8ebbe73277349_2 phases=1 bus1=node_421007098.2.4 conn=wye kv=0.1270 pf=1 pmpp=1.24 kva=1.24 irradiance=1 temperature=25 %cutin=20 %cutout=20 effcurve=MyEff P-TCurve=MyPvsT Daily=IRRAD_DIA TDaily=TEMP_DIA
New PVSystem.GD_eaa924e725dbbcedf47d4756b19b340a2d3c661fadeff49233b8ebbe73277349_3 phases=1 bus1=node_421007098.3.4 conn=wye kv=0.1270 pf=1 pmpp=1.24 kva=1.24 irradiance=1 temperature=25 %cutin=20 %cutout=20 effcurve=MyEff P-TCurve=MyPvsT Daily=IRRAD_DIA TDaily=TEMP_DIA
New PVSystem.GD_5218a32cac158bb9634d2920eb36cfd8daf2fae1a3320b6be90d11fb949fbf3a_1 phases=1 bus1=node_421016057.1.4 conn=wye kv=0.1270 pf=1 pmpp=0.54 kva=0.54 irradiance=1 temperature=25 %cutin=20 %cutout=20 effcurve=MyEff P-TCurve=MyPvsT Daily=IRRAD_DIA TDaily=TEMP_DIA
New PVSystem.GD_5218a32cac158bb9634d2920eb36cfd8daf2fae1a3320b6be90d11fb949fbf3a_2 phases=1 bus1=node_421016057.2.4 conn=wye kv=0.1270 pf=1 pmpp=0.54 kva=0.54 irradiance=1 temperature=25 %cutin=20 %cutout=20 effcurve=MyEff P-TCurve=MyPvsT Daily=IRRAD_DIA TDaily=TEMP_DIA
New PVSystem.GD_5218a32cac158bb9634d2920eb36cfd8daf2fae1a3320b6be90d11fb949fbf3a_3 phases=1 bus1=node_421016057.3.4 conn=wye kv=0.1270 pf=1 pmpp=0.54 kva=0.54 irradiance=1 temperature=25 %cutin=20 %cutout=20 effcurve=MyEff P-TCurve=MyPvsT Daily=IRRAD_DIA TDaily=TEMP_DIA
New PVSystem.GD_f746a37ead57e290a28ae11d3a98b1825b1034a9ace38e6132b2491931eb3b60_1 phases=1 bus1=node_420017913.1.4 conn=wye kv=0.1200 pf=1 pmpp=1.16 kva=1.16 irradiance=1 temperature=25 %cutin=20 %cutout=20 effcurve=MyEff P-TCurve=MyPvsT Daily=IRRAD_DIA TDaily=TEMP_DIA
New PVSystem.GD_f746a37ead57e290a28ae11d3a98b1825b1034a9ace38e6132b2491931eb3b60_2 phases=1 bus1=node_420017913.2.4 conn=wye kv=0.1200 pf=1 pmpp=1.16 kva=1.16 irradiance=1 temperature=25 %cutin=20 %cutout=20 effcurve=MyEff P-TCurve=MyPvsT Daily=IRRAD_DIA TDaily=TEMP_DIA
New PVSystem.GD_15de2e1e6188bdf9d1dc8260dd3d7a9638a90232f14df4244b45ddf75d28085f_1 phases=1 bus1=node_421006717.1.4 conn=wye kv=0.1270 pf=1 pmpp=2.15 kva=2.15 irradiance=1 temperature=25 %cutin=20 %cutout=20 effcurve=MyEff P-TCurve=MyPvsT Daily=IRRAD_DIA TDaily=TEMP_DIA
New PVSystem.GD_15de2e1e6188bdf9d1dc8260dd3d7a9638a90232f14df4244b45ddf75d28085f_2 phases=1 bus1=node_421006717.2.4 conn=wye kv=0.1270 pf=1 pmpp=2.15 kva=2.15 irradiance=1 temperature=25 %cutin=20 %cutout=20 effcurve=MyEff P-TCurve=MyPvsT Daily=IRRAD_DIA TDaily=TEMP_DIA
New PVSystem.GD_15de2e1e6188bdf9d1dc8260dd3d7a9638a90232f14df4244b45ddf75d28085f_3 phases=1 bus1=node_421006717.3.4 conn=wye kv=0.1270 pf=1 pmpp=2.15 kva=2.15 irradiance=1 temperature=25 %cutin=20 %cutout=20 effcurve=MyEff P-TCurve=MyPvsT Daily=IRRAD_DIA TDaily=TEMP_DIA
New PVSystem.GD_185975f9aa8f241bded371fa83967709290be23f0d45b2d1dc3c983ece206803_1 phases=1 bus1=node_421006717.1.4 conn=wye kv=0.1270 pf=1 pmpp=0.58 kva=0.58 irradiance=1 temperature=25 %cutin=20 %cutout=20 effcurve=MyEff P-TCurve=MyPvsT Daily=IRRAD_DIA TDaily=TEMP_DIA
New PVSystem.GD_185975f9aa8f241bded371fa83967709290be23f0d45b2d1dc3c983ece206803_2 phases=1 bus1=node_421006717.2.4 conn=wye kv=0.1270 pf=1 pmpp=0.58 kva=0.58 irradiance=1 temperature=25 %cutin=20 %cutout=20 effcurve=MyEff P-TCurve=MyPvsT Daily=IRRAD_DIA TDaily=TEMP_DIA
New PVSystem.GD_185975f9aa8f241bded371fa83967709290be23f0d45b2d1dc3c983ece206803_3 phases=1 bus1=node_421006717.3.4 conn=wye kv=0.1270 pf=1 pmpp=0.58 kva=0.58 irradiance=1 temperature=25 %cutin=20 %cutout=20 effcurve=MyEff P-TCurve=MyPvsT Daily=IRRAD_DIA TDaily=TEMP_DIA
New PVSystem.GD_e4bc0caeec9ff582900de053bafc191c2a3d25c001f14de2b71a9605d276f49d_1 phases=1 bus1=node_421006717.1.4 conn=wye kv=0.1270 pf=1 pmpp=5.66 kva=5.66 irradiance=1 temperature=25 %cutin=20 %cutout=20 effcurve=MyEff P-TCurve=MyPvsT Daily=IRRAD_DIA TDaily=TEMP_DIA
New PVSystem.GD_e4bc0caeec9ff582900de053bafc191c2a3d25c001f14de2b71a9605d276f49d_2 phases=1 bus1=node_421006717.2.4 conn=wye kv=0.1270 pf=1 pmpp=5.66 kva=5.66 irradiance=1 temperature=25 %cutin=20 %cutout=20 effcurve=MyEff P-TCurve=MyPvsT Daily=IRRAD_DIA TDaily=TEMP_DIA
New PVSystem.GD_e4bc0caeec9ff582900de053bafc191c2a3d25c001f14de2b71a9605d276f49d_3 phases=1 bus1=node_421006717.3.4 conn=wye kv=0.1270 pf=1 pmpp=5.66 kva=5.66 irradiance=1 temperature=25 %cutin=20 %cutout=20 effcurve=MyEff P-TCurve=MyPvsT Daily=IRRAD_DIA TDaily=TEMP_DIA
New PVSystem.GD_3a3a9404b901842114e42c9852c6c81a50ac34f4ab0fd4632ceb24e796566ad5_1 phases=1 bus1=node_421016108.1.4 conn=wye kv=0.1270 pf=1 pmpp=1.55 kva=1.55 irradiance=1 temperature=25 %cutin=20 %cutout=20 effcurve=MyEff P-TCurve=MyPvsT Daily=IRRAD_DIA TDaily=TEMP_DIA
New PVSystem.GD_3a3a9404b901842114e42c9852c6c81a50ac34f4ab0fd4632ceb24e796566ad5_2 phases=1 bus1=node_421016108.2.4 conn=wye kv=0.1270 pf=1 pmpp=1.55 kva=1.55 irradiance=1 temperature=25 %cutin=20 %cutout=20 effcurve=MyEff P-TCurve=MyPvsT Daily=IRRAD_DIA TDaily=TEMP_DIA
New PVSystem.GD_3a3a9404b901842114e42c9852c6c81a50ac34f4ab0fd4632ceb24e796566ad5_3 phases=1 bus1=node_421016108.3.4 conn=wye kv=0.1270 pf=1 pmpp=1.55 kva=1.55 irradiance=1 temperature=25 %cutin=20 %cutout=20 effcurve=MyEff P-TCurve=MyPvsT Daily=IRRAD_DIA TDaily=TEMP_DIA
New PVSystem.GD_b44b97c940d4161eb333b089a871926ba343953305b501ce4e1012aacd521f38_1 phases=1 bus1=node_491697076.1.4 conn=wye kv=0.1200 pf=1 pmpp=1.79 kva=1.79 irradiance=1 temperature=25 %cutin=20 %cutout=20 effcurve=MyEff P-TCurve=MyPvsT Daily=IRRAD_DIA TDaily=TEMP_DIA
New PVSystem.GD_b44b97c940d4161eb333b089a871926ba343953305b501ce4e1012aacd521f38_2 phases=1 bus1=node_491697076.2.4 conn=wye kv=0.1200 pf=1 pmpp=1.79 kva=1.79 irradiance=1 temperature=25 %cutin=20 %cutout=20 effcurve=MyEff P-TCurve=MyPvsT Daily=IRRAD_DIA TDaily=TEMP_DIA
New PVSystem.GD_4d399f10bff678c37fd145bc269facdb2b45599a64fc41f7e5b28d982dd9ceb4_1 phases=1 bus1=node_420968880.1.4 conn=wye kv=0.1270 pf=1 pmpp=17.54 kva=17.54 irradiance=1 temperature=25 %cutin=20 %cutout=20 effcurve=MyEff P-TCurve=MyPvsT Daily=IRRAD_DIA TDaily=TEMP_DIA
New PVSystem.GD_4d399f10bff678c37fd145bc269facdb2b45599a64fc41f7e5b28d982dd9ceb4_2 phases=1 bus1=node_420968880.2.4 conn=wye kv=0.1270 pf=1 pmpp=17.54 kva=17.54 irradiance=1 temperature=25 %cutin=20 %cutout=20 effcurve=MyEff P-TCurve=MyPvsT Daily=IRRAD_DIA TDaily=TEMP_DIA
New PVSystem.GD_4d399f10bff678c37fd145bc269facdb2b45599a64fc41f7e5b28d982dd9ceb4_3 phases=1 bus1=node_420968880.3.4 conn=wye kv=0.1270 pf=1 pmpp=17.54 kva=17.54 irradiance=1 temperature=25 %cutin=20 %cutout=20 effcurve=MyEff P-TCurve=MyPvsT Daily=IRRAD_DIA TDaily=TEMP_DIA
New PVSystem.GD_d82cb17335ee4d0716932320d038beef451369b965f5db48b67f3451c91c2e59_1 phases=1 bus1=node_420961889.1.4 conn=wye kv=0.1200 pf=1 pmpp=0.05 kva=0.10 irradiance=1 temperature=25 %cutin=20 %cutout=20 effcurve=MyEff P-TCurve=MyPvsT Daily=IRRAD_DIA TDaily=TEMP_DIA
New PVSystem.GD_d82cb17335ee4d0716932320d038beef451369b965f5db48b67f3451c91c2e59_2 phases=1 bus1=node_420961889.2.4 conn=wye kv=0.1200 pf=1 pmpp=0.05 kva=0.10 irradiance=1 temperature=25 %cutin=20 %cutout=20 effcurve=MyEff P-TCurve=MyPvsT Daily=IRRAD_DIA TDaily=TEMP_DIA
New PVSystem.GD_836b2bdd3ef239045477a33071223bfcd82d6f738e070878685895bea3ee156f_1 phases=1 bus1=node_2011005039.1.4 conn=wye kv=0.1200 pf=1 pmpp=1.11 kva=1.11 irradiance=1 temperature=25 %cutin=20 %cutout=20 effcurve=MyEff P-TCurve=MyPvsT Daily=IRRAD_DIA TDaily=TEMP_DIA
New PVSystem.GD_836b2bdd3ef239045477a33071223bfcd82d6f738e070878685895bea3ee156f_2 phases=1 bus1=node_2011005039.2.4 conn=wye kv=0.1200 pf=1 pmpp=1.11 kva=1.11 irradiance=1 temperature=25 %cutin=20 %cutout=20 effcurve=MyEff P-TCurve=MyPvsT Daily=IRRAD_DIA TDaily=TEMP_DIA
New PVSystem.GD_36e17bfc0ab3110718e2f18b40346bd03912058bb70dc971e869daef609b8aad_1 phases=1 bus1=node_419298437.1.4 conn=wye kv=0.1200 pf=1 pmpp=1.30 kva=1.30 irradiance=1 temperature=25 %cutin=20 %cutout=20 effcurve=MyEff P-TCurve=MyPvsT Daily=IRRAD_DIA TDaily=TEMP_DIA
New PVSystem.GD_36e17bfc0ab3110718e2f18b40346bd03912058bb70dc971e869daef609b8aad_2 phases=1 bus1=node_419298437.2.4 conn=wye kv=0.1200 pf=1 pmpp=1.30 kva=1.30 irradiance=1 temperature=25 %cutin=20 %cutout=20 effcurve=MyEff P-TCurve=MyPvsT Daily=IRRAD_DIA TDaily=TEMP_DIA
New PVSystem.GD_91c23b14ad32aa750deb395d4601a8da3577785f16df72615bc91317afd5ca17_1 phases=1 bus1=node_421007785.1.4 conn=wye kv=0.1270 pf=1 pmpp=1.23 kva=1.23 irradiance=1 temperature=25 %cutin=20 %cutout=20 effcurve=MyEff P-TCurve=MyPvsT Daily=IRRAD_DIA TDaily=TEMP_DIA
New PVSystem.GD_91c23b14ad32aa750deb395d4601a8da3577785f16df72615bc91317afd5ca17_2 phases=1 bus1=node_421007785.2.4 conn=wye kv=0.1270 pf=1 pmpp=1.23 kva=1.23 irradiance=1 temperature=25 %cutin=20 %cutout=20 effcurve=MyEff P-TCurve=MyPvsT Daily=IRRAD_DIA TDaily=TEMP_DIA
New PVSystem.GD_91c23b14ad32aa750deb395d4601a8da3577785f16df72615bc91317afd5ca17_3 phases=1 bus1=node_421007785.3.4 conn=wye kv=0.1270 pf=1 pmpp=1.23 kva=1.23 irradiance=1 temperature=25 %cutin=20 %cutout=20 effcurve=MyEff P-TCurve=MyPvsT Daily=IRRAD_DIA TDaily=TEMP_DIA
New PVSystem.GD_9853fac7446806bbdac2bd8b08e6a62d2be9cd6d751c4c9607d801f6ec1222e0_1 phases=1 bus1=node_421016327.1.4 conn=wye kv=0.1270 pf=1 pmpp=2.14 kva=2.14 irradiance=1 temperature=25 %cutin=20 %cutout=20 effcurve=MyEff P-TCurve=MyPvsT Daily=IRRAD_DIA TDaily=TEMP_DIA
New PVSystem.GD_9853fac7446806bbdac2bd8b08e6a62d2be9cd6d751c4c9607d801f6ec1222e0_2 phases=1 bus1=node_421016327.2.4 conn=wye kv=0.1270 pf=1 pmpp=2.14 kva=2.14 irradiance=1 temperature=25 %cutin=20 %cutout=20 effcurve=MyEff P-TCurve=MyPvsT Daily=IRRAD_DIA TDaily=TEMP_DIA
New PVSystem.GD_9853fac7446806bbdac2bd8b08e6a62d2be9cd6d751c4c9607d801f6ec1222e0_3 phases=1 bus1=node_421016327.3.4 conn=wye kv=0.1270 pf=1 pmpp=2.14 kva=2.14 irradiance=1 temperature=25 %cutin=20 %cutout=20 effcurve=MyEff P-TCurve=MyPvsT Daily=IRRAD_DIA TDaily=TEMP_DIA
New PVSystem.GD_446ee53bc5f7c649aeb61734b1c67fd2501ada503f83da222dc0a757a7a43ca9_1 phases=1 bus1=node_421007482.1.4 conn=wye kv=0.1270 pf=1 pmpp=2.60 kva=2.60 irradiance=1 temperature=25 %cutin=20 %cutout=20 effcurve=MyEff P-TCurve=MyPvsT Daily=IRRAD_DIA TDaily=TEMP_DIA
New PVSystem.GD_446ee53bc5f7c649aeb61734b1c67fd2501ada503f83da222dc0a757a7a43ca9_2 phases=1 bus1=node_421007482.2.4 conn=wye kv=0.1270 pf=1 pmpp=2.60 kva=2.60 irradiance=1 temperature=25 %cutin=20 %cutout=20 effcurve=MyEff P-TCurve=MyPvsT Daily=IRRAD_DIA TDaily=TEMP_DIA
New PVSystem.GD_446ee53bc5f7c649aeb61734b1c67fd2501ada503f83da222dc0a757a7a43ca9_3 phases=1 bus1=node_421007482.3.4 conn=wye kv=0.1270 pf=1 pmpp=2.60 kva=2.60 irradiance=1 temperature=25 %cutin=20 %cutout=20 effcurve=MyEff P-TCurve=MyPvsT Daily=IRRAD_DIA TDaily=TEMP_DIA
