! Chaves normalmente abertas — estado fixado apos a montagem.
Open Line.365669775 1
Open Line.365743943 1
Open Line.365816638 1
Open Line.365889221 1
Open Line.367766328 1
Open Line.367766196 1
Open Line.365763817 1
Open Line.365793162 1
Open Line.365607715 1
Open Line.365607542 1
Open Line.365783141 1
Open Line.365607601 1
Open Line.367765833 1
Open Line.367788563 1
Open Line.367766275 1
Open Line.367766231 1
Open Line.365744970 1
Open Line.365606556 1
Open Line.2779150709 1
Open Line.1049771398 1
Open Line.1416045299 1
Open Line.2661275561 1
Open Line.367766319 1
Open Line.367766039 1
Open Line.1411734127 1
Open Line.982434917 1
Open Line.367765956 1
Open Line.367788193 1
Open Line.365766906 1
Open Line.367766414 1
Open Line.367766453 1
Open Line.367766488 1
Open Line.1163631134 1
Open Line.1148164119 1
Open Line.365888483 1
Open Line.1788777381 1
Open Line.1102372881 1
Open Line.1300944754 1
Open Line.367788489 1
Open Line.1141723107 1
Open Line.367765877 1
Open Line.1343631416 1
Open Line.1788631386 1
Open Line.365838911 1
Open Line.367766354 1
Open Line.367766118 1
Open Line.367766187 1
Open Line.1788734441 1
Open Line.970182332 1
Open Line.367766384 1
Open Line.365649012 1
Open Line.1125371576 1
Open Line.970306883 1
Open Line.367766148 1
Open Line.1017167152 1
Open Line.365889231 1
Open Line.2725037247 1
Open Line.367766083 1
Open Line.367788637 1
Open Line.420236751 1
Open Line.955685659 1
Open Line.367788267 1
Open Line.367788341 1
Open Line.367796846 1
Open Line.367788119 1
Open Line.1214858601 1
Open Line.367788415 1
Open Line.1788601320 1
Open Line.195291721 1
Open Line.195291678 1
Open Line.195291709 1
