! GERACAO DISTRIBUIDA — gerada de UGBT_tab e UGMT_tab
! Unidades com potencia nula sao omitidas (gerariam NaN).
! 62 unidades descartadas por potencia nula.
! 127 unidades de BT realocadas para o secundario do transformador (rede secundaria nao modelada).
! 0 unidades descartadas por ponto de conexao ausente da rede.
! irradiance=1 — ver o docstring: 1,0 e meio-dia de ceu claro, nao a ponta de carga.
! 4 barras tiveram a GD limitada a capacidade do transformador (22 kW cortados).
! inversores em pf=1 — ver o docstring de _pv: 0,92 e capacidade exigida pelo PRODIST, nao despacho.
! 0 unidades de MT ligadas pelo PAC da carga (casadas por CEG_GD): o PAC da UGMT nao existe na SSDMT.
New PVSystem.GD_5e783e49f78abb2de42ed2ab0fa3703c4d2dddb1b1ad11e91d758a74f9ff60f6 phases=3 bus1=node_123244246.1.2.3 conn=wye kv=13.8000 pf=1 pmpp=39.05 kva=39.05 irradiance=1 temperature=25 %cutin=20 %cutout=20 effcurve=MyEff P-TCurve=MyPvsT Daily=IRRAD_DIA TDaily=TEMP_DIA
New PVSystem.GD_e50bda3dbcb9f7021b773d2ad5a65c2de5863e08352602c932da33eced964ddd phases=3 bus1=node_122754873.1.2.3 conn=wye kv=13.8000 pf=1 pmpp=21.48 kva=21.48 irradiance=1 temperature=25 %cutin=20 %cutout=20 effcurve=MyEff P-TCurve=MyPvsT Daily=IRRAD_DIA TDaily=TEMP_DIA
New PVSystem.GD_eb54d5b837ea538decdcc27450b780b79033372c7f39532605eec46ba8fcde33 phases=3 bus1=node_122756098.1.2.3 conn=wye kv=13.8000 pf=1 pmpp=38.67 kva=38.67 irradiance=1 temperature=25 %cutin=20 %cutout=20 effcurve=MyEff P-TCurve=MyPvsT Daily=IRRAD_DIA TDaily=TEMP_DIA
New PVSystem.GD_f2ecd1546bb9f674a50ab93482d961059d96b1d0b674609e0859168ccfa36f05 phases=3 bus1=node_122754618.1.2.3 conn=wye kv=13.8000 pf=1 pmpp=36.24 kva=36.24 irradiance=1 temperature=25 %cutin=20 %cutout=20 effcurve=MyEff P-TCurve=MyPvsT Daily=IRRAD_DIA TDaily=TEMP_DIA
New PVSystem.GD_a537e1d2e1ffd706adb814aed619e93f42634769decaa8ac3a66c1bb31188449 phases=3 bus1=node_122754913.1.2.3 conn=wye kv=13.8000 pf=1 pmpp=13.08 kva=13.08 irradiance=1 temperature=25 %cutin=20 %cutout=20 effcurve=MyEff P-TCurve=MyPvsT Daily=IRRAD_DIA TDaily=TEMP_DIA
New PVSystem.GD_aa5fd6e553f9666fff98a8f4eced0ec438c70b70a8d28dd61fb065e04d843eb2 phases=3 bus1=node_1686493319.1.2.3 conn=wye kv=13.8000 pf=1 pmpp=368.85 kva=368.85 irradiance=1 temperature=25 %cutin=20 %cutout=20 effcurve=MyEff P-TCurve=MyPvsT Daily=IRRAD_DIA TDaily=TEMP_DIA
New PVSystem.GD_d51c7fec2fd3091e44b7d46d977c60663e251f4a4a05d63b974485eb1c635051_1 phases=1 bus1=node_423533200.1.4 conn=wye kv=0.1200 pf=1 pmpp=0.45 kva=0.45 irradiance=1 temperature=25 %cutin=20 %cutout=20 effcurve=MyEff P-TCurve=MyPvsT Daily=IRRAD_DIA TDaily=TEMP_DIA
New PVSystem.GD_d51c7fec2fd3091e44b7d46d977c60663e251f4a4a05d63b974485eb1c635051_2 phases=1 bus1=node_423533200.2.4 conn=wye kv=0.1200 pf=1 pmpp=0.45 kva=0.45 irradiance=1 temperature=25 %cutin=20 %cutout=20 effcurve=MyEff P-TCurve=MyPvsT Daily=IRRAD_DIA TDaily=TEMP_DIA
New PVSystem.GD_ed4ff7a002927e3f2ac4e7473e0ee992d20af947c9a7d77ab38a4ae5b0b87e0c_1 phases=1 bus1=node_418315568.1.4 conn=wye kv=0.1270 pf=1 pmpp=0.78 kva=0.78 irradiance=1 temperature=25 %cutin=20 %cutout=20 effcurve=MyEff P-TCurve=MyPvsT Daily=IRRAD_DIA TDaily=TEMP_DIA
New PVSystem.GD_ed4ff7a002927e3f2ac4e7473e0ee992d20af947c9a7d77ab38a4ae5b0b87e0c_2 phases=1 bus1=node_418315568.2.4 conn=wye kv=0.1270 pf=1 pmpp=0.78 kva=0.78 irradiance=1 temperature=25 %cutin=20 %cutout=20 effcurve=MyEff P-TCurve=MyPvsT Daily=IRRAD_DIA TDaily=TEMP_DIA
New PVSystem.GD_ed4ff7a002927e3f2ac4e7473e0ee992d20af947c9a7d77ab38a4ae5b0b87e0c_3 phases=1 bus1=node_418315568.3.4 conn=wye kv=0.1270 pf=1 pmpp=0.78 kva=0.78 irradiance=1 temperature=25 %cutin=20 %cutout=20 effcurve=MyEff P-TCurve=MyPvsT Daily=IRRAD_DIA TDaily=TEMP_DIA
New PVSystem.GD_32e2bf22b7aab246215f5540c263bb0d99cd8a3e64567a35a168b01888f85a59_1 phases=1 bus1=node_418401018.1.4 conn=wye kv=0.1270 pf=1 pmpp=0.47 kva=0.47 irradiance=1 temperature=25 %cutin=20 %cutout=20 effcurve=MyEff P-TCurve=MyPvsT Daily=IRRAD_DIA TDaily=TEMP_DIA
New PVSystem.GD_32e2bf22b7aab246215f5540c263bb0d99cd8a3e64567a35a168b01888f85a59_2 phases=1 bus1=node_418401018.2.4 conn=wye kv=0.1270 pf=1 pmpp=0.47 kva=0.47 irradiance=1 temperature=25 %cutin=20 %cutout=20 effcurve=MyEff P-TCurve=MyPvsT Daily=IRRAD_DIA TDaily=TEMP_DIA
New PVSystem.GD_32e2bf22b7aab246215f5540c263bb0d99cd8a3e64567a35a168b01888f85a59_3 phases=1 bus1=node_418401018.3.4 conn=wye kv=0.1270 pf=1 pmpp=0.47 kva=0.47 irradiance=1 temperature=25 %cutin=20 %cutout=20 effcurve=MyEff P-TCurve=MyPvsT Daily=IRRAD_DIA TDaily=TEMP_DIA
New PVSystem.GD_4cde1488298c70fb5443cb38270a97fd49ecc82dfdd52cb6e44d9c427ae9ebfd_1 phases=1 bus1=node_418402143.1.4 conn=wye kv=0.1270 pf=1 pmpp=1.34 kva=1.34 irradiance=1 temperature=25 %cutin=20 %cutout=20 effcurve=MyEff P-TCurve=MyPvsT Daily=IRRAD_DIA TDaily=TEMP_DIA
New PVSystem.GD_4cde1488298c70fb5443cb38270a97fd49ecc82dfdd52cb6e44d9c427ae9ebfd_2 phases=1 bus1=node_418402143.2.4 conn=wye kv=0.1270 pf=1 pmpp=1.34 kva=1.34 irradiance=1 temperature=25 %cutin=20 %cutout=20 effcurve=MyEff P-TCurve=MyPvsT Daily=IRRAD_DIA TDaily=TEMP_DIA
New PVSystem.GD_4cde1488298c70fb5443cb38270a97fd49ecc82dfdd52cb6e44d9c427ae9ebfd_3 phases=1 bus1=node_418402143.3.4 conn=wye kv=0.1270 pf=1 pmpp=1.34 kva=1.34 irradiance=1 temperature=25 %cutin=20 %cutout=20 effcurve=MyEff P-TCurve=MyPvsT Daily=IRRAD_DIA TDaily=TEMP_DIA
New PVSystem.GD_2fcd3349ed6452b841255f414aacf91d3ec652f03bb0776f11849343660e52fb_1 phases=1 bus1=node_418402974.1.4 conn=wye kv=0.1270 pf=1 pmpp=0.50 kva=0.50 irradiance=1 temperature=25 %cutin=20 %cutout=20 effcurve=MyEff P-TCurve=MyPvsT Daily=IRRAD_DIA TDaily=TEMP_DIA
New PVSystem.GD_2fcd3349ed6452b841255f414aacf91d3ec652f03bb0776f11849343660e52fb_2 phases=1 bus1=node_418402974.2.4 conn=wye kv=0.1270 pf=1 pmpp=0.50 kva=0.50 irradiance=1 temperature=25 %cutin=20 %cutout=20 effcurve=MyEff P-TCurve=MyPvsT Daily=IRRAD_DIA TDaily=TEMP_DIA
New PVSystem.GD_2fcd3349ed6452b841255f414aacf91d3ec652f03bb0776f11849343660e52fb_3 phases=1 bus1=node_418402974.3.4 conn=wye kv=0.1270 pf=1 pmpp=0.50 kva=0.50 irradiance=1 temperature=25 %cutin=20 %cutout=20 effcurve=MyEff P-TCurve=MyPvsT Daily=IRRAD_DIA TDaily=TEMP_DIA
New PVSystem.GD_991c0a7e0668cbe798ae6b424ef4d33a7bb751dafe0ddd8c4c879bfbe6cba1d0_1 phases=1 bus1=node_418402140.1.4 conn=wye kv=0.1270 pf=1 pmpp=0.73 kva=0.73 irradiance=1 temperature=25 %cutin=20 %cutout=20 effcurve=MyEff P-TCurve=MyPvsT Daily=IRRAD_DIA TDaily=TEMP_DIA
New PVSystem.GD_991c0a7e0668cbe798ae6b424ef4d33a7bb751dafe0ddd8c4c879bfbe6cba1d0_2 phases=1 bus1=node_418402140.2.4 conn=wye kv=0.1270 pf=1 pmpp=0.73 kva=0.73 irradiance=1 temperature=25 %cutin=20 %cutout=20 effcurve=MyEff P-TCurve=MyPvsT Daily=IRRAD_DIA TDaily=TEMP_DIA
New PVSystem.GD_991c0a7e0668cbe798ae6b424ef4d33a7bb751dafe0ddd8c4c879bfbe6cba1d0_3 phases=1 bus1=node_418402140.3.4 conn=wye kv=0.1270 pf=1 pmpp=0.73 kva=0.73 irradiance=1 temperature=25 %cutin=20 %cutout=20 effcurve=MyEff P-TCurve=MyPvsT Daily=IRRAD_DIA TDaily=TEMP_DIA
New PVSystem.GD_5e326769f433df922e6054c51542f40667318fcd75523b867d0bb0ca6e7ef457_1 phases=1 bus1=node_418402140.1.4 conn=wye kv=0.1270 pf=1 pmpp=0.44 kva=0.44 irradiance=1 temperature=25 %cutin=20 %cutout=20 effcurve=MyEff P-TCurve=MyPvsT Daily=IRRAD_DIA TDaily=TEMP_DIA
New PVSystem.GD_5e326769f433df922e6054c51542f40667318fcd75523b867d0bb0ca6e7ef457_2 phases=1 bus1=node_418402140.2.4 conn=wye kv=0.1270 pf=1 pmpp=0.44 kva=0.44 irradiance=1 temperature=25 %cutin=20 %cutout=20 effcurve=MyEff P-TCurve=MyPvsT Daily=IRRAD_DIA TDaily=TEMP_DIA
New PVSystem.GD_5e326769f433df922e6054c51542f40667318fcd75523b867d0bb0ca6e7ef457_3 phases=1 bus1=node_418402140.3.4 conn=wye kv=0.1270 pf=1 pmpp=0.44 kva=0.44 irradiance=1 temperature=25 %cutin=20 %cutout=20 effcurve=MyEff P-TCurve=MyPvsT Daily=IRRAD_DIA TDaily=TEMP_DIA
New PVSystem.GD_4b9864456c35410d4ae80aeb743ff77b57f0f5346752ce7396a47f986d6a63c3_1 phases=1 bus1=node_418976959.1.4 conn=wye kv=0.1200 pf=1 pmpp=1.92 kva=1.92 irradiance=1 temperature=25 %cutin=20 %cutout=20 effcurve=MyEff P-TCurve=MyPvsT Daily=IRRAD_DIA TDaily=TEMP_DIA
New PVSystem.GD_4b9864456c35410d4ae80aeb743ff77b57f0f5346752ce7396a47f986d6a63c3_2 phases=1 bus1=node_418976959.2.4 conn=wye kv=0.1200 pf=1 pmpp=1.92 kva=1.92 irradiance=1 temperature=25 %cutin=20 %cutout=20 effcurve=MyEff P-TCurve=MyPvsT Daily=IRRAD_DIA TDaily=TEMP_DIA
New PVSystem.GD_015c118bb288c8012fd2fde506c2d10a15dce0a0a1cdf2b32d5daf60f1b393e1_1 phases=1 bus1=node_418292341.1.4 conn=wye kv=0.1200 pf=1 pmpp=10.52 kva=10.52 irradiance=1 temperature=25 %cutin=20 %cutout=20 effcurve=MyEff P-TCurve=MyPvsT Daily=IRRAD_DIA TDaily=TEMP_DIA
New PVSystem.GD_015c118bb288c8012fd2fde506c2d10a15dce0a0a1cdf2b32d5daf60f1b393e1_2 phases=1 bus1=node_418292341.2.4 conn=wye kv=0.1200 pf=1 pmpp=10.52 kva=10.52 irradiance=1 temperature=25 %cutin=20 %cutout=20 effcurve=MyEff P-TCurve=MyPvsT Daily=IRRAD_DIA TDaily=TEMP_DIA
New PVSystem.GD_df6fbb475b88ba7fbaf298b8fc261323b1ca47913ff177dd2e2f7e0bf6ee0f40_1 phases=1 bus1=node_419139061.1.4 conn=wye kv=0.1200 pf=1 pmpp=1.54 kva=1.54 irradiance=1 temperature=25 %cutin=20 %cutout=20 effcurve=MyEff P-TCurve=MyPvsT Daily=IRRAD_DIA TDaily=TEMP_DIA
New PVSystem.GD_df6fbb475b88ba7fbaf298b8fc261323b1ca47913ff177dd2e2f7e0bf6ee0f40_2 phases=1 bus1=node_419139061.2.4 conn=wye kv=0.1200 pf=1 pmpp=1.54 kva=1.54 irradiance=1 temperature=25 %cutin=20 %cutout=20 effcurve=MyEff P-TCurve=MyPvsT Daily=IRRAD_DIA TDaily=TEMP_DIA
New PVSystem.GD_c7c914889636bf37394c0cf8edf4e3692b1d716877493b60c061fe65c3f22906_1 phases=1 bus1=node_418313228.1.4 conn=wye kv=0.1200 pf=1 pmpp=3.45 kva=3.45 irradiance=1 temperature=25 %cutin=20 %cutout=20 effcurve=MyEff P-TCurve=MyPvsT Daily=IRRAD_DIA TDaily=TEMP_DIA
New PVSystem.GD_c7c914889636bf37394c0cf8edf4e3692b1d716877493b60c061fe65c3f22906_2 phases=1 bus1=node_418313228.2.4 conn=wye kv=0.1200 pf=1 pmpp=3.45 kva=3.45 irradiance=1 temperature=25 %cutin=20 %cutout=20 effcurve=MyEff P-TCurve=MyPvsT Daily=IRRAD_DIA TDaily=TEMP_DIA
New PVSystem.GD_d5108aa547646a713c88bf67959c68b31d2bd5617837bf647d62df2e5f810d43_1 phases=1 bus1=node_418294381.1.4 conn=wye kv=0.1270 pf=1 pmpp=1.01 kva=1.01 irradiance=1 temperature=25 %cutin=20 %cutout=20 effcurve=MyEff P-TCurve=MyPvsT Daily=IRRAD_DIA TDaily=TEMP_DIA
New PVSystem.GD_d5108aa547646a713c88bf67959c68b31d2bd5617837bf647d62df2e5f810d43_2 phases=1 bus1=node_418294381.2.4 conn=wye kv=0.1270 pf=1 pmpp=1.01 kva=1.01 irradiance=1 temperature=25 %cutin=20 %cutout=20 effcurve=MyEff P-TCurve=MyPvsT Daily=IRRAD_DIA TDaily=TEMP_DIA
New PVSystem.GD_d5108aa547646a713c88bf67959c68b31d2bd5617837bf647d62df2e5f810d43_3 phases=1 bus1=node_418294381.3.4 conn=wye kv=0.1270 pf=1 pmpp=1.01 kva=1.01 irradiance=1 temperature=25 %cutin=20 %cutout=20 effcurve=MyEff P-TCurve=MyPvsT Daily=IRRAD_DIA TDaily=TEMP_DIA
New PVSystem.GD_42cc461b1d30637b606523b2b9a94a1cd8e21d51f42e0654cfe800ca1df77f9c_1 phases=1 bus1=node_418294411.1.4 conn=wye kv=0.1270 pf=1 pmpp=0.60 kva=0.60 irradiance=1 temperature=25 %cutin=20 %cutout=20 effcurve=MyEff P-TCurve=MyPvsT Daily=IRRAD_DIA TDaily=TEMP_DIA
New PVSystem.GD_42cc461b1d30637b606523b2b9a94a1cd8e21d51f42e0654cfe800ca1df77f9c_2 phases=1 bus1=node_418294411.2.4 conn=wye kv=0.1270 pf=1 pmpp=0.60 kva=0.60 irradiance=1 temperature=25 %cutin=20 %cutout=20 effcurve=MyEff P-TCurve=MyPvsT Daily=IRRAD_DIA TDaily=TEMP_DIA
New PVSystem.GD_42cc461b1d30637b606523b2b9a94a1cd8e21d51f42e0654cfe800ca1df77f9c_3 phases=1 bus1=node_418294411.3.4 conn=wye kv=0.1270 pf=1 pmpp=0.60 kva=0.60 irradiance=1 temperature=25 %cutin=20 %cutout=20 effcurve=MyEff P-TCurve=MyPvsT Daily=IRRAD_DIA TDaily=TEMP_DIA
New PVSystem.GD_793f34bde00247aaffc4b2dbfe7812cf14787a27b819bb3c114a3a7f6397998c_1 phases=1 bus1=node_418312919.1.4 conn=wye kv=0.1200 pf=1 pmpp=7.37 kva=7.37 irradiance=1 temperature=25 %cutin=20 %cutout=20 effcurve=MyEff P-TCurve=MyPvsT Daily=IRRAD_DIA TDaily=TEMP_DIA
New PVSystem.GD_793f34bde00247aaffc4b2dbfe7812cf14787a27b819bb3c114a3a7f6397998c_2 phases=1 bus1=node_418312919.2.4 conn=wye kv=0.1200 pf=1 pmpp=7.37 kva=7.37 irradiance=1 temperature=25 %cutin=20 %cutout=20 effcurve=MyEff P-TCurve=MyPvsT Daily=IRRAD_DIA TDaily=TEMP_DIA
New PVSystem.GD_0ee51c533f2f5f21e3eb88db3001b12e828ee5fba80bb3b8f91fd0bfad05a782_1 phases=1 bus1=node_419310582.1.4 conn=wye kv=0.1200 pf=1 pmpp=0.44 kva=0.44 irradiance=1 temperature=25 %cutin=20 %cutout=20 effcurve=MyEff P-TCurve=MyPvsT Daily=IRRAD_DIA TDaily=TEMP_DIA
New PVSystem.GD_0ee51c533f2f5f21e3eb88db3001b12e828ee5fba80bb3b8f91fd0bfad05a782_2 phases=1 bus1=node_419310582.2.4 conn=wye kv=0.1200 pf=1 pmpp=0.44 kva=0.44 irradiance=1 temperature=25 %cutin=20 %cutout=20 effcurve=MyEff P-TCurve=MyPvsT Daily=IRRAD_DIA TDaily=TEMP_DIA
New PVSystem.GD_e6bf653f4a3e127371ef1aa65e4371c4cda6629e241df38dd7f40af60dc016bf_1 phases=1 bus1=node_419347165.1.4 conn=wye kv=0.1200 pf=1 pmpp=1.66 kva=1.66 irradiance=1 temperature=25 %cutin=20 %cutout=20 effcurve=MyEff P-TCurve=MyPvsT Daily=IRRAD_DIA TDaily=TEMP_DIA
New PVSystem.GD_e6bf653f4a3e127371ef1aa65e4371c4cda6629e241df38dd7f40af60dc016bf_2 phases=1 bus1=node_419347165.2.4 conn=wye kv=0.1200 pf=1 pmpp=1.66 kva=1.66 irradiance=1 temperature=25 %cutin=20 %cutout=20 effcurve=MyEff P-TCurve=MyPvsT Daily=IRRAD_DIA TDaily=TEMP_DIA
New PVSystem.GD_46fd22e0871895ef0d4e5ed18b844b93974c91b14e1b0027074c60a446229388_1 phases=1 bus1=node_419208645.1.4 conn=wye kv=0.1200 pf=1 pmpp=0.89 kva=0.89 irradiance=1 temperature=25 %cutin=20 %cutout=20 effcurve=MyEff P-TCurve=MyPvsT Daily=IRRAD_DIA TDaily=TEMP_DIA
New PVSystem.GD_46fd22e0871895ef0d4e5ed18b844b93974c91b14e1b0027074c60a446229388_2 phases=1 bus1=node_419208645.2.4 conn=wye kv=0.1200 pf=1 pmpp=0.89 kva=0.89 irradiance=1 temperature=25 %cutin=20 %cutout=20 effcurve=MyEff P-TCurve=MyPvsT Daily=IRRAD_DIA TDaily=TEMP_DIA
New PVSystem.GD_41244bf6d1eafeddac5cb95cbf14f1a5757c7700ba9d7b833e1de7c99672f39e_1 phases=1 bus1=node_419343961.1.4 conn=wye kv=0.1200 pf=1 pmpp=2.91 kva=2.91 irradiance=1 temperature=25 %cutin=20 %cutout=20 effcurve=MyEff P-TCurve=MyPvsT Daily=IRRAD_DIA TDaily=TEMP_DIA
New PVSystem.GD_41244bf6d1eafeddac5cb95cbf14f1a5757c7700ba9d7b833e1de7c99672f39e_2 phases=1 bus1=node_419343961.2.4 conn=wye kv=0.1200 pf=1 pmpp=2.91 kva=2.91 irradiance=1 temperature=25 %cutin=20 %cutout=20 effcurve=MyEff P-TCurve=MyPvsT Daily=IRRAD_DIA TDaily=TEMP_DIA
New PVSystem.GD_8f30fff11ffe638f90ec99dc3ac3ddc748b69724893a4cb85f3622cddcd599e1_1 phases=1 bus1=node_418726915.1.4 conn=wye kv=0.1270 pf=1 pmpp=22.30 kva=22.30 irradiance=1 temperature=25 %cutin=20 %cutout=20 effcurve=MyEff P-TCurve=MyPvsT Daily=IRRAD_DIA TDaily=TEMP_DIA
New PVSystem.GD_8f30fff11ffe638f90ec99dc3ac3ddc748b69724893a4cb85f3622cddcd599e1_2 phases=1 bus1=node_418726915.2.4 conn=wye kv=0.1270 pf=1 pmpp=22.30 kva=22.30 irradiance=1 temperature=25 %cutin=20 %cutout=20 effcurve=MyEff P-TCurve=MyPvsT Daily=IRRAD_DIA TDaily=TEMP_DIA
New PVSystem.GD_8f30fff11ffe638f90ec99dc3ac3ddc748b69724893a4cb85f3622cddcd599e1_3 phases=1 bus1=node_418726915.3.4 conn=wye kv=0.1270 pf=1 pmpp=22.30 kva=22.30 irradiance=1 temperature=25 %cutin=20 %cutout=20 effcurve=MyEff P-TCurve=MyPvsT Daily=IRRAD_DIA TDaily=TEMP_DIA
New PVSystem.GD_91d1453eee220d7250b7bac72f8a5a9df8f4491c6aaa2f718122e75ae7ad1def_1 phases=1 bus1=node_419310090.1.4 conn=wye kv=0.1200 pf=1 pmpp=6.44 kva=6.44 irradiance=1 temperature=25 %cutin=20 %cutout=20 effcurve=MyEff P-TCurve=MyPvsT Daily=IRRAD_DIA TDaily=TEMP_DIA
New PVSystem.GD_91d1453eee220d7250b7bac72f8a5a9df8f4491c6aaa2f718122e75ae7ad1def_2 phases=1 bus1=node_419310090.2.4 conn=wye kv=0.1200 pf=1 pmpp=6.44 kva=6.44 irradiance=1 temperature=25 %cutin=20 %cutout=20 effcurve=MyEff P-TCurve=MyPvsT Daily=IRRAD_DIA TDaily=TEMP_DIA
New PVSystem.GD_c4db70b06b40ae36e70c94b130b2b1549f4407693344a5cbe4915fe7686b1939_1 phases=1 bus1=node_1287079289.1.4 conn=wye kv=0.1200 pf=1 pmpp=2.50 kva=2.50 irradiance=1 temperature=25 %cutin=20 %cutout=20 effcurve=MyEff P-TCurve=MyPvsT Daily=IRRAD_DIA TDaily=TEMP_DIA
New PVSystem.GD_c4db70b06b40ae36e70c94b130b2b1549f4407693344a5cbe4915fe7686b1939_2 phases=1 bus1=node_1287079289.2.4 conn=wye kv=0.1200 pf=1 pmpp=2.50 kva=2.50 irradiance=1 temperature=25 %cutin=20 %cutout=20 effcurve=MyEff P-TCurve=MyPvsT Daily=IRRAD_DIA TDaily=TEMP_DIA
New PVSystem.GD_0a30b6bfabfef9a24de4d840568fc5e2a4152536f60983fcd150e59f6839a857_1 phases=1 bus1=node_419006593.1.4 conn=wye kv=0.1200 pf=1 pmpp=0.62 kva=0.62 irradiance=1 temperature=25 %cutin=20 %cutout=20 effcurve=MyEff P-TCurve=MyPvsT Daily=IRRAD_DIA TDaily=TEMP_DIA
New PVSystem.GD_0a30b6bfabfef9a24de4d840568fc5e2a4152536f60983fcd150e59f6839a857_2 phases=1 bus1=node_419006593.2.4 conn=wye kv=0.1200 pf=1 pmpp=0.62 kva=0.62 irradiance=1 temperature=25 %cutin=20 %cutout=20 effcurve=MyEff P-TCurve=MyPvsT Daily=IRRAD_DIA TDaily=TEMP_DIA
New PVSystem.GD_c79cc23e894153f85a76cf7d1c6eac0ec883607abcf957af3d89da85854e2380_1 phases=1 bus1=node_418292269.1.4 conn=wye kv=0.1270 pf=1 pmpp=7.50 kva=7.50 irradiance=1 temperature=25 %cutin=20 %cutout=20 effcurve=MyEff P-TCurve=MyPvsT Daily=IRRAD_DIA TDaily=TEMP_DIA
New PVSystem.GD_c79cc23e894153f85a76cf7d1c6eac0ec883607abcf957af3d89da85854e2380_2 phases=1 bus1=node_418292269.2.4 conn=wye kv=0.1270 pf=1 pmpp=7.50 kva=7.50 irradiance=1 temperature=25 %cutin=20 %cutout=20 effcurve=MyEff P-TCurve=MyPvsT Daily=IRRAD_DIA TDaily=TEMP_DIA
New PVSystem.GD_c79cc23e894153f85a76cf7d1c6eac0ec883607abcf957af3d89da85854e2380_3 phases=1 bus1=node_418292269.3.4 conn=wye kv=0.1270 pf=1 pmpp=7.50 kva=7.50 irradiance=1 temperature=25 %cutin=20 %cutout=20 effcurve=MyEff P-TCurve=MyPvsT Daily=IRRAD_DIA TDaily=TEMP_DIA
New PVSystem.GD_7e222bf6fb333de2126939d788d05f3a7b19aec57bd20f4514462a84026cff5c_1 phases=1 bus1=node_418761311.1.4 conn=wye kv=0.1200 pf=1 pmpp=4.37 kva=4.37 irradiance=1 temperature=25 %cutin=20 %cutout=20 effcurve=MyEff P-TCurve=MyPvsT Daily=IRRAD_DIA TDaily=TEMP_DIA
New PVSystem.GD_7e222bf6fb333de2126939d788d05f3a7b19aec57bd20f4514462a84026cff5c_2 phases=1 bus1=node_418761311.2.4 conn=wye kv=0.1200 pf=1 pmpp=4.37 kva=4.37 irradiance=1 temperature=25 %cutin=20 %cutout=20 effcurve=MyEff P-TCurve=MyPvsT Daily=IRRAD_DIA TDaily=TEMP_DIA
New PVSystem.GD_fc34a45a620babc060f75575ff0945878718ce1a7a8f651b2675ca02c4cf39cd_1 phases=1 bus1=node_418313210.1.4 conn=wye kv=0.1200 pf=1 pmpp=1.75 kva=1.75 irradiance=1 temperature=25 %cutin=20 %cutout=20 effcurve=MyEff P-TCurve=MyPvsT Daily=IRRAD_DIA TDaily=TEMP_DIA
New PVSystem.GD_fc34a45a620babc060f75575ff0945878718ce1a7a8f651b2675ca02c4cf39cd_2 phases=1 bus1=node_418313210.2.4 conn=wye kv=0.1200 pf=1 pmpp=1.75 kva=1.75 irradiance=1 temperature=25 %cutin=20 %cutout=20 effcurve=MyEff P-TCurve=MyPvsT Daily=IRRAD_DIA TDaily=TEMP_DIA
New PVSystem.GD_76c0f88674750d25f1a960e815049ae3f1d96ed45a67e8a9b277c1ef670f0d07_1 phases=1 bus1=node_418315244.1.4 conn=wye kv=0.1270 pf=1 pmpp=1.12 kva=1.12 irradiance=1 temperature=25 %cutin=20 %cutout=20 effcurve=MyEff P-TCurve=MyPvsT Daily=IRRAD_DIA TDaily=TEMP_DIA
New PVSystem.GD_76c0f88674750d25f1a960e815049ae3f1d96ed45a67e8a9b277c1ef670f0d07_2 phases=1 bus1=node_418315244.2.4 conn=wye kv=0.1270 pf=1 pmpp=1.12 kva=1.12 irradiance=1 temperature=25 %cutin=20 %cutout=20 effcurve=MyEff P-TCurve=MyPvsT Daily=IRRAD_DIA TDaily=TEMP_DIA
New PVSystem.GD_76c0f88674750d25f1a960e815049ae3f1d96ed45a67e8a9b277c1ef670f0d07_3 phases=1 bus1=node_418315244.3.4 conn=wye kv=0.1270 pf=1 pmpp=1.12 kva=1.12 irradiance=1 temperature=25 %cutin=20 %cutout=20 effcurve=MyEff P-TCurve=MyPvsT Daily=IRRAD_DIA TDaily=TEMP_DIA
New PVSystem.GD_25ac45b17af8f479dffd947bb5e8473c7d7106a77e080c10b0f6bfead861656a_1 phases=1 bus1=node_418315244.1.4 conn=wye kv=0.1270 pf=1 pmpp=0.90 kva=0.90 irradiance=1 temperature=25 %cutin=20 %cutout=20 effcurve=MyEff P-TCurve=MyPvsT Daily=IRRAD_DIA TDaily=TEMP_DIA
New PVSystem.GD_25ac45b17af8f479dffd947bb5e8473c7d7106a77e080c10b0f6bfead861656a_2 phases=1 bus1=node_418315244.2.4 conn=wye kv=0.1270 pf=1 pmpp=0.90 kva=0.90 irradiance=1 temperature=25 %cutin=20 %cutout=20 effcurve=MyEff P-TCurve=MyPvsT Daily=IRRAD_DIA TDaily=TEMP_DIA
New PVSystem.GD_25ac45b17af8f479dffd947bb5e8473c7d7106a77e080c10b0f6bfead861656a_3 phases=1 bus1=node_418315244.3.4 conn=wye kv=0.1270 pf=1 pmpp=0.90 kva=0.90 irradiance=1 temperature=25 %cutin=20 %cutout=20 effcurve=MyEff P-TCurve=MyPvsT Daily=IRRAD_DIA TDaily=TEMP_DIA
New PVSystem.GD_2144dcacf9a579569d67012555479a1ca15956057bfd5207ca5c3eca13e56ec3_1 phases=1 bus1=node_418401561.1.4 conn=wye kv=0.1270 pf=1 pmpp=0.40 kva=0.40 irradiance=1 temperature=25 %cutin=20 %cutout=20 effcurve=MyEff P-TCurve=MyPvsT Daily=IRRAD_DIA TDaily=TEMP_DIA
New PVSystem.GD_2144dcacf9a579569d67012555479a1ca15956057bfd5207ca5c3eca13e56ec3_2 phases=1 bus1=node_418401561.2.4 conn=wye kv=0.1270 pf=1 pmpp=0.40 kva=0.40 irradiance=1 temperature=25 %cutin=20 %cutout=20 effcurve=MyEff P-TCurve=MyPvsT Daily=IRRAD_DIA TDaily=TEMP_DIA
New PVSystem.GD_2144dcacf9a579569d67012555479a1ca15956057bfd5207ca5c3eca13e56ec3_3 phases=1 bus1=node_418401561.3.4 conn=wye kv=0.1270 pf=1 pmpp=0.40 kva=0.40 irradiance=1 temperature=25 %cutin=20 %cutout=20 effcurve=MyEff P-TCurve=MyPvsT Daily=IRRAD_DIA TDaily=TEMP_DIA
New PVSystem.GD_b971de006b4353575187ef495a8fe86460832796fab1ec7318222c0852d4f338_1 phases=1 bus1=node_418380452.1.4 conn=wye kv=0.1270 pf=1 pmpp=0.44 kva=0.44 irradiance=1 temperature=25 %cutin=20 %cutout=20 effcurve=MyEff P-TCurve=MyPvsT Daily=IRRAD_DIA TDaily=TEMP_DIA
New PVSystem.GD_b971de006b4353575187ef495a8fe86460832796fab1ec7318222c0852d4f338_2 phases=1 bus1=node_418380452.2.4 conn=wye kv=0.1270 pf=1 pmpp=0.44 kva=0.44 irradiance=1 temperature=25 %cutin=20 %cutout=20 effcurve=MyEff P-TCurve=MyPvsT Daily=IRRAD_DIA TDaily=TEMP_DIA
New PVSystem.GD_b971de006b4353575187ef495a8fe86460832796fab1ec7318222c0852d4f338_3 phases=1 bus1=node_418380452.3.4 conn=wye kv=0.1270 pf=1 pmpp=0.44 kva=0.44 irradiance=1 temperature=25 %cutin=20 %cutout=20 effcurve=MyEff P-TCurve=MyPvsT Daily=IRRAD_DIA TDaily=TEMP_DIA
New PVSystem.GD_c57e37012511671afec2899e15e4578ffa84ad4828dcd2df90344833bacfcca3_1 phases=1 bus1=node_418399491.1.4 conn=wye kv=0.1270 pf=1 pmpp=0.56 kva=0.56 irradiance=1 temperature=25 %cutin=20 %cutout=20 effcurve=MyEff P-TCurve=MyPvsT Daily=IRRAD_DIA TDaily=TEMP_DIA
New PVSystem.GD_c57e37012511671afec2899e15e4578ffa84ad4828dcd2df90344833bacfcca3_2 phases=1 bus1=node_418399491.2.4 conn=wye kv=0.1270 pf=1 pmpp=0.56 kva=0.56 irradiance=1 temperature=25 %cutin=20 %cutout=20 effcurve=MyEff P-TCurve=MyPvsT Daily=IRRAD_DIA TDaily=TEMP_DIA
New PVSystem.GD_c57e37012511671afec2899e15e4578ffa84ad4828dcd2df90344833bacfcca3_3 phases=1 bus1=node_418399491.3.4 conn=wye kv=0.1270 pf=1 pmpp=0.56 kva=0.56 irradiance=1 temperature=25 %cutin=20 %cutout=20 effcurve=MyEff P-TCurve=MyPvsT Daily=IRRAD_DIA TDaily=TEMP_DIA
New PVSystem.GD_2324a76ddece0b4ce651d212106f7259042414d4341018c4523130d6b23f71ca_1 phases=1 bus1=node_418401534.1.4 conn=wye kv=0.1270 pf=1 pmpp=0.75 kva=0.75 irradiance=1 temperature=25 %cutin=20 %cutout=20 effcurve=MyEff P-TCurve=MyPvsT Daily=IRRAD_DIA TDaily=TEMP_DIA
New PVSystem.GD_2324a76ddece0b4ce651d212106f7259042414d4341018c4523130d6b23f71ca_2 phases=1 bus1=node_418401534.2.4 conn=wye kv=0.1270 pf=1 pmpp=0.75 kva=0.75 irradiance=1 temperature=25 %cutin=20 %cutout=20 effcurve=MyEff P-TCurve=MyPvsT Daily=IRRAD_DIA TDaily=TEMP_DIA
New PVSystem.GD_2324a76ddece0b4ce651d212106f7259042414d4341018c4523130d6b23f71ca_3 phases=1 bus1=node_418401534.3.4 conn=wye kv=0.1270 pf=1 pmpp=0.75 kva=0.75 irradiance=1 temperature=25 %cutin=20 %cutout=20 effcurve=MyEff P-TCurve=MyPvsT Daily=IRRAD_DIA TDaily=TEMP_DIA
New PVSystem.GD_57b0b79db11ba0d1a86f8e5cec596d3ab7b7439c34ee6632f7fd21ba246828bc_1 phases=1 bus1=node_418401534.1.4 conn=wye kv=0.1270 pf=1 pmpp=1.33 kva=1.33 irradiance=1 temperature=25 %cutin=20 %cutout=20 effcurve=MyEff P-TCurve=MyPvsT Daily=IRRAD_DIA TDaily=TEMP_DIA
New PVSystem.GD_57b0b79db11ba0d1a86f8e5cec596d3ab7b7439c34ee6632f7fd21ba246828bc_2 phases=1 bus1=node_418401534.2.4 conn=wye kv=0.1270 pf=1 pmpp=1.33 kva=1.33 irradiance=1 temperature=25 %cutin=20 %cutout=20 effcurve=MyEff P-TCurve=MyPvsT Daily=IRRAD_DIA TDaily=TEMP_DIA
New PVSystem.GD_57b0b79db11ba0d1a86f8e5cec596d3ab7b7439c34ee6632f7fd21ba246828bc_3 phases=1 bus1=node_418401534.3.4 conn=wye kv=0.1270 pf=1 pmpp=1.33 kva=1.33 irradiance=1 temperature=25 %cutin=20 %cutout=20 effcurve=MyEff P-TCurve=MyPvsT Daily=IRRAD_DIA TDaily=TEMP_DIA
New PVSystem.GD_38a9512e686c49a72b0dcdb7120ccaf9e0dd5ba018150b6edc43a9073d92b973_1 phases=1 bus1=node_418401534.1.4 conn=wye kv=0.1270 pf=1 pmpp=0.33 kva=0.33 irradiance=1 temperature=25 %cutin=20 %cutout=20 effcurve=MyEff P-TCurve=MyPvsT Daily=IRRAD_DIA TDaily=TEMP_DIA
New PVSystem.GD_38a9512e686c49a72b0dcdb7120ccaf9e0dd5ba018150b6edc43a9073d92b973_2 phases=1 bus1=node_418401534.2.4 conn=wye kv=0.1270 pf=1 pmpp=0.33 kva=0.33 irradiance=1 temperature=25 %cutin=20 %cutout=20 effcurve=MyEff P-TCurve=MyPvsT Daily=IRRAD_DIA TDaily=TEMP_DIA
New PVSystem.GD_38a9512e686c49a72b0dcdb7120ccaf9e0dd5ba018150b6edc43a9073d92b973_3 phases=1 bus1=node_418401534.3.4 conn=wye kv=0.1270 pf=1 pmpp=0.33 kva=0.33 irradiance=1 temperature=25 %cutin=20 %cutout=20 effcurve=MyEff P-TCurve=MyPvsT Daily=IRRAD_DIA TDaily=TEMP_DIA
New PVSystem.GD_d3cd5eeba51a9110b1f622102aacade82b857665c138598a8b3e248c6c51ba41_1 phases=1 bus1=node_418313894.1.4 conn=wye kv=0.1200 pf=1 pmpp=1.97 kva=1.97 irradiance=1 temperature=25 %cutin=20 %cutout=20 effcurve=MyEff P-TCurve=MyPvsT Daily=IRRAD_DIA TDaily=TEMP_DIA
New PVSystem.GD_d3cd5eeba51a9110b1f622102aacade82b857665c138598a8b3e248c6c51ba41_2 phases=1 bus1=node_418313894.2.4 conn=wye kv=0.1200 pf=1 pmpp=1.97 kva=1.97 irradiance=1 temperature=25 %cutin=20 %cutout=20 effcurve=MyEff P-TCurve=MyPvsT Daily=IRRAD_DIA TDaily=TEMP_DIA
New PVSystem.GD_4d5c7e32c7e5e5a2046fd4e137a4185d5388145b36d607929738d96b8005754f_1 phases=1 bus1=node_418315553.1.4 conn=wye kv=0.1200 pf=1 pmpp=1.07 kva=1.07 irradiance=1 temperature=25 %cutin=20 %cutout=20 effcurve=MyEff P-TCurve=MyPvsT Daily=IRRAD_DIA TDaily=TEMP_DIA
New PVSystem.GD_4d5c7e32c7e5e5a2046fd4e137a4185d5388145b36d607929738d96b8005754f_2 phases=1 bus1=node_418315553.2.4 conn=wye kv=0.1200 pf=1 pmpp=1.07 kva=1.07 irradiance=1 temperature=25 %cutin=20 %cutout=20 effcurve=MyEff P-TCurve=MyPvsT Daily=IRRAD_DIA TDaily=TEMP_DIA
New PVSystem.GD_dfa1706aa04f66f33f51e264032a848c3a126896d2e6a7a724f4885c7f28e3aa_1 phases=1 bus1=node_418315553.1.4 conn=wye kv=0.1200 pf=1 pmpp=3.77 kva=3.77 irradiance=1 temperature=25 %cutin=20 %cutout=20 effcurve=MyEff P-TCurve=MyPvsT Daily=IRRAD_DIA TDaily=TEMP_DIA
New PVSystem.GD_dfa1706aa04f66f33f51e264032a848c3a126896d2e6a7a724f4885c7f28e3aa_2 phases=1 bus1=node_418315553.2.4 conn=wye kv=0.1200 pf=1 pmpp=3.77 kva=3.77 irradiance=1 temperature=25 %cutin=20 %cutout=20 effcurve=MyEff P-TCurve=MyPvsT Daily=IRRAD_DIA TDaily=TEMP_DIA
New PVSystem.GD_ccf098b2e04f250c1941b8e65f6ce127276c37a9120f9c1f4e1efd0b18b94c75_1 phases=1 bus1=node_418315553.1.4 conn=wye kv=0.1200 pf=1 pmpp=0.36 kva=0.36 irradiance=1 temperature=25 %cutin=20 %cutout=20 effcurve=MyEff P-TCurve=MyPvsT Daily=IRRAD_DIA TDaily=TEMP_DIA
New PVSystem.GD_ccf098b2e04f250c1941b8e65f6ce127276c37a9120f9c1f4e1efd0b18b94c75_2 phases=1 bus1=node_418315553.2.4 conn=wye kv=0.1200 pf=1 pmpp=0.36 kva=0.36 irradiance=1 temperature=25 %cutin=20 %cutout=20 effcurve=MyEff P-TCurve=MyPvsT Daily=IRRAD_DIA TDaily=TEMP_DIA
New PVSystem.GD_287b9ba79e975dcbfcc387b9fc6636408ebbc876bcfcd26132d29f93fe84a5dd_1 phases=1 bus1=node_418335357.1.4 conn=wye kv=0.1270 pf=1 pmpp=0.90 kva=0.90 irradiance=1 temperature=25 %cutin=20 %cutout=20 effcurve=MyEff P-TCurve=MyPvsT Daily=IRRAD_DIA TDaily=TEMP_DIA
New PVSystem.GD_287b9ba79e975dcbfcc387b9fc6636408ebbc876bcfcd26132d29f93fe84a5dd_2 phases=1 bus1=node_418335357.2.4 conn=wye kv=0.1270 pf=1 pmpp=0.90 kva=0.90 irradiance=1 temperature=25 %cutin=20 %cutout=20 effcurve=MyEff P-TCurve=MyPvsT Daily=IRRAD_DIA TDaily=TEMP_DIA
New PVSystem.GD_287b9ba79e975dcbfcc387b9fc6636408ebbc876bcfcd26132d29f93fe84a5dd_3 phases=1 bus1=node_418335357.3.4 conn=wye kv=0.1270 pf=1 pmpp=0.90 kva=0.90 irradiance=1 temperature=25 %cutin=20 %cutout=20 effcurve=MyEff P-TCurve=MyPvsT Daily=IRRAD_DIA TDaily=TEMP_DIA
New PVSystem.GD_717f7d7acac0c6d0b6356189d41d5ec6ab96029b62437bb12430598ade438089_1 phases=1 bus1=node_418400952.1.4 conn=wye kv=0.1270 pf=1 pmpp=0.09 kva=0.10 irradiance=1 temperature=25 %cutin=20 %cutout=20 effcurve=MyEff P-TCurve=MyPvsT Daily=IRRAD_DIA TDaily=TEMP_DIA
New PVSystem.GD_717f7d7acac0c6d0b6356189d41d5ec6ab96029b62437bb12430598ade438089_2 phases=1 bus1=node_418400952.2.4 conn=wye kv=0.1270 pf=1 pmpp=0.09 kva=0.10 irradiance=1 temperature=25 %cutin=20 %cutout=20 effcurve=MyEff P-TCurve=MyPvsT Daily=IRRAD_DIA TDaily=TEMP_DIA
New PVSystem.GD_717f7d7acac0c6d0b6356189d41d5ec6ab96029b62437bb12430598ade438089_3 phases=1 bus1=node_418400952.3.4 conn=wye kv=0.1270 pf=1 pmpp=0.09 kva=0.10 irradiance=1 temperature=25 %cutin=20 %cutout=20 effcurve=MyEff P-TCurve=MyPvsT Daily=IRRAD_DIA TDaily=TEMP_DIA
New PVSystem.GD_f97405344aff34bb67bd09977ee55f060e0187eca9c46be071e8e11ae5da0f46_1 phases=1 bus1=node_418400952.1.4 conn=wye kv=0.1270 pf=1 pmpp=0.40 kva=0.40 irradiance=1 temperature=25 %cutin=20 %cutout=20 effcurve=MyEff P-TCurve=MyPvsT Daily=IRRAD_DIA TDaily=TEMP_DIA
New PVSystem.GD_f97405344aff34bb67bd09977ee55f060e0187eca9c46be071e8e11ae5da0f46_2 phases=1 bus1=node_418400952.2.4 conn=wye kv=0.1270 pf=1 pmpp=0.40 kva=0.40 irradiance=1 temperature=25 %cutin=20 %cutout=20 effcurve=MyEff P-TCurve=MyPvsT Daily=IRRAD_DIA TDaily=TEMP_DIA
New PVSystem.GD_f97405344aff34bb67bd09977ee55f060e0187eca9c46be071e8e11ae5da0f46_3 phases=1 bus1=node_418400952.3.4 conn=wye kv=0.1270 pf=1 pmpp=0.40 kva=0.40 irradiance=1 temperature=25 %cutin=20 %cutout=20 effcurve=MyEff P-TCurve=MyPvsT Daily=IRRAD_DIA TDaily=TEMP_DIA
New PVSystem.GD_98696c3a580e3bfe982d409e964b5bf640ef62dbc525a7faf446a0c00a9eaee9_1 phases=1 bus1=node_418400952.1.4 conn=wye kv=0.1270 pf=1 pmpp=1.12 kva=1.12 irradiance=1 temperature=25 %cutin=20 %cutout=20 effcurve=MyEff P-TCurve=MyPvsT Daily=IRRAD_DIA TDaily=TEMP_DIA
New PVSystem.GD_98696c3a580e3bfe982d409e964b5bf640ef62dbc525a7faf446a0c00a9eaee9_2 phases=1 bus1=node_418400952.2.4 conn=wye kv=0.1270 pf=1 pmpp=1.12 kva=1.12 irradiance=1 temperature=25 %cutin=20 %cutout=20 effcurve=MyEff P-TCurve=MyPvsT Daily=IRRAD_DIA TDaily=TEMP_DIA
New PVSystem.GD_98696c3a580e3bfe982d409e964b5bf640ef62dbc525a7faf446a0c00a9eaee9_3 phases=1 bus1=node_418400952.3.4 conn=wye kv=0.1270 pf=1 pmpp=1.12 kva=1.12 irradiance=1 temperature=25 %cutin=20 %cutout=20 effcurve=MyEff P-TCurve=MyPvsT Daily=IRRAD_DIA TDaily=TEMP_DIA
New PVSystem.GD_fd3e499f9bb8e7623196abdf9e2f34b096a00ef37bb05d97e70c14f7229aa21b_1 phases=1 bus1=node_418315556.1.4 conn=wye kv=0.1200 pf=1 pmpp=1.97 kva=1.97 irradiance=1 temperature=25 %cutin=20 %cutout=20 effcurve=MyEff P-TCurve=MyPvsT Daily=IRRAD_DIA TDaily=TEMP_DIA
New PVSystem.GD_fd3e499f9bb8e7623196abdf9e2f34b096a00ef37bb05d97e70c14f7229aa21b_2 phases=1 bus1=node_418315556.2.4 conn=wye kv=0.1200 pf=1 pmpp=1.97 kva=1.97 irradiance=1 temperature=25 %cutin=20 %cutout=20 effcurve=MyEff P-TCurve=MyPvsT Daily=IRRAD_DIA TDaily=TEMP_DIA
New PVSystem.GD_d3519b19f1ee47aef7c79bc352e3d9ea214623e3ceaa39363b4008de43835f2d_1 phases=1 bus1=node_418315463.1.4 conn=wye kv=0.1270 pf=1 pmpp=0.33 kva=0.33 irradiance=1 temperature=25 %cutin=20 %cutout=20 effcurve=MyEff P-TCurve=MyPvsT Daily=IRRAD_DIA TDaily=TEMP_DIA
New PVSystem.GD_d3519b19f1ee47aef7c79bc352e3d9ea214623e3ceaa39363b4008de43835f2d_2 phases=1 bus1=node_418315463.2.4 conn=wye kv=0.1270 pf=1 pmpp=0.33 kva=0.33 irradiance=1 temperature=25 %cutin=20 %cutout=20 effcurve=MyEff P-TCurve=MyPvsT Daily=IRRAD_DIA TDaily=TEMP_DIA
New PVSystem.GD_d3519b19f1ee47aef7c79bc352e3d9ea214623e3ceaa39363b4008de43835f2d_3 phases=1 bus1=node_418315463.3.4 conn=wye kv=0.1270 pf=1 pmpp=0.33 kva=0.33 irradiance=1 temperature=25 %cutin=20 %cutout=20 effcurve=MyEff P-TCurve=MyPvsT Daily=IRRAD_DIA TDaily=TEMP_DIA
New PVSystem.GD_841ef838aa385d9f242dfae5a63356152a9d3c46983b47a33a922e40ec7e757b_1 phases=1 bus1=node_418315463.1.4 conn=wye kv=0.1270 pf=1 pmpp=1.69 kva=1.69 irradiance=1 temperature=25 %cutin=20 %cutout=20 effcurve=MyEff P-TCurve=MyPvsT Daily=IRRAD_DIA TDaily=TEMP_DIA
New PVSystem.GD_841ef838aa385d9f242dfae5a63356152a9d3c46983b47a33a922e40ec7e757b_2 phases=1 bus1=node_418315463.2.4 conn=wye kv=0.1270 pf=1 pmpp=1.69 kva=1.69 irradiance=1 temperature=25 %cutin=20 %cutout=20 effcurve=MyEff P-TCurve=MyPvsT Daily=IRRAD_DIA TDaily=TEMP_DIA
New PVSystem.GD_841ef838aa385d9f242dfae5a63356152a9d3c46983b47a33a922e40ec7e757b_3 phases=1 bus1=node_418315463.3.4 conn=wye kv=0.1270 pf=1 pmpp=1.69 kva=1.69 irradiance=1 temperature=25 %cutin=20 %cutout=20 effcurve=MyEff P-TCurve=MyPvsT Daily=IRRAD_DIA TDaily=TEMP_DIA
New PVSystem.GD_7899ce62e49e231617e4983afe666e12b7fe856e040d179819d77be776beb111_1 phases=1 bus1=node_418378250.1.4 conn=wye kv=0.1270 pf=1 pmpp=1.20 kva=1.20 irradiance=1 temperature=25 %cutin=20 %cutout=20 effcurve=MyEff P-TCurve=MyPvsT Daily=IRRAD_DIA TDaily=TEMP_DIA
New PVSystem.GD_7899ce62e49e231617e4983afe666e12b7fe856e040d179819d77be776beb111_2 phases=1 bus1=node_418378250.2.4 conn=wye kv=0.1270 pf=1 pmpp=1.20 kva=1.20 irradiance=1 temperature=25 %cutin=20 %cutout=20 effcurve=MyEff P-TCurve=MyPvsT Daily=IRRAD_DIA TDaily=TEMP_DIA
New PVSystem.GD_7899ce62e49e231617e4983afe666e12b7fe856e040d179819d77be776beb111_3 phases=1 bus1=node_418378250.3.4 conn=wye kv=0.1270 pf=1 pmpp=1.20 kva=1.20 irradiance=1 temperature=25 %cutin=20 %cutout=20 effcurve=MyEff P-TCurve=MyPvsT Daily=IRRAD_DIA TDaily=TEMP_DIA
New PVSystem.GD_278ad8d3e16dc07341c924daba7874c97e3fecef12c72f44ab4d13be23a1d7cf_1 phases=1 bus1=node_418401027.1.4 conn=wye kv=0.1270 pf=1 pmpp=2.67 kva=2.67 irradiance=1 temperature=25 %cutin=20 %cutout=20 effcurve=MyEff P-TCurve=MyPvsT Daily=IRRAD_DIA TDaily=TEMP_DIA
New PVSystem.GD_278ad8d3e16dc07341c924daba7874c97e3fecef12c72f44ab4d13be23a1d7cf_2 phases=1 bus1=node_418401027.2.4 conn=wye kv=0.1270 pf=1 pmpp=2.67 kva=2.67 irradiance=1 temperature=25 %cutin=20 %cutout=20 effcurve=MyEff P-TCurve=MyPvsT Daily=IRRAD_DIA TDaily=TEMP_DIA
New PVSystem.GD_278ad8d3e16dc07341c924daba7874c97e3fecef12c72f44ab4d13be23a1d7cf_3 phases=1 bus1=node_418401027.3.4 conn=wye kv=0.1270 pf=1 pmpp=2.67 kva=2.67 irradiance=1 temperature=25 %cutin=20 %cutout=20 effcurve=MyEff P-TCurve=MyPvsT Daily=IRRAD_DIA TDaily=TEMP_DIA
New PVSystem.GD_ef090e6aaeb5dcee88b80e3c13955c602d2f82b89a900938a8aac3d8f8ac4267_1 phases=1 bus1=node_418401027.1.4 conn=wye kv=0.1270 pf=1 pmpp=2.37 kva=2.37 irradiance=1 temperature=25 %cutin=20 %cutout=20 effcurve=MyEff P-TCurve=MyPvsT Daily=IRRAD_DIA TDaily=TEMP_DIA
New PVSystem.GD_ef090e6aaeb5dcee88b80e3c13955c602d2f82b89a900938a8aac3d8f8ac4267_2 phases=1 bus1=node_418401027.2.4 conn=wye kv=0.1270 pf=1 pmpp=2.37 kva=2.37 irradiance=1 temperature=25 %cutin=20 %cutout=20 effcurve=MyEff P-TCurve=MyPvsT Daily=IRRAD_DIA TDaily=TEMP_DIA
New PVSystem.GD_ef090e6aaeb5dcee88b80e3c13955c602d2f82b89a900938a8aac3d8f8ac4267_3 phases=1 bus1=node_418401027.3.4 conn=wye kv=0.1270 pf=1 pmpp=2.37 kva=2.37 irradiance=1 temperature=25 %cutin=20 %cutout=20 effcurve=MyEff P-TCurve=MyPvsT Daily=IRRAD_DIA TDaily=TEMP_DIA
New PVSystem.GD_a5a6a5fadde9111ee0cacae06e0dfcc435d74d159b856e0ae90abfd0b74f2c66_1 phases=1 bus1=node_418400817.1.4 conn=wye kv=0.1200 pf=1 pmpp=0.70 kva=0.70 irradiance=1 temperature=25 %cutin=20 %cutout=20 effcurve=MyEff P-TCurve=MyPvsT Daily=IRRAD_DIA TDaily=TEMP_DIA
New PVSystem.GD_a5a6a5fadde9111ee0cacae06e0dfcc435d74d159b856e0ae90abfd0b74f2c66_2 phases=1 bus1=node_418400817.2.4 conn=wye kv=0.1200 pf=1 pmpp=0.70 kva=0.70 irradiance=1 temperature=25 %cutin=20 %cutout=20 effcurve=MyEff P-TCurve=MyPvsT Daily=IRRAD_DIA TDaily=TEMP_DIA
New PVSystem.GD_403ac264cc9a280d1a976211f949df657006e3e524fd82cbc2d0bac5f3c1b46c_1 phases=1 bus1=node_418400817.1.4 conn=wye kv=0.1200 pf=1 pmpp=2.33 kva=2.33 irradiance=1 temperature=25 %cutin=20 %cutout=20 effcurve=MyEff P-TCurve=MyPvsT Daily=IRRAD_DIA TDaily=TEMP_DIA
New PVSystem.GD_403ac264cc9a280d1a976211f949df657006e3e524fd82cbc2d0bac5f3c1b46c_2 phases=1 bus1=node_418400817.2.4 conn=wye kv=0.1200 pf=1 pmpp=2.33 kva=2.33 irradiance=1 temperature=25 %cutin=20 %cutout=20 effcurve=MyEff P-TCurve=MyPvsT Daily=IRRAD_DIA TDaily=TEMP_DIA
New PVSystem.GD_46de184af1e690ae3fec56df1e725e9c90c3072e8db598d219b58748175bf005_1 phases=1 bus1=node_418292023.1.4 conn=wye kv=0.1200 pf=1 pmpp=2.14 kva=2.14 irradiance=1 temperature=25 %cutin=20 %cutout=20 effcurve=MyEff P-TCurve=MyPvsT Daily=IRRAD_DIA TDaily=TEMP_DIA
New PVSystem.GD_46de184af1e690ae3fec56df1e725e9c90c3072e8db598d219b58748175bf005_2 phases=1 bus1=node_418292023.2.4 conn=wye kv=0.1200 pf=1 pmpp=2.14 kva=2.14 irradiance=1 temperature=25 %cutin=20 %cutout=20 effcurve=MyEff P-TCurve=MyPvsT Daily=IRRAD_DIA TDaily=TEMP_DIA
New PVSystem.GD_7075b260d9ab9806b0b578e60a05e874f6feacc1d763dc1908a0297d7433e8e4_1 phases=1 bus1=node_467249978.1.4 conn=wye kv=0.1200 pf=1 pmpp=0.41 kva=0.41 irradiance=1 temperature=25 %cutin=20 %cutout=20 effcurve=MyEff P-TCurve=MyPvsT Daily=IRRAD_DIA TDaily=TEMP_DIA
New PVSystem.GD_7075b260d9ab9806b0b578e60a05e874f6feacc1d763dc1908a0297d7433e8e4_2 phases=1 bus1=node_467249978.2.4 conn=wye kv=0.1200 pf=1 pmpp=0.41 kva=0.41 irradiance=1 temperature=25 %cutin=20 %cutout=20 effcurve=MyEff P-TCurve=MyPvsT Daily=IRRAD_DIA TDaily=TEMP_DIA
New PVSystem.GD_588a23624db5ad8b03f82f983354ab66e727db62242832fbad47e6d587a09abd_1 phases=1 bus1=node_467249978.1.4 conn=wye kv=0.1200 pf=1 pmpp=1.73 kva=1.73 irradiance=1 temperature=25 %cutin=20 %cutout=20 effcurve=MyEff P-TCurve=MyPvsT Daily=IRRAD_DIA TDaily=TEMP_DIA
New PVSystem.GD_588a23624db5ad8b03f82f983354ab66e727db62242832fbad47e6d587a09abd_2 phases=1 bus1=node_467249978.2.4 conn=wye kv=0.1200 pf=1 pmpp=1.73 kva=1.73 irradiance=1 temperature=25 %cutin=20 %cutout=20 effcurve=MyEff P-TCurve=MyPvsT Daily=IRRAD_DIA TDaily=TEMP_DIA
New PVSystem.GD_5fae088e157719af010420e2ef2257ec7bc717efbff7a05ca3ba5d7c16cc593b_1 phases=1 bus1=node_467249978.1.4 conn=wye kv=0.1200 pf=1 pmpp=0.75 kva=0.75 irradiance=1 temperature=25 %cutin=20 %cutout=20 effcurve=MyEff P-TCurve=MyPvsT Daily=IRRAD_DIA TDaily=TEMP_DIA
New PVSystem.GD_5fae088e157719af010420e2ef2257ec7bc717efbff7a05ca3ba5d7c16cc593b_2 phases=1 bus1=node_467249978.2.4 conn=wye kv=0.1200 pf=1 pmpp=0.75 kva=0.75 irradiance=1 temperature=25 %cutin=20 %cutout=20 effcurve=MyEff P-TCurve=MyPvsT Daily=IRRAD_DIA TDaily=TEMP_DIA
New PVSystem.GD_cba5cbc5daa85707ed4cbe4eeb29d6566d1b6d0ad8d6c4d3c215cf15f7e8f9b4_1 phases=1 bus1=node_467601611.1.4 conn=wye kv=0.1270 pf=1 pmpp=1.41 kva=1.41 irradiance=1 temperature=25 %cutin=20 %cutout=20 effcurve=MyEff P-TCurve=MyPvsT Daily=IRRAD_DIA TDaily=TEMP_DIA
New PVSystem.GD_cba5cbc5daa85707ed4cbe4eeb29d6566d1b6d0ad8d6c4d3c215cf15f7e8f9b4_2 phases=1 bus1=node_467601611.2.4 conn=wye kv=0.1270 pf=1 pmpp=1.41 kva=1.41 irradiance=1 temperature=25 %cutin=20 %cutout=20 effcurve=MyEff P-TCurve=MyPvsT Daily=IRRAD_DIA TDaily=TEMP_DIA
New PVSystem.GD_cba5cbc5daa85707ed4cbe4eeb29d6566d1b6d0ad8d6c4d3c215cf15f7e8f9b4_3 phases=1 bus1=node_467601611.3.4 conn=wye kv=0.1270 pf=1 pmpp=1.41 kva=1.41 irradiance=1 temperature=25 %cutin=20 %cutout=20 effcurve=MyEff P-TCurve=MyPvsT Daily=IRRAD_DIA TDaily=TEMP_DIA
New PVSystem.GD_34023e791c97702f7ecdeb5975f08ecd5f086c7f6ac2ef8fe8d2324135e8a29d_1 phases=1 bus1=node_418399473.1.4 conn=wye kv=0.1270 pf=1 pmpp=4.95 kva=4.95 irradiance=1 temperature=25 %cutin=20 %cutout=20 effcurve=MyEff P-TCurve=MyPvsT Daily=IRRAD_DIA TDaily=TEMP_DIA
New PVSystem.GD_34023e791c97702f7ecdeb5975f08ecd5f086c7f6ac2ef8fe8d2324135e8a29d_2 phases=1 bus1=node_418399473.2.4 conn=wye kv=0.1270 pf=1 pmpp=4.95 kva=4.95 irradiance=1 temperature=25 %cutin=20 %cutout=20 effcurve=MyEff P-TCurve=MyPvsT Daily=IRRAD_DIA TDaily=TEMP_DIA
New PVSystem.GD_34023e791c97702f7ecdeb5975f08ecd5f086c7f6ac2ef8fe8d2324135e8a29d_3 phases=1 bus1=node_418399473.3.4 conn=wye kv=0.1270 pf=1 pmpp=4.95 kva=4.95 irradiance=1 temperature=25 %cutin=20 %cutout=20 effcurve=MyEff P-TCurve=MyPvsT Daily=IRRAD_DIA TDaily=TEMP_DIA
New PVSystem.GD_20023bb1f132d90a1ae13e5f49406c0a675cbfa14d97b92ac911f3d06055e1ff_1 phases=1 bus1=node_418399473.1.4 conn=wye kv=0.1270 pf=1 pmpp=0.31 kva=0.31 irradiance=1 temperature=25 %cutin=20 %cutout=20 effcurve=MyEff P-TCurve=MyPvsT Daily=IRRAD_DIA TDaily=TEMP_DIA
New PVSystem.GD_20023bb1f132d90a1ae13e5f49406c0a675cbfa14d97b92ac911f3d06055e1ff_2 phases=1 bus1=node_418399473.2.4 conn=wye kv=0.1270 pf=1 pmpp=0.31 kva=0.31 irradiance=1 temperature=25 %cutin=20 %cutout=20 effcurve=MyEff P-TCurve=MyPvsT Daily=IRRAD_DIA TDaily=TEMP_DIA
New PVSystem.GD_20023bb1f132d90a1ae13e5f49406c0a675cbfa14d97b92ac911f3d06055e1ff_3 phases=1 bus1=node_418399473.3.4 conn=wye kv=0.1270 pf=1 pmpp=0.31 kva=0.31 irradiance=1 temperature=25 %cutin=20 %cutout=20 effcurve=MyEff P-TCurve=MyPvsT Daily=IRRAD_DIA TDaily=TEMP_DIA
New PVSystem.GD_2ea6e623e84b096815bd2ef839f02d1781d610782c8ba13e1f60a060a4dbd481_1 phases=1 bus1=node_418399473.1.4 conn=wye kv=0.1270 pf=1 pmpp=1.51 kva=1.51 irradiance=1 temperature=25 %cutin=20 %cutout=20 effcurve=MyEff P-TCurve=MyPvsT Daily=IRRAD_DIA TDaily=TEMP_DIA
New PVSystem.GD_2ea6e623e84b096815bd2ef839f02d1781d610782c8ba13e1f60a060a4dbd481_2 phases=1 bus1=node_418399473.2.4 conn=wye kv=0.1270 pf=1 pmpp=1.51 kva=1.51 irradiance=1 temperature=25 %cutin=20 %cutout=20 effcurve=MyEff P-TCurve=MyPvsT Daily=IRRAD_DIA TDaily=TEMP_DIA
New PVSystem.GD_2ea6e623e84b096815bd2ef839f02d1781d610782c8ba13e1f60a060a4dbd481_3 phases=1 bus1=node_418399473.3.4 conn=wye kv=0.1270 pf=1 pmpp=1.51 kva=1.51 irradiance=1 temperature=25 %cutin=20 %cutout=20 effcurve=MyEff P-TCurve=MyPvsT Daily=IRRAD_DIA TDaily=TEMP_DIA
New PVSystem.GD_6f30b6894ea69e8702e28fc9335317fc96e7a7410e9833ceb218b09631621bd7_1 phases=1 bus1=node_418377554.1.4 conn=wye kv=0.1270 pf=1 pmpp=0.40 kva=0.40 irradiance=1 temperature=25 %cutin=20 %cutout=20 effcurve=MyEff P-TCurve=MyPvsT Daily=IRRAD_DIA TDaily=TEMP_DIA
New PVSystem.GD_6f30b6894ea69e8702e28fc9335317fc96e7a7410e9833ceb218b09631621bd7_2 phases=1 bus1=node_418377554.2.4 conn=wye kv=0.1270 pf=1 pmpp=0.40 kva=0.40 irradiance=1 temperature=25 %cutin=20 %cutout=20 effcurve=MyEff P-TCurve=MyPvsT Daily=IRRAD_DIA TDaily=TEMP_DIA
New PVSystem.GD_6f30b6894ea69e8702e28fc9335317fc96e7a7410e9833ceb218b09631621bd7_3 phases=1 bus1=node_418377554.3.4 conn=wye kv=0.1270 pf=1 pmpp=0.40 kva=0.40 irradiance=1 temperature=25 %cutin=20 %cutout=20 effcurve=MyEff P-TCurve=MyPvsT Daily=IRRAD_DIA TDaily=TEMP_DIA
New PVSystem.GD_7a3c1d1ea77cf3ea3ca5000a7bedaf914a46e32ba781918ca89aab3415a48391_1 phases=1 bus1=node_418313921.1.4 conn=wye kv=0.1270 pf=1 pmpp=1.70 kva=1.70 irradiance=1 temperature=25 %cutin=20 %cutout=20 effcurve=MyEff P-TCurve=MyPvsT Daily=IRRAD_DIA TDaily=TEMP_DIA
New PVSystem.GD_7a3c1d1ea77cf3ea3ca5000a7bedaf914a46e32ba781918ca89aab3415a48391_2 phases=1 bus1=node_418313921.2.4 conn=wye kv=0.1270 pf=1 pmpp=1.70 kva=1.70 irradiance=1 temperature=25 %cutin=20 %cutout=20 effcurve=MyEff P-TCurve=MyPvsT Daily=IRRAD_DIA TDaily=TEMP_DIA
New PVSystem.GD_7a3c1d1ea77cf3ea3ca5000a7bedaf914a46e32ba781918ca89aab3415a48391_3 phases=1 bus1=node_418313921.3.4 conn=wye kv=0.1270 pf=1 pmpp=1.70 kva=1.70 irradiance=1 temperature=25 %cutin=20 %cutout=20 effcurve=MyEff P-TCurve=MyPvsT Daily=IRRAD_DIA TDaily=TEMP_DIA
New PVSystem.GD_a5e939008223d5fae8f7c8e5999a14ce60317978069003939151cca89208bff8_1 phases=1 bus1=node_418313786.1.4 conn=wye kv=0.1270 pf=1 pmpp=1.33 kva=1.33 irradiance=1 temperature=25 %cutin=20 %cutout=20 effcurve=MyEff P-TCurve=MyPvsT Daily=IRRAD_DIA TDaily=TEMP_DIA
New PVSystem.GD_a5e939008223d5fae8f7c8e5999a14ce60317978069003939151cca89208bff8_2 phases=1 bus1=node_418313786.2.4 conn=wye kv=0.1270 pf=1 pmpp=1.33 kva=1.33 irradiance=1 temperature=25 %cutin=20 %cutout=20 effcurve=MyEff P-TCurve=MyPvsT Daily=IRRAD_DIA TDaily=TEMP_DIA
New PVSystem.GD_a5e939008223d5fae8f7c8e5999a14ce60317978069003939151cca89208bff8_3 phases=1 bus1=node_418313786.3.4 conn=wye kv=0.1270 pf=1 pmpp=1.33 kva=1.33 irradiance=1 temperature=25 %cutin=20 %cutout=20 effcurve=MyEff P-TCurve=MyPvsT Daily=IRRAD_DIA TDaily=TEMP_DIA
New PVSystem.GD_0efc4abc02ef73b39e9bf5e608b9c2007bc8f12d3a56535013e99ac9bc3faa7b_1 phases=1 bus1=node_418334373.1.4 conn=wye kv=0.1270 pf=1 pmpp=0.86 kva=0.86 irradiance=1 temperature=25 %cutin=20 %cutout=20 effcurve=MyEff P-TCurve=MyPvsT Daily=IRRAD_DIA TDaily=TEMP_DIA
New PVSystem.GD_0efc4abc02ef73b39e9bf5e608b9c2007bc8f12d3a56535013e99ac9bc3faa7b_2 phases=1 bus1=node_418334373.2.4 conn=wye kv=0.1270 pf=1 pmpp=0.86 kva=0.86 irradiance=1 temperature=25 %cutin=20 %cutout=20 effcurve=MyEff P-TCurve=MyPvsT Daily=IRRAD_DIA TDaily=TEMP_DIA
New PVSystem.GD_0efc4abc02ef73b39e9bf5e608b9c2007bc8f12d3a56535013e99ac9bc3faa7b_3 phases=1 bus1=node_418334373.3.4 conn=wye kv=0.1270 pf=1 pmpp=0.86 kva=0.86 irradiance=1 temperature=25 %cutin=20 %cutout=20 effcurve=MyEff P-TCurve=MyPvsT Daily=IRRAD_DIA TDaily=TEMP_DIA
New PVSystem.GD_d2854cb3195d69d27ccf6e31e2cb61f821148149171b5b1adf1253b6a1400559_1 phases=1 bus1=node_418334373.1.4 conn=wye kv=0.1270 pf=1 pmpp=0.72 kva=0.72 irradiance=1 temperature=25 %cutin=20 %cutout=20 effcurve=MyEff P-TCurve=MyPvsT Daily=IRRAD_DIA TDaily=TEMP_DIA
New PVSystem.GD_d2854cb3195d69d27ccf6e31e2cb61f821148149171b5b1adf1253b6a1400559_2 phases=1 bus1=node_418334373.2.4 conn=wye kv=0.1270 pf=1 pmpp=0.72 kva=0.72 irradiance=1 temperature=25 %cutin=20 %cutout=20 effcurve=MyEff P-TCurve=MyPvsT Daily=IRRAD_DIA TDaily=TEMP_DIA
New PVSystem.GD_d2854cb3195d69d27ccf6e31e2cb61f821148149171b5b1adf1253b6a1400559_3 phases=1 bus1=node_418334373.3.4 conn=wye kv=0.1270 pf=1 pmpp=0.72 kva=0.72 irradiance=1 temperature=25 %cutin=20 %cutout=20 effcurve=MyEff P-TCurve=MyPvsT Daily=IRRAD_DIA TDaily=TEMP_DIA
New PVSystem.GD_14ba9f444833e953e7de3f7f9b2e6c3290c8347ef406f49e84ffccb00fded1c0_1 phases=1 bus1=node_465404469.1.4 conn=wye kv=0.1270 pf=1 pmpp=1.43 kva=1.43 irradiance=1 temperature=25 %cutin=20 %cutout=20 effcurve=MyEff P-TCurve=MyPvsT Daily=IRRAD_DIA TDaily=TEMP_DIA
New PVSystem.GD_14ba9f444833e953e7de3f7f9b2e6c3290c8347ef406f49e84ffccb00fded1c0_2 phases=1 bus1=node_465404469.2.4 conn=wye kv=0.1270 pf=1 pmpp=1.43 kva=1.43 irradiance=1 temperature=25 %cutin=20 %cutout=20 effcurve=MyEff P-TCurve=MyPvsT Daily=IRRAD_DIA TDaily=TEMP_DIA
New PVSystem.GD_14ba9f444833e953e7de3f7f9b2e6c3290c8347ef406f49e84ffccb00fded1c0_3 phases=1 bus1=node_465404469.3.4 conn=wye kv=0.1270 pf=1 pmpp=1.43 kva=1.43 irradiance=1 temperature=25 %cutin=20 %cutout=20 effcurve=MyEff P-TCurve=MyPvsT Daily=IRRAD_DIA TDaily=TEMP_DIA
New PVSystem.GD_9e012d7ccc34842c45b01a75f31b41b1bce3d4a036ccdaeca0ae0f8cb8db2cab_1 phases=1 bus1=node_418335363.1.4 conn=wye kv=0.1270 pf=1 pmpp=0.11 kva=0.11 irradiance=1 temperature=25 %cutin=20 %cutout=20 effcurve=MyEff P-TCurve=MyPvsT Daily=IRRAD_DIA TDaily=TEMP_DIA
New PVSystem.GD_9e012d7ccc34842c45b01a75f31b41b1bce3d4a036ccdaeca0ae0f8cb8db2cab_2 phases=1 bus1=node_418335363.2.4 conn=wye kv=0.1270 pf=1 pmpp=0.11 kva=0.11 irradiance=1 temperature=25 %cutin=20 %cutout=20 effcurve=MyEff P-TCurve=MyPvsT Daily=IRRAD_DIA TDaily=TEMP_DIA
New PVSystem.GD_9e012d7ccc34842c45b01a75f31b41b1bce3d4a036ccdaeca0ae0f8cb8db2cab_3 phases=1 bus1=node_418335363.3.4 conn=wye kv=0.1270 pf=1 pmpp=0.11 kva=0.11 irradiance=1 temperature=25 %cutin=20 %cutout=20 effcurve=MyEff P-TCurve=MyPvsT Daily=IRRAD_DIA TDaily=TEMP_DIA
New PVSystem.GD_985c0bbfbb739d7e7f8f642001a3ade77ae97c0508598dd3a5fe7366d511fa6a_1 phases=1 bus1=node_418335363.1.4 conn=wye kv=0.1270 pf=1 pmpp=1.09 kva=1.09 irradiance=1 temperature=25 %cutin=20 %cutout=20 effcurve=MyEff P-TCurve=MyPvsT Daily=IRRAD_DIA TDaily=TEMP_DIA
New PVSystem.GD_985c0bbfbb739d7e7f8f642001a3ade77ae97c0508598dd3a5fe7366d511fa6a_2 phases=1 bus1=node_418335363.2.4 conn=wye kv=0.1270 pf=1 pmpp=1.09 kva=1.09 irradiance=1 temperature=25 %cutin=20 %cutout=20 effcurve=MyEff P-TCurve=MyPvsT Daily=IRRAD_DIA TDaily=TEMP_DIA
New PVSystem.GD_985c0bbfbb739d7e7f8f642001a3ade77ae97c0508598dd3a5fe7366d511fa6a_3 phases=1 bus1=node_418335363.3.4 conn=wye kv=0.1270 pf=1 pmpp=1.09 kva=1.09 irradiance=1 temperature=25 %cutin=20 %cutout=20 effcurve=MyEff P-TCurve=MyPvsT Daily=IRRAD_DIA TDaily=TEMP_DIA
New PVSystem.GD_3331873eba29e572c6e93de1a1d3e53891682a761523e1cb80b71791b80551da_1 phases=1 bus1=node_418335363.1.4 conn=wye kv=0.1270 pf=1 pmpp=1.15 kva=1.15 irradiance=1 temperature=25 %cutin=20 %cutout=20 effcurve=MyEff P-TCurve=MyPvsT Daily=IRRAD_DIA TDaily=TEMP_DIA
New PVSystem.GD_3331873eba29e572c6e93de1a1d3e53891682a761523e1cb80b71791b80551da_2 phases=1 bus1=node_418335363.2.4 conn=wye kv=0.1270 pf=1 pmpp=1.15 kva=1.15 irradiance=1 temperature=25 %cutin=20 %cutout=20 effcurve=MyEff P-TCurve=MyPvsT Daily=IRRAD_DIA TDaily=TEMP_DIA
New PVSystem.GD_3331873eba29e572c6e93de1a1d3e53891682a761523e1cb80b71791b80551da_3 phases=1 bus1=node_418335363.3.4 conn=wye kv=0.1270 pf=1 pmpp=1.15 kva=1.15 irradiance=1 temperature=25 %cutin=20 %cutout=20 effcurve=MyEff P-TCurve=MyPvsT Daily=IRRAD_DIA TDaily=TEMP_DIA
New PVSystem.GD_f853fe198b815dbbb1ab297536e434737e8dcffebd60aa5265918aacec70bca3_1 phases=1 bus1=node_418335363.1.4 conn=wye kv=0.1270 pf=1 pmpp=0.39 kva=0.39 irradiance=1 temperature=25 %cutin=20 %cutout=20 effcurve=MyEff P-TCurve=MyPvsT Daily=IRRAD_DIA TDaily=TEMP_DIA
New PVSystem.GD_f853fe198b815dbbb1ab297536e434737e8dcffebd60aa5265918aacec70bca3_2 phases=1 bus1=node_418335363.2.4 conn=wye kv=0.1270 pf=1 pmpp=0.39 kva=0.39 irradiance=1 temperature=25 %cutin=20 %cutout=20 effcurve=MyEff P-TCurve=MyPvsT Daily=IRRAD_DIA TDaily=TEMP_DIA
New PVSystem.GD_f853fe198b815dbbb1ab297536e434737e8dcffebd60aa5265918aacec70bca3_3 phases=1 bus1=node_418335363.3.4 conn=wye kv=0.1270 pf=1 pmpp=0.39 kva=0.39 irradiance=1 temperature=25 %cutin=20 %cutout=20 effcurve=MyEff P-TCurve=MyPvsT Daily=IRRAD_DIA TDaily=TEMP_DIA
New PVSystem.GD_e17b91cc75c596f1c6f50620a4d8703a963098f7047711d4f9f7713508b3e69e_1 phases=1 bus1=node_418335363.1.4 conn=wye kv=0.1270 pf=1 pmpp=2.63 kva=2.63 irradiance=1 temperature=25 %cutin=20 %cutout=20 effcurve=MyEff P-TCurve=MyPvsT Daily=IRRAD_DIA TDaily=TEMP_DIA
New PVSystem.GD_e17b91cc75c596f1c6f50620a4d8703a963098f7047711d4f9f7713508b3e69e_2 phases=1 bus1=node_418335363.2.4 conn=wye kv=0.1270 pf=1 pmpp=2.63 kva=2.63 irradiance=1 temperature=25 %cutin=20 %cutout=20 effcurve=MyEff P-TCurve=MyPvsT Daily=IRRAD_DIA TDaily=TEMP_DIA
New PVSystem.GD_e17b91cc75c596f1c6f50620a4d8703a963098f7047711d4f9f7713508b3e69e_3 phases=1 bus1=node_418335363.3.4 conn=wye kv=0.1270 pf=1 pmpp=2.63 kva=2.63 irradiance=1 temperature=25 %cutin=20 %cutout=20 effcurve=MyEff P-TCurve=MyPvsT Daily=IRRAD_DIA TDaily=TEMP_DIA
New PVSystem.GD_9a52675fd44a887baadf493189a4060496f655f2ebf06c6ab842c52105aeacaf_1 phases=1 bus1=node_418380446.1.4 conn=wye kv=0.1200 pf=1 pmpp=3.17 kva=3.17 irradiance=1 temperature=25 %cutin=20 %cutout=20 effcurve=MyEff P-TCurve=MyPvsT Daily=IRRAD_DIA TDaily=TEMP_DIA
New PVSystem.GD_9a52675fd44a887baadf493189a4060496f655f2ebf06c6ab842c52105aeacaf_2 phases=1 bus1=node_418380446.2.4 conn=wye kv=0.1200 pf=1 pmpp=3.17 kva=3.17 irradiance=1 temperature=25 %cutin=20 %cutout=20 effcurve=MyEff P-TCurve=MyPvsT Daily=IRRAD_DIA TDaily=TEMP_DIA
New PVSystem.GD_3a4f5845a13aa51ef17827ff5598f24fd817dd0e499651d27e46093639243019_1 phases=1 bus1=node_418380446.1.4 conn=wye kv=0.1200 pf=1 pmpp=1.42 kva=1.42 irradiance=1 temperature=25 %cutin=20 %cutout=20 effcurve=MyEff P-TCurve=MyPvsT Daily=IRRAD_DIA TDaily=TEMP_DIA
New PVSystem.GD_3a4f5845a13aa51ef17827ff5598f24fd817dd0e499651d27e46093639243019_2 phases=1 bus1=node_418380446.2.4 conn=wye kv=0.1200 pf=1 pmpp=1.42 kva=1.42 irradiance=1 temperature=25 %cutin=20 %cutout=20 effcurve=MyEff P-TCurve=MyPvsT Daily=IRRAD_DIA TDaily=TEMP_DIA
New PVSystem.GD_38cecac6491f298dcd24295a4192befb4bf450414740996f5d84d5d7bdb959b5_1 phases=1 bus1=node_418065924.1.4 conn=wye kv=0.1270 pf=1 pmpp=0.58 kva=0.58 irradiance=1 temperature=25 %cutin=20 %cutout=20 effcurve=MyEff P-TCurve=MyPvsT Daily=IRRAD_DIA TDaily=TEMP_DIA
New PVSystem.GD_38cecac6491f298dcd24295a4192befb4bf450414740996f5d84d5d7bdb959b5_2 phases=1 bus1=node_418065924.2.4 conn=wye kv=0.1270 pf=1 pmpp=0.58 kva=0.58 irradiance=1 temperature=25 %cutin=20 %cutout=20 effcurve=MyEff P-TCurve=MyPvsT Daily=IRRAD_DIA TDaily=TEMP_DIA
New PVSystem.GD_38cecac6491f298dcd24295a4192befb4bf450414740996f5d84d5d7bdb959b5_3 phases=1 bus1=node_418065924.3.4 conn=wye kv=0.1270 pf=1 pmpp=0.58 kva=0.58 irradiance=1 temperature=25 %cutin=20 %cutout=20 effcurve=MyEff P-TCurve=MyPvsT Daily=IRRAD_DIA TDaily=TEMP_DIA
New PVSystem.GD_4db0afc7f66db41b95d98004732bf3a403528bbfdb565f802248277680df9dbf_1 phases=1 bus1=node_418065924.1.4 conn=wye kv=0.1270 pf=1 pmpp=0.86 kva=0.86 irradiance=1 temperature=25 %cutin=20 %cutout=20 effcurve=MyEff P-TCurve=MyPvsT Daily=IRRAD_DIA TDaily=TEMP_DIA
New PVSystem.GD_4db0afc7f66db41b95d98004732bf3a403528bbfdb565f802248277680df9dbf_2 phases=1 bus1=node_418065924.2.4 conn=wye kv=0.1270 pf=1 pmpp=0.86 kva=0.86 irradiance=1 temperature=25 %cutin=20 %cutout=20 effcurve=MyEff P-TCurve=MyPvsT Daily=IRRAD_DIA TDaily=TEMP_DIA
New PVSystem.GD_4db0afc7f66db41b95d98004732bf3a403528bbfdb565f802248277680df9dbf_3 phases=1 bus1=node_418065924.3.4 conn=wye kv=0.1270 pf=1 pmpp=0.86 kva=0.86 irradiance=1 temperature=25 %cutin=20 %cutout=20 effcurve=MyEff P-TCurve=MyPvsT Daily=IRRAD_DIA TDaily=TEMP_DIA
New PVSystem.GD_791d09073039744e5b1ccd2914060c8574eaeb59fcb0c62b7ae2bb5b424ea36f_1 phases=1 bus1=node_418065924.1.4 conn=wye kv=0.1270 pf=1 pmpp=2.54 kva=2.54 irradiance=1 temperature=25 %cutin=20 %cutout=20 effcurve=MyEff P-TCurve=MyPvsT Daily=IRRAD_DIA TDaily=TEMP_DIA
New PVSystem.GD_791d09073039744e5b1ccd2914060c8574eaeb59fcb0c62b7ae2bb5b424ea36f_2 phases=1 bus1=node_418065924.2.4 conn=wye kv=0.1270 pf=1 pmpp=2.54 kva=2.54 irradiance=1 temperature=25 %cutin=20 %cutout=20 effcurve=MyEff P-TCurve=MyPvsT Daily=IRRAD_DIA TDaily=TEMP_DIA
New PVSystem.GD_791d09073039744e5b1ccd2914060c8574eaeb59fcb0c62b7ae2bb5b424ea36f_3 phases=1 bus1=node_418065924.3.4 conn=wye kv=0.1270 pf=1 pmpp=2.54 kva=2.54 irradiance=1 temperature=25 %cutin=20 %cutout=20 effcurve=MyEff P-TCurve=MyPvsT Daily=IRRAD_DIA TDaily=TEMP_DIA
New PVSystem.GD_fdba5e5dbcd40177a62154b4e87380d55f47900c95c5d8cc2287ab8f1c46118d_1 phases=1 bus1=node_418065924.1.4 conn=wye kv=0.1270 pf=1 pmpp=0.12 kva=0.12 irradiance=1 temperature=25 %cutin=20 %cutout=20 effcurve=MyEff P-TCurve=MyPvsT Daily=IRRAD_DIA TDaily=TEMP_DIA
New PVSystem.GD_fdba5e5dbcd40177a62154b4e87380d55f47900c95c5d8cc2287ab8f1c46118d_2 phases=1 bus1=node_418065924.2.4 conn=wye kv=0.1270 pf=1 pmpp=0.12 kva=0.12 irradiance=1 temperature=25 %cutin=20 %cutout=20 effcurve=MyEff P-TCurve=MyPvsT Daily=IRRAD_DIA TDaily=TEMP_DIA
New PVSystem.GD_fdba5e5dbcd40177a62154b4e87380d55f47900c95c5d8cc2287ab8f1c46118d_3 phases=1 bus1=node_418065924.3.4 conn=wye kv=0.1270 pf=1 pmpp=0.12 kva=0.12 irradiance=1 temperature=25 %cutin=20 %cutout=20 effcurve=MyEff P-TCurve=MyPvsT Daily=IRRAD_DIA TDaily=TEMP_DIA
New PVSystem.GD_57526929c77a3470086cf9db00fca42ccf6a01381bd9d5e3bd2ce356110b6fa0_1 phases=1 bus1=node_418107791.1.4 conn=wye kv=0.1270 pf=1 pmpp=0.73 kva=0.73 irradiance=1 temperature=25 %cutin=20 %cutout=20 effcurve=MyEff P-TCurve=MyPvsT Daily=IRRAD_DIA TDaily=TEMP_DIA
New PVSystem.GD_57526929c77a3470086cf9db00fca42ccf6a01381bd9d5e3bd2ce356110b6fa0_2 phases=1 bus1=node_418107791.2.4 conn=wye kv=0.1270 pf=1 pmpp=0.73 kva=0.73 irradiance=1 temperature=25 %cutin=20 %cutout=20 effcurve=MyEff P-TCurve=MyPvsT Daily=IRRAD_DIA TDaily=TEMP_DIA
New PVSystem.GD_57526929c77a3470086cf9db00fca42ccf6a01381bd9d5e3bd2ce356110b6fa0_3 phases=1 bus1=node_418107791.3.4 conn=wye kv=0.1270 pf=1 pmpp=0.73 kva=0.73 irradiance=1 temperature=25 %cutin=20 %cutout=20 effcurve=MyEff P-TCurve=MyPvsT Daily=IRRAD_DIA TDaily=TEMP_DIA
New PVSystem.GD_fa30943b62d3d38a8519f1565aaf5f54d2c2f7e96772ed0fff73bb4258f6e577_1 phases=1 bus1=node_418107791.1.4 conn=wye kv=0.1270 pf=1 pmpp=0.22 kva=0.22 irradiance=1 temperature=25 %cutin=20 %cutout=20 effcurve=MyEff P-TCurve=MyPvsT Daily=IRRAD_DIA TDaily=TEMP_DIA
New PVSystem.GD_fa30943b62d3d38a8519f1565aaf5f54d2c2f7e96772ed0fff73bb4258f6e577_2 phases=1 bus1=node_418107791.2.4 conn=wye kv=0.1270 pf=1 pmpp=0.22 kva=0.22 irradiance=1 temperature=25 %cutin=20 %cutout=20 effcurve=MyEff P-TCurve=MyPvsT Daily=IRRAD_DIA TDaily=TEMP_DIA
New PVSystem.GD_fa30943b62d3d38a8519f1565aaf5f54d2c2f7e96772ed0fff73bb4258f6e577_3 phases=1 bus1=node_418107791.3.4 conn=wye kv=0.1270 pf=1 pmpp=0.22 kva=0.22 irradiance=1 temperature=25 %cutin=20 %cutout=20 effcurve=MyEff P-TCurve=MyPvsT Daily=IRRAD_DIA TDaily=TEMP_DIA
New PVSystem.GD_322e682907ee690915b6ab8cb7315ed396c82fb4f9b923bab71df063e5c4cd9e_1 phases=1 bus1=node_418988597.1.4 conn=wye kv=0.1200 pf=1 pmpp=1.83 kva=1.83 irradiance=1 temperature=25 %cutin=20 %cutout=20 effcurve=MyEff P-TCurve=MyPvsT Daily=IRRAD_DIA TDaily=TEMP_DIA
New PVSystem.GD_322e682907ee690915b6ab8cb7315ed396c82fb4f9b923bab71df063e5c4cd9e_2 phases=1 bus1=node_418988597.2.4 conn=wye kv=0.1200 pf=1 pmpp=1.83 kva=1.83 irradiance=1 temperature=25 %cutin=20 %cutout=20 effcurve=MyEff P-TCurve=MyPvsT Daily=IRRAD_DIA TDaily=TEMP_DIA
New PVSystem.GD_f2f31d63bb3e26d62d0cf98c269e44ff28a8519baa1b52d121eeb5afca6ef094_1 phases=1 bus1=node_418057431.1.4 conn=wye kv=0.1270 pf=1 pmpp=10.98 kva=10.98 irradiance=1 temperature=25 %cutin=20 %cutout=20 effcurve=MyEff P-TCurve=MyPvsT Daily=IRRAD_DIA TDaily=TEMP_DIA
New PVSystem.GD_f2f31d63bb3e26d62d0cf98c269e44ff28a8519baa1b52d121eeb5afca6ef094_2 phases=1 bus1=node_418057431.2.4 conn=wye kv=0.1270 pf=1 pmpp=10.98 kva=10.98 irradiance=1 temperature=25 %cutin=20 %cutout=20 effcurve=MyEff P-TCurve=MyPvsT Daily=IRRAD_DIA TDaily=TEMP_DIA
New PVSystem.GD_f2f31d63bb3e26d62d0cf98c269e44ff28a8519baa1b52d121eeb5afca6ef094_3 phases=1 bus1=node_418057431.3.4 conn=wye kv=0.1270 pf=1 pmpp=10.98 kva=10.98 irradiance=1 temperature=25 %cutin=20 %cutout=20 effcurve=MyEff P-TCurve=MyPvsT Daily=IRRAD_DIA TDaily=TEMP_DIA
New PVSystem.GD_7c64916b0e05572f0f7c46daa971db207d07b34de75f01c23b64aca1e2ff3771_1 phases=1 bus1=node_418058709.1.4 conn=wye kv=0.1270 pf=1 pmpp=9.99 kva=9.99 irradiance=1 temperature=25 %cutin=20 %cutout=20 effcurve=MyEff P-TCurve=MyPvsT Daily=IRRAD_DIA TDaily=TEMP_DIA
New PVSystem.GD_7c64916b0e05572f0f7c46daa971db207d07b34de75f01c23b64aca1e2ff3771_2 phases=1 bus1=node_418058709.2.4 conn=wye kv=0.1270 pf=1 pmpp=9.99 kva=9.99 irradiance=1 temperature=25 %cutin=20 %cutout=20 effcurve=MyEff P-TCurve=MyPvsT Daily=IRRAD_DIA TDaily=TEMP_DIA
New PVSystem.GD_7c64916b0e05572f0f7c46daa971db207d07b34de75f01c23b64aca1e2ff3771_3 phases=1 bus1=node_418058709.3.4 conn=wye kv=0.1270 pf=1 pmpp=9.99 kva=9.99 irradiance=1 temperature=25 %cutin=20 %cutout=20 effcurve=MyEff P-TCurve=MyPvsT Daily=IRRAD_DIA TDaily=TEMP_DIA
New PVSystem.GD_6397170869fc7c7e645e906ecbd2c0fdc1cce2a7a8165dc27de8674b2b234c72_1 phases=1 bus1=node_418955455.1.4 conn=wye kv=0.1200 pf=1 pmpp=1.31 kva=1.31 irradiance=1 temperature=25 %cutin=20 %cutout=20 effcurve=MyEff P-TCurve=MyPvsT Daily=IRRAD_DIA TDaily=TEMP_DIA
New PVSystem.GD_6397170869fc7c7e645e906ecbd2c0fdc1cce2a7a8165dc27de8674b2b234c72_2 phases=1 bus1=node_418955455.2.4 conn=wye kv=0.1200 pf=1 pmpp=1.31 kva=1.31 irradiance=1 temperature=25 %cutin=20 %cutout=20 effcurve=MyEff P-TCurve=MyPvsT Daily=IRRAD_DIA TDaily=TEMP_DIA
New PVSystem.GD_886f24934fa6aea8fc52e5b62522779d1e530566a3e64f70ceeede2bfa2ceb8f_1 phases=1 bus1=node_419241463.1.4 conn=wye kv=0.1200 pf=1 pmpp=1.65 kva=1.65 irradiance=1 temperature=25 %cutin=20 %cutout=20 effcurve=MyEff P-TCurve=MyPvsT Daily=IRRAD_DIA TDaily=TEMP_DIA
New PVSystem.GD_886f24934fa6aea8fc52e5b62522779d1e530566a3e64f70ceeede2bfa2ceb8f_2 phases=1 bus1=node_419241463.2.4 conn=wye kv=0.1200 pf=1 pmpp=1.65 kva=1.65 irradiance=1 temperature=25 %cutin=20 %cutout=20 effcurve=MyEff P-TCurve=MyPvsT Daily=IRRAD_DIA TDaily=TEMP_DIA
New PVSystem.GD_7087dffb43b5a3ea9a6fcc7c5c9f02ce4abaa6e708a58555d8adecdfdcd5c75d_1 phases=1 bus1=node_419241478.1.4 conn=wye kv=0.1200 pf=1 pmpp=0.96 kva=0.96 irradiance=1 temperature=25 %cutin=20 %cutout=20 effcurve=MyEff P-TCurve=MyPvsT Daily=IRRAD_DIA TDaily=TEMP_DIA
New PVSystem.GD_7087dffb43b5a3ea9a6fcc7c5c9f02ce4abaa6e708a58555d8adecdfdcd5c75d_2 phases=1 bus1=node_419241478.2.4 conn=wye kv=0.1200 pf=1 pmpp=0.96 kva=0.96 irradiance=1 temperature=25 %cutin=20 %cutout=20 effcurve=MyEff P-TCurve=MyPvsT Daily=IRRAD_DIA TDaily=TEMP_DIA
New PVSystem.GD_420c305ebace8634b645401ded80becef02857bf0aec3a479562b82fa962ef6e_1 phases=1 bus1=node_418313933.1.4 conn=wye kv=0.1270 pf=1 pmpp=0.94 kva=0.94 irradiance=1 temperature=25 %cutin=20 %cutout=20 effcurve=MyEff P-TCurve=MyPvsT Daily=IRRAD_DIA TDaily=TEMP_DIA
New PVSystem.GD_420c305ebace8634b645401ded80becef02857bf0aec3a479562b82fa962ef6e_2 phases=1 bus1=node_418313933.2.4 conn=wye kv=0.1270 pf=1 pmpp=0.94 kva=0.94 irradiance=1 temperature=25 %cutin=20 %cutout=20 effcurve=MyEff P-TCurve=MyPvsT Daily=IRRAD_DIA TDaily=TEMP_DIA
New PVSystem.GD_420c305ebace8634b645401ded80becef02857bf0aec3a479562b82fa962ef6e_3 phases=1 bus1=node_418313933.3.4 conn=wye kv=0.1270 pf=1 pmpp=0.94 kva=0.94 irradiance=1 temperature=25 %cutin=20 %cutout=20 effcurve=MyEff P-TCurve=MyPvsT Daily=IRRAD_DIA TDaily=TEMP_DIA
New PVSystem.GD_8c50aa826b313c06a87371b51fe063f9e497a685f662b07f823e0f1ba5bfc332_1 phases=1 bus1=node_419454269.1.4 conn=wye kv=0.1200 pf=1 pmpp=0.98 kva=0.98 irradiance=1 temperature=25 %cutin=20 %cutout=20 effcurve=MyEff P-TCurve=MyPvsT Daily=IRRAD_DIA TDaily=TEMP_DIA
New PVSystem.GD_8c50aa826b313c06a87371b51fe063f9e497a685f662b07f823e0f1ba5bfc332_2 phases=1 bus1=node_419454269.2.4 conn=wye kv=0.1200 pf=1 pmpp=0.98 kva=0.98 irradiance=1 temperature=25 %cutin=20 %cutout=20 effcurve=MyEff P-TCurve=MyPvsT Daily=IRRAD_DIA TDaily=TEMP_DIA
New PVSystem.GD_87e6fd3b8075d89129cc68fbcc4783416eb25675f4e85b545de8153a4708dff3_1 phases=1 bus1=node_419486367.1.4 conn=wye kv=0.1200 pf=1 pmpp=0.24 kva=0.24 irradiance=1 temperature=25 %cutin=20 %cutout=20 effcurve=MyEff P-TCurve=MyPvsT Daily=IRRAD_DIA TDaily=TEMP_DIA
New PVSystem.GD_87e6fd3b8075d89129cc68fbcc4783416eb25675f4e85b545de8153a4708dff3_2 phases=1 bus1=node_419486367.2.4 conn=wye kv=0.1200 pf=1 pmpp=0.24 kva=0.24 irradiance=1 temperature=25 %cutin=20 %cutout=20 effcurve=MyEff P-TCurve=MyPvsT Daily=IRRAD_DIA TDaily=TEMP_DIA
New PVSystem.GD_e4865dc7d301d9f168096b2cfd37e6e1f60fe62e26b5c9e2d55b7b1fdc95ef7d_1 phases=1 bus1=node_419828553.1.4 conn=wye kv=0.1200 pf=1 pmpp=1.75 kva=1.75 irradiance=1 temperature=25 %cutin=20 %cutout=20 effcurve=MyEff P-TCurve=MyPvsT Daily=IRRAD_DIA TDaily=TEMP_DIA
New PVSystem.GD_e4865dc7d301d9f168096b2cfd37e6e1f60fe62e26b5c9e2d55b7b1fdc95ef7d_2 phases=1 bus1=node_419828553.2.4 conn=wye kv=0.1200 pf=1 pmpp=1.75 kva=1.75 irradiance=1 temperature=25 %cutin=20 %cutout=20 effcurve=MyEff P-TCurve=MyPvsT Daily=IRRAD_DIA TDaily=TEMP_DIA
New PVSystem.GD_fa980aeab18b72646725846c725fb3211fdb751a8875287744ba0f9765e2a01f_1 phases=1 bus1=node_419861500.1.4 conn=wye kv=0.1200 pf=1 pmpp=13.55 kva=13.55 irradiance=1 temperature=25 %cutin=20 %cutout=20 effcurve=MyEff P-TCurve=MyPvsT Daily=IRRAD_DIA TDaily=TEMP_DIA
New PVSystem.GD_fa980aeab18b72646725846c725fb3211fdb751a8875287744ba0f9765e2a01f_2 phases=1 bus1=node_419861500.2.4 conn=wye kv=0.1200 pf=1 pmpp=13.55 kva=13.55 irradiance=1 temperature=25 %cutin=20 %cutout=20 effcurve=MyEff P-TCurve=MyPvsT Daily=IRRAD_DIA TDaily=TEMP_DIA
New PVSystem.GD_e8a25722d3aa463a3517fd47360aa54f7cd16df2383e921bfc863ffad421e036_1 phases=1 bus1=node_419828379.1.4 conn=wye kv=0.1200 pf=1 pmpp=2.22 kva=2.22 irradiance=1 temperature=25 %cutin=20 %cutout=20 effcurve=MyEff P-TCurve=MyPvsT Daily=IRRAD_DIA TDaily=TEMP_DIA
New PVSystem.GD_e8a25722d3aa463a3517fd47360aa54f7cd16df2383e921bfc863ffad421e036_2 phases=1 bus1=node_419828379.2.4 conn=wye kv=0.1200 pf=1 pmpp=2.22 kva=2.22 irradiance=1 temperature=25 %cutin=20 %cutout=20 effcurve=MyEff P-TCurve=MyPvsT Daily=IRRAD_DIA TDaily=TEMP_DIA
New PVSystem.GD_db50e8ba42ca35323ba66d6ce69cd1f7b957ef8dcb8ad677caf240bfa4c48f22_1 phases=1 bus1=node_419624866.1.4 conn=wye kv=0.1200 pf=1 pmpp=1.00 kva=1.00 irradiance=1 temperature=25 %cutin=20 %cutout=20 effcurve=MyEff P-TCurve=MyPvsT Daily=IRRAD_DIA TDaily=TEMP_DIA
New PVSystem.GD_db50e8ba42ca35323ba66d6ce69cd1f7b957ef8dcb8ad677caf240bfa4c48f22_2 phases=1 bus1=node_419624866.2.4 conn=wye kv=0.1200 pf=1 pmpp=1.00 kva=1.00 irradiance=1 temperature=25 %cutin=20 %cutout=20 effcurve=MyEff P-TCurve=MyPvsT Daily=IRRAD_DIA TDaily=TEMP_DIA
New PVSystem.GD_f6c88035a59573aea0091d578d36fb3f021187ab1807bdeca293cd793a6f2f93_1 phases=1 bus1=node_419758489.1.4 conn=wye kv=0.1200 pf=1 pmpp=1.55 kva=1.55 irradiance=1 temperature=25 %cutin=20 %cutout=20 effcurve=MyEff P-TCurve=MyPvsT Daily=IRRAD_DIA TDaily=TEMP_DIA
New PVSystem.GD_f6c88035a59573aea0091d578d36fb3f021187ab1807bdeca293cd793a6f2f93_2 phases=1 bus1=node_419758489.2.4 conn=wye kv=0.1200 pf=1 pmpp=1.55 kva=1.55 irradiance=1 temperature=25 %cutin=20 %cutout=20 effcurve=MyEff P-TCurve=MyPvsT Daily=IRRAD_DIA TDaily=TEMP_DIA
New PVSystem.GD_ba5a21927a0f63c57c96be4341edb1421fa25e15fc08f4d60e974424aa3d6d0c_1 phases=1 bus1=node_415878217.1.4 conn=wye kv=0.1200 pf=1 pmpp=0.78 kva=0.78 irradiance=1 temperature=25 %cutin=20 %cutout=20 effcurve=MyEff P-TCurve=MyPvsT Daily=IRRAD_DIA TDaily=TEMP_DIA
New PVSystem.GD_ba5a21927a0f63c57c96be4341edb1421fa25e15fc08f4d60e974424aa3d6d0c_2 phases=1 bus1=node_415878217.2.4 conn=wye kv=0.1200 pf=1 pmpp=0.78 kva=0.78 irradiance=1 temperature=25 %cutin=20 %cutout=20 effcurve=MyEff P-TCurve=MyPvsT Daily=IRRAD_DIA TDaily=TEMP_DIA
New PVSystem.GD_7af9b16326d01bafd011b6c305f780b9be1618a10b4ab2bead13eed1c4c32fa2_1 phases=1 bus1=node_418902835.1.4 conn=wye kv=0.1270 pf=1 pmpp=0.39 kva=0.39 irradiance=1 temperature=25 %cutin=20 %cutout=20 effcurve=MyEff P-TCurve=MyPvsT Daily=IRRAD_DIA TDaily=TEMP_DIA
New PVSystem.GD_7af9b16326d01bafd011b6c305f780b9be1618a10b4ab2bead13eed1c4c32fa2_2 phases=1 bus1=node_418902835.2.4 conn=wye kv=0.1270 pf=1 pmpp=0.39 kva=0.39 irradiance=1 temperature=25 %cutin=20 %cutout=20 effcurve=MyEff P-TCurve=MyPvsT Daily=IRRAD_DIA TDaily=TEMP_DIA
New PVSystem.GD_7af9b16326d01bafd011b6c305f780b9be1618a10b4ab2bead13eed1c4c32fa2_3 phases=1 bus1=node_418902835.3.4 conn=wye kv=0.1270 pf=1 pmpp=0.39 kva=0.39 irradiance=1 temperature=25 %cutin=20 %cutout=20 effcurve=MyEff P-TCurve=MyPvsT Daily=IRRAD_DIA TDaily=TEMP_DIA
New PVSystem.GD_86e5c723dddb4d2c9a432afc7a85e7faeedb4a24b1a0e3ce7fdb79140ff033e3_1 phases=1 bus1=node_418364393.1.4 conn=wye kv=0.1270 pf=1 pmpp=0.48 kva=0.48 irradiance=1 temperature=25 %cutin=20 %cutout=20 effcurve=MyEff P-TCurve=MyPvsT Daily=IRRAD_DIA TDaily=TEMP_DIA
New PVSystem.GD_86e5c723dddb4d2c9a432afc7a85e7faeedb4a24b1a0e3ce7fdb79140ff033e3_2 phases=1 bus1=node_418364393.2.4 conn=wye kv=0.1270 pf=1 pmpp=0.48 kva=0.48 irradiance=1 temperature=25 %cutin=20 %cutout=20 effcurve=MyEff P-TCurve=MyPvsT Daily=IRRAD_DIA TDaily=TEMP_DIA
New PVSystem.GD_86e5c723dddb4d2c9a432afc7a85e7faeedb4a24b1a0e3ce7fdb79140ff033e3_3 phases=1 bus1=node_418364393.3.4 conn=wye kv=0.1270 pf=1 pmpp=0.48 kva=0.48 irradiance=1 temperature=25 %cutin=20 %cutout=20 effcurve=MyEff P-TCurve=MyPvsT Daily=IRRAD_DIA TDaily=TEMP_DIA
New PVSystem.GD_1be141c772a4a6cb2b1f49cf1cd5f6269cded350a8fd70d369c4f2254b1f5752_1 phases=1 bus1=node_418364393.1.4 conn=wye kv=0.1270 pf=1 pmpp=0.44 kva=0.44 irradiance=1 temperature=25 %cutin=20 %cutout=20 effcurve=MyEff P-TCurve=MyPvsT Daily=IRRAD_DIA TDaily=TEMP_DIA
New PVSystem.GD_1be141c772a4a6cb2b1f49cf1cd5f6269cded350a8fd70d369c4f2254b1f5752_2 phases=1 bus1=node_418364393.2.4 conn=wye kv=0.1270 pf=1 pmpp=0.44 kva=0.44 irradiance=1 temperature=25 %cutin=20 %cutout=20 effcurve=MyEff P-TCurve=MyPvsT Daily=IRRAD_DIA TDaily=TEMP_DIA
New PVSystem.GD_1be141c772a4a6cb2b1f49cf1cd5f6269cded350a8fd70d369c4f2254b1f5752_3 phases=1 bus1=node_418364393.3.4 conn=wye kv=0.1270 pf=1 pmpp=0.44 kva=0.44 irradiance=1 temperature=25 %cutin=20 %cutout=20 effcurve=MyEff P-TCurve=MyPvsT Daily=IRRAD_DIA TDaily=TEMP_DIA
New PVSystem.GD_a90ce095eba8aea2790311f26fd906ba96ee6cf292eb84419219cf2bfea893ab_1 phases=1 bus1=node_419591175.1.4 conn=wye kv=0.1200 pf=1 pmpp=0.83 kva=0.83 irradiance=1 temperature=25 %cutin=20 %cutout=20 effcurve=MyEff P-TCurve=MyPvsT Daily=IRRAD_DIA TDaily=TEMP_DIA
New PVSystem.GD_a90ce095eba8aea2790311f26fd906ba96ee6cf292eb84419219cf2bfea893ab_2 phases=1 bus1=node_419591175.2.4 conn=wye kv=0.1200 pf=1 pmpp=0.83 kva=0.83 irradiance=1 temperature=25 %cutin=20 %cutout=20 effcurve=MyEff P-TCurve=MyPvsT Daily=IRRAD_DIA TDaily=TEMP_DIA
New PVSystem.GD_abd08e0a1b13a8c8c2efe3f387622da2fb467e9afbd0a50e6a76ba280f0086f7_1 phases=1 bus1=node_419896193.1.4 conn=wye kv=0.1200 pf=1 pmpp=7.43 kva=7.43 irradiance=1 temperature=25 %cutin=20 %cutout=20 effcurve=MyEff P-TCurve=MyPvsT Daily=IRRAD_DIA TDaily=TEMP_DIA
New PVSystem.GD_abd08e0a1b13a8c8c2efe3f387622da2fb467e9afbd0a50e6a76ba280f0086f7_2 phases=1 bus1=node_419896193.2.4 conn=wye kv=0.1200 pf=1 pmpp=7.43 kva=7.43 irradiance=1 temperature=25 %cutin=20 %cutout=20 effcurve=MyEff P-TCurve=MyPvsT Daily=IRRAD_DIA TDaily=TEMP_DIA
New PVSystem.GD_0f99ad6259cbedaa35b8c6362236b8103f7e35f963b3d7721cdf48c2c18226a8_1 phases=1 bus1=node_419997758.1.4 conn=wye kv=0.1200 pf=1 pmpp=1.55 kva=1.55 irradiance=1 temperature=25 %cutin=20 %cutout=20 effcurve=MyEff P-TCurve=MyPvsT Daily=IRRAD_DIA TDaily=TEMP_DIA
New PVSystem.GD_0f99ad6259cbedaa35b8c6362236b8103f7e35f963b3d7721cdf48c2c18226a8_2 phases=1 bus1=node_419997758.2.4 conn=wye kv=0.1200 pf=1 pmpp=1.55 kva=1.55 irradiance=1 temperature=25 %cutin=20 %cutout=20 effcurve=MyEff P-TCurve=MyPvsT Daily=IRRAD_DIA TDaily=TEMP_DIA
New PVSystem.GD_fb0dde42cbd90db569c06ec906acf38a00059779de73e450ae335b07fbe2ef09_1 phases=1 bus1=node_419451350.1.4 conn=wye kv=0.1270 pf=1 pmpp=0.62 kva=0.62 irradiance=1 temperature=25 %cutin=20 %cutout=20 effcurve=MyEff P-TCurve=MyPvsT Daily=IRRAD_DIA TDaily=TEMP_DIA
New PVSystem.GD_fb0dde42cbd90db569c06ec906acf38a00059779de73e450ae335b07fbe2ef09_2 phases=1 bus1=node_419451350.2.4 conn=wye kv=0.1270 pf=1 pmpp=0.62 kva=0.62 irradiance=1 temperature=25 %cutin=20 %cutout=20 effcurve=MyEff P-TCurve=MyPvsT Daily=IRRAD_DIA TDaily=TEMP_DIA
New PVSystem.GD_fb0dde42cbd90db569c06ec906acf38a00059779de73e450ae335b07fbe2ef09_3 phases=1 bus1=node_419451350.3.4 conn=wye kv=0.1270 pf=1 pmpp=0.62 kva=0.62 irradiance=1 temperature=25 %cutin=20 %cutout=20 effcurve=MyEff P-TCurve=MyPvsT Daily=IRRAD_DIA TDaily=TEMP_DIA
New PVSystem.GD_448922486b39aebd5fedebf9a8591af309831e427577f62fcd2dfd153007da60_1 phases=1 bus1=node_419862682.1.4 conn=wye kv=0.1270 pf=1 pmpp=19.14 kva=19.14 irradiance=1 temperature=25 %cutin=20 %cutout=20 effcurve=MyEff P-TCurve=MyPvsT Daily=IRRAD_DIA TDaily=TEMP_DIA
New PVSystem.GD_448922486b39aebd5fedebf9a8591af309831e427577f62fcd2dfd153007da60_2 phases=1 bus1=node_419862682.2.4 conn=wye kv=0.1270 pf=1 pmpp=19.14 kva=19.14 irradiance=1 temperature=25 %cutin=20 %cutout=20 effcurve=MyEff P-TCurve=MyPvsT Daily=IRRAD_DIA TDaily=TEMP_DIA
New PVSystem.GD_448922486b39aebd5fedebf9a8591af309831e427577f62fcd2dfd153007da60_3 phases=1 bus1=node_419862682.3.4 conn=wye kv=0.1270 pf=1 pmpp=19.14 kva=19.14 irradiance=1 temperature=25 %cutin=20 %cutout=20 effcurve=MyEff P-TCurve=MyPvsT Daily=IRRAD_DIA TDaily=TEMP_DIA
New PVSystem.GD_c71a3aa8c94e83f322255d2f81e4084e29804dfa34afcbb246c3380b5ccd7d25_1 phases=1 bus1=node_418313201.1.4 conn=wye kv=0.1200 pf=1 pmpp=1.40 kva=1.40 irradiance=1 temperature=25 %cutin=20 %cutout=20 effcurve=MyEff P-TCurve=MyPvsT Daily=IRRAD_DIA TDaily=TEMP_DIA
New PVSystem.GD_c71a3aa8c94e83f322255d2f81e4084e29804dfa34afcbb246c3380b5ccd7d25_2 phases=1 bus1=node_418313201.2.4 conn=wye kv=0.1200 pf=1 pmpp=1.40 kva=1.40 irradiance=1 temperature=25 %cutin=20 %cutout=20 effcurve=MyEff P-TCurve=MyPvsT Daily=IRRAD_DIA TDaily=TEMP_DIA
New PVSystem.GD_1a870fb485a6d78e6f63df6cf20d7c53379c9c2610eb2b5747a2df1d1521b726_1 phases=1 bus1=node_418378211.1.4 conn=wye kv=0.1270 pf=1 pmpp=0.73 kva=0.73 irradiance=1 temperature=25 %cutin=20 %cutout=20 effcurve=MyEff P-TCurve=MyPvsT Daily=IRRAD_DIA TDaily=TEMP_DIA
New PVSystem.GD_1a870fb485a6d78e6f63df6cf20d7c53379c9c2610eb2b5747a2df1d1521b726_2 phases=1 bus1=node_418378211.2.4 conn=wye kv=0.1270 pf=1 pmpp=0.73 kva=0.73 irradiance=1 temperature=25 %cutin=20 %cutout=20 effcurve=MyEff P-TCurve=MyPvsT Daily=IRRAD_DIA TDaily=TEMP_DIA
New PVSystem.GD_1a870fb485a6d78e6f63df6cf20d7c53379c9c2610eb2b5747a2df1d1521b726_3 phases=1 bus1=node_418378211.3.4 conn=wye kv=0.1270 pf=1 pmpp=0.73 kva=0.73 irradiance=1 temperature=25 %cutin=20 %cutout=20 effcurve=MyEff P-TCurve=MyPvsT Daily=IRRAD_DIA TDaily=TEMP_DIA
New PVSystem.GD_865a8c51f4ddc5b2faa7953c199be7e91fbe6c01e1c689862a15ed5d46476182_1 phases=1 bus1=node_419870672.1.4 conn=wye kv=0.1200 pf=1 pmpp=1.57 kva=1.57 irradiance=1 temperature=25 %cutin=20 %cutout=20 effcurve=MyEff P-TCurve=MyPvsT Daily=IRRAD_DIA TDaily=TEMP_DIA
New PVSystem.GD_865a8c51f4ddc5b2faa7953c199be7e91fbe6c01e1c689862a15ed5d46476182_2 phases=1 bus1=node_419870672.2.4 conn=wye kv=0.1200 pf=1 pmpp=1.57 kva=1.57 irradiance=1 temperature=25 %cutin=20 %cutout=20 effcurve=MyEff P-TCurve=MyPvsT Daily=IRRAD_DIA TDaily=TEMP_DIA
New PVSystem.GD_a5148e6a7814fcf9a358f6a19cdf9dcdf7a0e1bbca64174c364cbb388e449cc9_1 phases=1 bus1=node_419928510.1.4 conn=wye kv=0.1200 pf=1 pmpp=3.23 kva=3.23 irradiance=1 temperature=25 %cutin=20 %cutout=20 effcurve=MyEff P-TCurve=MyPvsT Daily=IRRAD_DIA TDaily=TEMP_DIA
New PVSystem.GD_a5148e6a7814fcf9a358f6a19cdf9dcdf7a0e1bbca64174c364cbb388e449cc9_2 phases=1 bus1=node_419928510.2.4 conn=wye kv=0.1200 pf=1 pmpp=3.23 kva=3.23 irradiance=1 temperature=25 %cutin=20 %cutout=20 effcurve=MyEff P-TCurve=MyPvsT Daily=IRRAD_DIA TDaily=TEMP_DIA
New PVSystem.GD_63bf0f7048951557906e674a641be2fab634cbe0b284d249560909965bfb69b1_1 phases=1 bus1=node_419937316.1.4 conn=wye kv=0.1200 pf=1 pmpp=0.26 kva=0.26 irradiance=1 temperature=25 %cutin=20 %cutout=20 effcurve=MyEff P-TCurve=MyPvsT Daily=IRRAD_DIA TDaily=TEMP_DIA
New PVSystem.GD_63bf0f7048951557906e674a641be2fab634cbe0b284d249560909965bfb69b1_2 phases=1 bus1=node_419937316.2.4 conn=wye kv=0.1200 pf=1 pmpp=0.26 kva=0.26 irradiance=1 temperature=25 %cutin=20 %cutout=20 effcurve=MyEff P-TCurve=MyPvsT Daily=IRRAD_DIA TDaily=TEMP_DIA
New PVSystem.GD_50415151e99d8c293a4c6c86d28d5610986d96dbc47333fc8711895c55caf33d_1 phases=1 bus1=node_419903004.1.4 conn=wye kv=0.1270 pf=1 pmpp=0.21 kva=0.21 irradiance=1 temperature=25 %cutin=20 %cutout=20 effcurve=MyEff P-TCurve=MyPvsT Daily=IRRAD_DIA TDaily=TEMP_DIA
New PVSystem.GD_50415151e99d8c293a4c6c86d28d5610986d96dbc47333fc8711895c55caf33d_2 phases=1 bus1=node_419903004.2.4 conn=wye kv=0.1270 pf=1 pmpp=0.21 kva=0.21 irradiance=1 temperature=25 %cutin=20 %cutout=20 effcurve=MyEff P-TCurve=MyPvsT Daily=IRRAD_DIA TDaily=TEMP_DIA
New PVSystem.GD_50415151e99d8c293a4c6c86d28d5610986d96dbc47333fc8711895c55caf33d_3 phases=1 bus1=node_419903004.3.4 conn=wye kv=0.1270 pf=1 pmpp=0.21 kva=0.21 irradiance=1 temperature=25 %cutin=20 %cutout=20 effcurve=MyEff P-TCurve=MyPvsT Daily=IRRAD_DIA TDaily=TEMP_DIA
New PVSystem.GD_76f5889c0e5b3233c4a54b7bd6ec999ea0fcc3216fe1bcd324178a256a3c5f4d_1 phases=1 bus1=node_419931585.1.4 conn=wye kv=0.1200 pf=1 pmpp=4.43 kva=4.43 irradiance=1 temperature=25 %cutin=20 %cutout=20 effcurve=MyEff P-TCurve=MyPvsT Daily=IRRAD_DIA TDaily=TEMP_DIA
New PVSystem.GD_76f5889c0e5b3233c4a54b7bd6ec999ea0fcc3216fe1bcd324178a256a3c5f4d_2 phases=1 bus1=node_419931585.2.4 conn=wye kv=0.1200 pf=1 pmpp=4.43 kva=4.43 irradiance=1 temperature=25 %cutin=20 %cutout=20 effcurve=MyEff P-TCurve=MyPvsT Daily=IRRAD_DIA TDaily=TEMP_DIA
New PVSystem.GD_258c9773e763ca81d2c1eb515a42a60e3a2daa54877a59e0a7d8cde914424a1b_1 phases=1 bus1=node_418292971.1.4 conn=wye kv=0.1200 pf=1 pmpp=1.54 kva=1.54 irradiance=1 temperature=25 %cutin=20 %cutout=20 effcurve=MyEff P-TCurve=MyPvsT Daily=IRRAD_DIA TDaily=TEMP_DIA
New PVSystem.GD_258c9773e763ca81d2c1eb515a42a60e3a2daa54877a59e0a7d8cde914424a1b_2 phases=1 bus1=node_418292971.2.4 conn=wye kv=0.1200 pf=1 pmpp=1.54 kva=1.54 irradiance=1 temperature=25 %cutin=20 %cutout=20 effcurve=MyEff P-TCurve=MyPvsT Daily=IRRAD_DIA TDaily=TEMP_DIA
New PVSystem.GD_b605702cc59340dcf395d20066adaefafa1f36f15a990d85b5ecb5d7739d9cfc_1 phases=1 bus1=node_418292971.1.4 conn=wye kv=0.1200 pf=1 pmpp=2.78 kva=2.78 irradiance=1 temperature=25 %cutin=20 %cutout=20 effcurve=MyEff P-TCurve=MyPvsT Daily=IRRAD_DIA TDaily=TEMP_DIA
New PVSystem.GD_b605702cc59340dcf395d20066adaefafa1f36f15a990d85b5ecb5d7739d9cfc_2 phases=1 bus1=node_418292971.2.4 conn=wye kv=0.1200 pf=1 pmpp=2.78 kva=2.78 irradiance=1 temperature=25 %cutin=20 %cutout=20 effcurve=MyEff P-TCurve=MyPvsT Daily=IRRAD_DIA TDaily=TEMP_DIA
New PVSystem.GD_4027a48111a6c9a62474ef011908f309d815ee946920d73ae0c548610ee3f918_1 phases=1 bus1=node_2416925135.1.4 conn=wye kv=0.1200 pf=1 pmpp=1.36 kva=1.36 irradiance=1 temperature=25 %cutin=20 %cutout=20 effcurve=MyEff P-TCurve=MyPvsT Daily=IRRAD_DIA TDaily=TEMP_DIA
New PVSystem.GD_4027a48111a6c9a62474ef011908f309d815ee946920d73ae0c548610ee3f918_2 phases=1 bus1=node_2416925135.2.4 conn=wye kv=0.1200 pf=1 pmpp=1.36 kva=1.36 irradiance=1 temperature=25 %cutin=20 %cutout=20 effcurve=MyEff P-TCurve=MyPvsT Daily=IRRAD_DIA TDaily=TEMP_DIA
New PVSystem.GD_23552ed4d4b539ef1ed2f6fde3d250994d3c68f80331a74bd5684911f55faaae_1 phases=1 bus1=node_418252361.1.4 conn=wye kv=0.1200 pf=1 pmpp=7.50 kva=7.50 irradiance=1 temperature=25 %cutin=20 %cutout=20 effcurve=MyEff P-TCurve=MyPvsT Daily=IRRAD_DIA TDaily=TEMP_DIA
New PVSystem.GD_23552ed4d4b539ef1ed2f6fde3d250994d3c68f80331a74bd5684911f55faaae_2 phases=1 bus1=node_418252361.2.4 conn=wye kv=0.1200 pf=1 pmpp=7.50 kva=7.50 irradiance=1 temperature=25 %cutin=20 %cutout=20 effcurve=MyEff P-TCurve=MyPvsT Daily=IRRAD_DIA TDaily=TEMP_DIA
New PVSystem.GD_1814627c81a7f91e73943227017aabdcdf3082e7a6743f1fa8f7d6df05995546_1 phases=1 bus1=node_418294831.1.4 conn=wye kv=0.1270 pf=1 pmpp=0.92 kva=0.92 irradiance=1 temperature=25 %cutin=20 %cutout=20 effcurve=MyEff P-TCurve=MyPvsT Daily=IRRAD_DIA TDaily=TEMP_DIA
New PVSystem.GD_1814627c81a7f91e73943227017aabdcdf3082e7a6743f1fa8f7d6df05995546_2 phases=1 bus1=node_418294831.2.4 conn=wye kv=0.1270 pf=1 pmpp=0.92 kva=0.92 irradiance=1 temperature=25 %cutin=20 %cutout=20 effcurve=MyEff P-TCurve=MyPvsT Daily=IRRAD_DIA TDaily=TEMP_DIA
New PVSystem.GD_1814627c81a7f91e73943227017aabdcdf3082e7a6743f1fa8f7d6df05995546_3 phases=1 bus1=node_418294831.3.4 conn=wye kv=0.1270 pf=1 pmpp=0.92 kva=0.92 irradiance=1 temperature=25 %cutin=20 %cutout=20 effcurve=MyEff P-TCurve=MyPvsT Daily=IRRAD_DIA TDaily=TEMP_DIA
New PVSystem.GD_cbe337163190c34c9fb2c48aa2ab409a62146773fffe8bb5ede45f1cb00e1653_1 phases=1 bus1=node_418294831.1.4 conn=wye kv=0.1270 pf=1 pmpp=0.33 kva=0.33 irradiance=1 temperature=25 %cutin=20 %cutout=20 effcurve=MyEff P-TCurve=MyPvsT Daily=IRRAD_DIA TDaily=TEMP_DIA
New PVSystem.GD_cbe337163190c34c9fb2c48aa2ab409a62146773fffe8bb5ede45f1cb00e1653_2 phases=1 bus1=node_418294831.2.4 conn=wye kv=0.1270 pf=1 pmpp=0.33 kva=0.33 irradiance=1 temperature=25 %cutin=20 %cutout=20 effcurve=MyEff P-TCurve=MyPvsT Daily=IRRAD_DIA TDaily=TEMP_DIA
New PVSystem.GD_cbe337163190c34c9fb2c48aa2ab409a62146773fffe8bb5ede45f1cb00e1653_3 phases=1 bus1=node_418294831.3.4 conn=wye kv=0.1270 pf=1 pmpp=0.33 kva=0.33 irradiance=1 temperature=25 %cutin=20 %cutout=20 effcurve=MyEff P-TCurve=MyPvsT Daily=IRRAD_DIA TDaily=TEMP_DIA
New PVSystem.GD_5c3309dd5d9d77ad64754173817b3084025e5662b7490425625e9cbae3fd1074_1 phases=1 bus1=node_418316942.1.4 conn=wye kv=0.1200 pf=1 pmpp=2.42 kva=2.42 irradiance=1 temperature=25 %cutin=20 %cutout=20 effcurve=MyEff P-TCurve=MyPvsT Daily=IRRAD_DIA TDaily=TEMP_DIA
New PVSystem.GD_5c3309dd5d9d77ad64754173817b3084025e5662b7490425625e9cbae3fd1074_2 phases=1 bus1=node_418316942.2.4 conn=wye kv=0.1200 pf=1 pmpp=2.42 kva=2.42 irradiance=1 temperature=25 %cutin=20 %cutout=20 effcurve=MyEff P-TCurve=MyPvsT Daily=IRRAD_DIA TDaily=TEMP_DIA
New PVSystem.GD_272621011035a526e87c7dfbb19fef12a08d9b539f0598c11619a766493c3cd8_1 phases=1 bus1=node_1189163191.1.4 conn=wye kv=0.1270 pf=1 pmpp=11.53 kva=11.53 irradiance=1 temperature=25 %cutin=20 %cutout=20 effcurve=MyEff P-TCurve=MyPvsT Daily=IRRAD_DIA TDaily=TEMP_DIA
New PVSystem.GD_272621011035a526e87c7dfbb19fef12a08d9b539f0598c11619a766493c3cd8_2 phases=1 bus1=node_1189163191.2.4 conn=wye kv=0.1270 pf=1 pmpp=11.53 kva=11.53 irradiance=1 temperature=25 %cutin=20 %cutout=20 effcurve=MyEff P-TCurve=MyPvsT Daily=IRRAD_DIA TDaily=TEMP_DIA
New PVSystem.GD_272621011035a526e87c7dfbb19fef12a08d9b539f0598c11619a766493c3cd8_3 phases=1 bus1=node_1189163191.3.4 conn=wye kv=0.1270 pf=1 pmpp=11.53 kva=11.53 irradiance=1 temperature=25 %cutin=20 %cutout=20 effcurve=MyEff P-TCurve=MyPvsT Daily=IRRAD_DIA TDaily=TEMP_DIA
New PVSystem.GD_bb97026d86ba2c9b120d657c9da5637f4eb30089a55c558c8ab6b71cfdf0ee39_1 phases=1 bus1=node_1563054742.1.4 conn=wye kv=0.1270 pf=1 pmpp=4.61 kva=4.61 irradiance=1 temperature=25 %cutin=20 %cutout=20 effcurve=MyEff P-TCurve=MyPvsT Daily=IRRAD_DIA TDaily=TEMP_DIA
New PVSystem.GD_bb97026d86ba2c9b120d657c9da5637f4eb30089a55c558c8ab6b71cfdf0ee39_2 phases=1 bus1=node_1563054742.2.4 conn=wye kv=0.1270 pf=1 pmpp=4.61 kva=4.61 irradiance=1 temperature=25 %cutin=20 %cutout=20 effcurve=MyEff P-TCurve=MyPvsT Daily=IRRAD_DIA TDaily=TEMP_DIA
New PVSystem.GD_bb97026d86ba2c9b120d657c9da5637f4eb30089a55c558c8ab6b71cfdf0ee39_3 phases=1 bus1=node_1563054742.3.4 conn=wye kv=0.1270 pf=1 pmpp=4.61 kva=4.61 irradiance=1 temperature=25 %cutin=20 %cutout=20 effcurve=MyEff P-TCurve=MyPvsT Daily=IRRAD_DIA TDaily=TEMP_DIA
New PVSystem.GD_f0016abdf556f5c8d1437d00e062f2dec15eb87cbf98f4d51a0c261b1c5cf9a9_1 phases=1 bus1=node_1231274788.1.4 conn=wye kv=0.1270 pf=1 pmpp=10.35 kva=10.35 irradiance=1 temperature=25 %cutin=20 %cutout=20 effcurve=MyEff P-TCurve=MyPvsT Daily=IRRAD_DIA TDaily=TEMP_DIA
New PVSystem.GD_f0016abdf556f5c8d1437d00e062f2dec15eb87cbf98f4d51a0c261b1c5cf9a9_2 phases=1 bus1=node_1231274788.2.4 conn=wye kv=0.1270 pf=1 pmpp=10.35 kva=10.35 irradiance=1 temperature=25 %cutin=20 %cutout=20 effcurve=MyEff P-TCurve=MyPvsT Daily=IRRAD_DIA TDaily=TEMP_DIA
New PVSystem.GD_f0016abdf556f5c8d1437d00e062f2dec15eb87cbf98f4d51a0c261b1c5cf9a9_3 phases=1 bus1=node_1231274788.3.4 conn=wye kv=0.1270 pf=1 pmpp=10.35 kva=10.35 irradiance=1 temperature=25 %cutin=20 %cutout=20 effcurve=MyEff P-TCurve=MyPvsT Daily=IRRAD_DIA TDaily=TEMP_DIA
New PVSystem.GD_d4cf36d0dd30992635dcd7e89c86ca36c0dfe3c6d73d16ce04e94a1a41f10d7e_1 phases=1 bus1=node_1244783514.1.4 conn=wye kv=0.1270 pf=1 pmpp=1.53 kva=1.53 irradiance=1 temperature=25 %cutin=20 %cutout=20 effcurve=MyEff P-TCurve=MyPvsT Daily=IRRAD_DIA TDaily=TEMP_DIA
New PVSystem.GD_d4cf36d0dd30992635dcd7e89c86ca36c0dfe3c6d73d16ce04e94a1a41f10d7e_2 phases=1 bus1=node_1244783514.2.4 conn=wye kv=0.1270 pf=1 pmpp=1.53 kva=1.53 irradiance=1 temperature=25 %cutin=20 %cutout=20 effcurve=MyEff P-TCurve=MyPvsT Daily=IRRAD_DIA TDaily=TEMP_DIA
New PVSystem.GD_d4cf36d0dd30992635dcd7e89c86ca36c0dfe3c6d73d16ce04e94a1a41f10d7e_3 phases=1 bus1=node_1244783514.3.4 conn=wye kv=0.1270 pf=1 pmpp=1.53 kva=1.53 irradiance=1 temperature=25 %cutin=20 %cutout=20 effcurve=MyEff P-TCurve=MyPvsT Daily=IRRAD_DIA TDaily=TEMP_DIA
New PVSystem.GD_3d516bd43ad391d3e4c37766a093199a7be6d947ee23a312b0479da6084ed96b_1 phases=1 bus1=node_1790263126.1.4 conn=wye kv=0.1270 pf=1 pmpp=0.36 kva=0.36 irradiance=1 temperature=25 %cutin=20 %cutout=20 effcurve=MyEff P-TCurve=MyPvsT Daily=IRRAD_DIA TDaily=TEMP_DIA
New PVSystem.GD_3d516bd43ad391d3e4c37766a093199a7be6d947ee23a312b0479da6084ed96b_2 phases=1 bus1=node_1790263126.2.4 conn=wye kv=0.1270 pf=1 pmpp=0.36 kva=0.36 irradiance=1 temperature=25 %cutin=20 %cutout=20 effcurve=MyEff P-TCurve=MyPvsT Daily=IRRAD_DIA TDaily=TEMP_DIA
New PVSystem.GD_3d516bd43ad391d3e4c37766a093199a7be6d947ee23a312b0479da6084ed96b_3 phases=1 bus1=node_1790263126.3.4 conn=wye kv=0.1270 pf=1 pmpp=0.36 kva=0.36 irradiance=1 temperature=25 %cutin=20 %cutout=20 effcurve=MyEff P-TCurve=MyPvsT Daily=IRRAD_DIA TDaily=TEMP_DIA
New PVSystem.GD_6388b3e3199f42fd7c1a47de5014cc22b5bdf9f5b0e15c5bab2435865c1bfd19_1 phases=1 bus1=node_1716900096.1.4 conn=wye kv=0.1270 pf=1 pmpp=13.26 kva=13.26 irradiance=1 temperature=25 %cutin=20 %cutout=20 effcurve=MyEff P-TCurve=MyPvsT Daily=IRRAD_DIA TDaily=TEMP_DIA
New PVSystem.GD_6388b3e3199f42fd7c1a47de5014cc22b5bdf9f5b0e15c5bab2435865c1bfd19_2 phases=1 bus1=node_1716900096.2.4 conn=wye kv=0.1270 pf=1 pmpp=13.26 kva=13.26 irradiance=1 temperature=25 %cutin=20 %cutout=20 effcurve=MyEff P-TCurve=MyPvsT Daily=IRRAD_DIA TDaily=TEMP_DIA
New PVSystem.GD_6388b3e3199f42fd7c1a47de5014cc22b5bdf9f5b0e15c5bab2435865c1bfd19_3 phases=1 bus1=node_1716900096.3.4 conn=wye kv=0.1270 pf=1 pmpp=13.26 kva=13.26 irradiance=1 temperature=25 %cutin=20 %cutout=20 effcurve=MyEff P-TCurve=MyPvsT Daily=IRRAD_DIA TDaily=TEMP_DIA
New PVSystem.GD_9ccfadee7510873cc750d817061b02970fe820209de84e31755ad7334046206c_1 phases=1 bus1=node_2805210439.1.4 conn=wye kv=0.1270 pf=1 pmpp=6.51 kva=6.51 irradiance=1 temperature=25 %cutin=20 %cutout=20 effcurve=MyEff P-TCurve=MyPvsT Daily=IRRAD_DIA TDaily=TEMP_DIA
New PVSystem.GD_9ccfadee7510873cc750d817061b02970fe820209de84e31755ad7334046206c_2 phases=1 bus1=node_2805210439.2.4 conn=wye kv=0.1270 pf=1 pmpp=6.51 kva=6.51 irradiance=1 temperature=25 %cutin=20 %cutout=20 effcurve=MyEff P-TCurve=MyPvsT Daily=IRRAD_DIA TDaily=TEMP_DIA
New PVSystem.GD_9ccfadee7510873cc750d817061b02970fe820209de84e31755ad7334046206c_3 phases=1 bus1=node_2805210439.3.4 conn=wye kv=0.1270 pf=1 pmpp=6.51 kva=6.51 irradiance=1 temperature=25 %cutin=20 %cutout=20 effcurve=MyEff P-TCurve=MyPvsT Daily=IRRAD_DIA TDaily=TEMP_DIA
New PVSystem.GD_0ef3b5f20ab9464d377a7351c972850a02242bd9ddcfd8358121d76699ecf6b1_1 phases=1 bus1=node_2805210439.1.4 conn=wye kv=0.1270 pf=1 pmpp=13.70 kva=13.70 irradiance=1 temperature=25 %cutin=20 %cutout=20 effcurve=MyEff P-TCurve=MyPvsT Daily=IRRAD_DIA TDaily=TEMP_DIA
New PVSystem.GD_0ef3b5f20ab9464d377a7351c972850a02242bd9ddcfd8358121d76699ecf6b1_2 phases=1 bus1=node_2805210439.2.4 conn=wye kv=0.1270 pf=1 pmpp=13.70 kva=13.70 irradiance=1 temperature=25 %cutin=20 %cutout=20 effcurve=MyEff P-TCurve=MyPvsT Daily=IRRAD_DIA TDaily=TEMP_DIA
New PVSystem.GD_0ef3b5f20ab9464d377a7351c972850a02242bd9ddcfd8358121d76699ecf6b1_3 phases=1 bus1=node_2805210439.3.4 conn=wye kv=0.1270 pf=1 pmpp=13.70 kva=13.70 irradiance=1 temperature=25 %cutin=20 %cutout=20 effcurve=MyEff P-TCurve=MyPvsT Daily=IRRAD_DIA TDaily=TEMP_DIA
New PVSystem.GD_055860d8d3a093012d1c816921591bce24f07b28dcb4d80b2421033df979012c_1 phases=1 bus1=node_1248339092.1.4 conn=wye kv=0.1200 pf=1 pmpp=3.53 kva=3.53 irradiance=1 temperature=25 %cutin=20 %cutout=20 effcurve=MyEff P-TCurve=MyPvsT Daily=IRRAD_DIA TDaily=TEMP_DIA
New PVSystem.GD_055860d8d3a093012d1c816921591bce24f07b28dcb4d80b2421033df979012c_2 phases=1 bus1=node_1248339092.2.4 conn=wye kv=0.1200 pf=1 pmpp=3.53 kva=3.53 irradiance=1 temperature=25 %cutin=20 %cutout=20 effcurve=MyEff P-TCurve=MyPvsT Daily=IRRAD_DIA TDaily=TEMP_DIA
New PVSystem.GD_d8f2fbc4279f0acb221e44d2c04fbdd2481d1fd51cc2519a154c6b471dfb0afc_1 phases=1 bus1=node_1728742986.1.4 conn=wye kv=0.1270 pf=1 pmpp=16.30 kva=16.30 irradiance=1 temperature=25 %cutin=20 %cutout=20 effcurve=MyEff P-TCurve=MyPvsT Daily=IRRAD_DIA TDaily=TEMP_DIA
New PVSystem.GD_d8f2fbc4279f0acb221e44d2c04fbdd2481d1fd51cc2519a154c6b471dfb0afc_2 phases=1 bus1=node_1728742986.2.4 conn=wye kv=0.1270 pf=1 pmpp=16.30 kva=16.30 irradiance=1 temperature=25 %cutin=20 %cutout=20 effcurve=MyEff P-TCurve=MyPvsT Daily=IRRAD_DIA TDaily=TEMP_DIA
New PVSystem.GD_d8f2fbc4279f0acb221e44d2c04fbdd2481d1fd51cc2519a154c6b471dfb0afc_3 phases=1 bus1=node_1728742986.3.4 conn=wye kv=0.1270 pf=1 pmpp=16.30 kva=16.30 irradiance=1 temperature=25 %cutin=20 %cutout=20 effcurve=MyEff P-TCurve=MyPvsT Daily=IRRAD_DIA TDaily=TEMP_DIA
New PVSystem.GD_f4187d058e48103e02d3cf01c4d795ee5d5ee1af09a07ec9156b2faa8e73a368_1 phases=1 bus1=node_1552362613.1.4 conn=wye kv=0.1200 pf=1 pmpp=1.75 kva=1.75 irradiance=1 temperature=25 %cutin=20 %cutout=20 effcurve=MyEff P-TCurve=MyPvsT Daily=IRRAD_DIA TDaily=TEMP_DIA
New PVSystem.GD_f4187d058e48103e02d3cf01c4d795ee5d5ee1af09a07ec9156b2faa8e73a368_2 phases=1 bus1=node_1552362613.2.4 conn=wye kv=0.1200 pf=1 pmpp=1.75 kva=1.75 irradiance=1 temperature=25 %cutin=20 %cutout=20 effcurve=MyEff P-TCurve=MyPvsT Daily=IRRAD_DIA TDaily=TEMP_DIA
New PVSystem.GD_f61f23a438f1b7272e3ddffd5a2aa9044a644f3e257ed9c348a9bf66420bfcf3_1 phases=1 bus1=node_1923342728.1.4 conn=wye kv=0.1270 pf=1 pmpp=0.16 kva=0.16 irradiance=1 temperature=25 %cutin=20 %cutout=20 effcurve=MyEff P-TCurve=MyPvsT Daily=IRRAD_DIA TDaily=TEMP_DIA
New PVSystem.GD_f61f23a438f1b7272e3ddffd5a2aa9044a644f3e257ed9c348a9bf66420bfcf3_2 phases=1 bus1=node_1923342728.2.4 conn=wye kv=0.1270 pf=1 pmpp=0.16 kva=0.16 irradiance=1 temperature=25 %cutin=20 %cutout=20 effcurve=MyEff P-TCurve=MyPvsT Daily=IRRAD_DIA TDaily=TEMP_DIA
New PVSystem.GD_f61f23a438f1b7272e3ddffd5a2aa9044a644f3e257ed9c348a9bf66420bfcf3_3 phases=1 bus1=node_1923342728.3.4 conn=wye kv=0.1270 pf=1 pmpp=0.16 kva=0.16 irradiance=1 temperature=25 %cutin=20 %cutout=20 effcurve=MyEff P-TCurve=MyPvsT Daily=IRRAD_DIA TDaily=TEMP_DIA
New PVSystem.GD_02c20cc9bcabfd4d73590c9f46be09840212a3e562c9b7bf19d01fb3065465ad_1 phases=1 bus1=node_829214414.1.4 conn=wye kv=0.1200 pf=1 pmpp=0.43 kva=0.43 irradiance=1 temperature=25 %cutin=20 %cutout=20 effcurve=MyEff P-TCurve=MyPvsT Daily=IRRAD_DIA TDaily=TEMP_DIA
New PVSystem.GD_02c20cc9bcabfd4d73590c9f46be09840212a3e562c9b7bf19d01fb3065465ad_2 phases=1 bus1=node_829214414.2.4 conn=wye kv=0.1200 pf=1 pmpp=0.43 kva=0.43 irradiance=1 temperature=25 %cutin=20 %cutout=20 effcurve=MyEff P-TCurve=MyPvsT Daily=IRRAD_DIA TDaily=TEMP_DIA
New PVSystem.GD_8586ec559ecdc221d2f8928862b35171441ab0b42f14b8b0f0b0f070be3a1065_1 phases=1 bus1=node_418313036.1.4 conn=wye kv=0.1270 pf=1 pmpp=0.14 kva=0.14 irradiance=1 temperature=25 %cutin=20 %cutout=20 effcurve=MyEff P-TCurve=MyPvsT Daily=IRRAD_DIA TDaily=TEMP_DIA
New PVSystem.GD_8586ec559ecdc221d2f8928862b35171441ab0b42f14b8b0f0b0f070be3a1065_2 phases=1 bus1=node_418313036.2.4 conn=wye kv=0.1270 pf=1 pmpp=0.14 kva=0.14 irradiance=1 temperature=25 %cutin=20 %cutout=20 effcurve=MyEff P-TCurve=MyPvsT Daily=IRRAD_DIA TDaily=TEMP_DIA
New PVSystem.GD_8586ec559ecdc221d2f8928862b35171441ab0b42f14b8b0f0b0f070be3a1065_3 phases=1 bus1=node_418313036.3.4 conn=wye kv=0.1270 pf=1 pmpp=0.14 kva=0.14 irradiance=1 temperature=25 %cutin=20 %cutout=20 effcurve=MyEff P-TCurve=MyPvsT Daily=IRRAD_DIA TDaily=TEMP_DIA
New PVSystem.GD_a1fd128a272027530ad9f420c761a14079b0402557fc92fc1a77b93e3d364667_1 phases=1 bus1=node_418401021.1.4 conn=wye kv=0.1270 pf=1 pmpp=2.77 kva=2.77 irradiance=1 temperature=25 %cutin=20 %cutout=20 effcurve=MyEff P-TCurve=MyPvsT Daily=IRRAD_DIA TDaily=TEMP_DIA
New PVSystem.GD_a1fd128a272027530ad9f420c761a14079b0402557fc92fc1a77b93e3d364667_2 phases=1 bus1=node_418401021.2.4 conn=wye kv=0.1270 pf=1 pmpp=2.77 kva=2.77 irradiance=1 temperature=25 %cutin=20 %cutout=20 effcurve=MyEff P-TCurve=MyPvsT Daily=IRRAD_DIA TDaily=TEMP_DIA
New PVSystem.GD_a1fd128a272027530ad9f420c761a14079b0402557fc92fc1a77b93e3d364667_3 phases=1 bus1=node_418401021.3.4 conn=wye kv=0.1270 pf=1 pmpp=2.77 kva=2.77 irradiance=1 temperature=25 %cutin=20 %cutout=20 effcurve=MyEff P-TCurve=MyPvsT Daily=IRRAD_DIA TDaily=TEMP_DIA
New PVSystem.GD_59198b04f76634ea09c552389ae6ae92b48c0874947a8f70af9a744b39ca7ac2_1 phases=1 bus1=node_418400970.1.4 conn=wye kv=0.1270 pf=1 pmpp=1.84 kva=1.84 irradiance=1 temperature=25 %cutin=20 %cutout=20 effcurve=MyEff P-TCurve=MyPvsT Daily=IRRAD_DIA TDaily=TEMP_DIA
New PVSystem.GD_59198b04f76634ea09c552389ae6ae92b48c0874947a8f70af9a744b39ca7ac2_2 phases=1 bus1=node_418400970.2.4 conn=wye kv=0.1270 pf=1 pmpp=1.84 kva=1.84 irradiance=1 temperature=25 %cutin=20 %cutout=20 effcurve=MyEff P-TCurve=MyPvsT Daily=IRRAD_DIA TDaily=TEMP_DIA
New PVSystem.GD_59198b04f76634ea09c552389ae6ae92b48c0874947a8f70af9a744b39ca7ac2_3 phases=1 bus1=node_418400970.3.4 conn=wye kv=0.1270 pf=1 pmpp=1.84 kva=1.84 irradiance=1 temperature=25 %cutin=20 %cutout=20 effcurve=MyEff P-TCurve=MyPvsT Daily=IRRAD_DIA TDaily=TEMP_DIA
New PVSystem.GD_2c63672d526f3c1f3b3a480c05d1e01c566f773e8460773b8c9676426c6b122d_1 phases=1 bus1=node_418400970.1.4 conn=wye kv=0.1270 pf=1 pmpp=1.39 kva=1.39 irradiance=1 temperature=25 %cutin=20 %cutout=20 effcurve=MyEff P-TCurve=MyPvsT Daily=IRRAD_DIA TDaily=TEMP_DIA
New PVSystem.GD_2c63672d526f3c1f3b3a480c05d1e01c566f773e8460773b8c9676426c6b122d_2 phases=1 bus1=node_418400970.2.4 conn=wye kv=0.1270 pf=1 pmpp=1.39 kva=1.39 irradiance=1 temperature=25 %cutin=20 %cutout=20 effcurve=MyEff P-TCurve=MyPvsT Daily=IRRAD_DIA TDaily=TEMP_DIA
New PVSystem.GD_2c63672d526f3c1f3b3a480c05d1e01c566f773e8460773b8c9676426c6b122d_3 phases=1 bus1=node_418400970.3.4 conn=wye kv=0.1270 pf=1 pmpp=1.39 kva=1.39 irradiance=1 temperature=25 %cutin=20 %cutout=20 effcurve=MyEff P-TCurve=MyPvsT Daily=IRRAD_DIA TDaily=TEMP_DIA
New PVSystem.GD_5c7190877c6a7bce2cc88cf08a10b3914ac45a4e74e43c874a19af9e4aa849e9_1 phases=1 bus1=node_2509956372.1.4 conn=wye kv=0.1270 pf=1 pmpp=15.83 kva=15.83 irradiance=1 temperature=25 %cutin=20 %cutout=20 effcurve=MyEff P-TCurve=MyPvsT Daily=IRRAD_DIA TDaily=TEMP_DIA
New PVSystem.GD_5c7190877c6a7bce2cc88cf08a10b3914ac45a4e74e43c874a19af9e4aa849e9_2 phases=1 bus1=node_2509956372.2.4 conn=wye kv=0.1270 pf=1 pmpp=15.83 kva=15.83 irradiance=1 temperature=25 %cutin=20 %cutout=20 effcurve=MyEff P-TCurve=MyPvsT Daily=IRRAD_DIA TDaily=TEMP_DIA
New PVSystem.GD_5c7190877c6a7bce2cc88cf08a10b3914ac45a4e74e43c874a19af9e4aa849e9_3 phases=1 bus1=node_2509956372.3.4 conn=wye kv=0.1270 pf=1 pmpp=15.83 kva=15.83 irradiance=1 temperature=25 %cutin=20 %cutout=20 effcurve=MyEff P-TCurve=MyPvsT Daily=IRRAD_DIA TDaily=TEMP_DIA
New PVSystem.GD_14e28ae5e60661ca500398f1d97a857d4adb2d180a1cd0afec7a968eb259c1f1_1 phases=1 bus1=node_418313993.1.4 conn=wye kv=0.1270 pf=1 pmpp=0.36 kva=0.36 irradiance=1 temperature=25 %cutin=20 %cutout=20 effcurve=MyEff P-TCurve=MyPvsT Daily=IRRAD_DIA TDaily=TEMP_DIA
New PVSystem.GD_14e28ae5e60661ca500398f1d97a857d4adb2d180a1cd0afec7a968eb259c1f1_2 phases=1 bus1=node_418313993.2.4 conn=wye kv=0.1270 pf=1 pmpp=0.36 kva=0.36 irradiance=1 temperature=25 %cutin=20 %cutout=20 effcurve=MyEff P-TCurve=MyPvsT Daily=IRRAD_DIA TDaily=TEMP_DIA
New PVSystem.GD_14e28ae5e60661ca500398f1d97a857d4adb2d180a1cd0afec7a968eb259c1f1_3 phases=1 bus1=node_418313993.3.4 conn=wye kv=0.1270 pf=1 pmpp=0.36 kva=0.36 irradiance=1 temperature=25 %cutin=20 %cutout=20 effcurve=MyEff P-TCurve=MyPvsT Daily=IRRAD_DIA TDaily=TEMP_DIA
New PVSystem.GD_f96d29a541a5f778d6c92591e328e04aa73957b4a4316ec9fa24590c3e8ef636_1 phases=1 bus1=node_418988609.1.4 conn=wye kv=0.1200 pf=1 pmpp=1.10 kva=1.10 irradiance=1 temperature=25 %cutin=20 %cutout=20 effcurve=MyEff P-TCurve=MyPvsT Daily=IRRAD_DIA TDaily=TEMP_DIA
New PVSystem.GD_f96d29a541a5f778d6c92591e328e04aa73957b4a4316ec9fa24590c3e8ef636_2 phases=1 bus1=node_418988609.2.4 conn=wye kv=0.1200 pf=1 pmpp=1.10 kva=1.10 irradiance=1 temperature=25 %cutin=20 %cutout=20 effcurve=MyEff P-TCurve=MyPvsT Daily=IRRAD_DIA TDaily=TEMP_DIA
New PVSystem.GD_4708e2569ff955327514aa113ae434a66e95abbe5a3f81662943d3e2f2dd70a3_1 phases=1 bus1=node_418799230.1.4 conn=wye kv=0.1270 pf=1 pmpp=0.88 kva=0.88 irradiance=1 temperature=25 %cutin=20 %cutout=20 effcurve=MyEff P-TCurve=MyPvsT Daily=IRRAD_DIA TDaily=TEMP_DIA
New PVSystem.GD_4708e2569ff955327514aa113ae434a66e95abbe5a3f81662943d3e2f2dd70a3_2 phases=1 bus1=node_418799230.2.4 conn=wye kv=0.1270 pf=1 pmpp=0.88 kva=0.88 irradiance=1 temperature=25 %cutin=20 %cutout=20 effcurve=MyEff P-TCurve=MyPvsT Daily=IRRAD_DIA TDaily=TEMP_DIA
New PVSystem.GD_4708e2569ff955327514aa113ae434a66e95abbe5a3f81662943d3e2f2dd70a3_3 phases=1 bus1=node_418799230.3.4 conn=wye kv=0.1270 pf=1 pmpp=0.88 kva=0.88 irradiance=1 temperature=25 %cutin=20 %cutout=20 effcurve=MyEff P-TCurve=MyPvsT Daily=IRRAD_DIA TDaily=TEMP_DIA
New PVSystem.GD_dc55d2fac982796cf5fb07a49c765519f4e40237bc0272d8a180379b1ff4003d_1 phases=1 bus1=node_418988606.1.4 conn=wye kv=0.1200 pf=1 pmpp=1.30 kva=1.30 irradiance=1 temperature=25 %cutin=20 %cutout=20 effcurve=MyEff P-TCurve=MyPvsT Daily=IRRAD_DIA TDaily=TEMP_DIA
New PVSystem.GD_dc55d2fac982796cf5fb07a49c765519f4e40237bc0272d8a180379b1ff4003d_2 phases=1 bus1=node_418988606.2.4 conn=wye kv=0.1200 pf=1 pmpp=1.30 kva=1.30 irradiance=1 temperature=25 %cutin=20 %cutout=20 effcurve=MyEff P-TCurve=MyPvsT Daily=IRRAD_DIA TDaily=TEMP_DIA
New PVSystem.GD_4dc3551587a655f024c1ecb1aa0f4b952f085beef287e2947a589e02399a3075_1 phases=1 bus1=node_418313900.1.4 conn=wye kv=0.1270 pf=1 pmpp=2.17 kva=2.17 irradiance=1 temperature=25 %cutin=20 %cutout=20 effcurve=MyEff P-TCurve=MyPvsT Daily=IRRAD_DIA TDaily=TEMP_DIA
New PVSystem.GD_4dc3551587a655f024c1ecb1aa0f4b952f085beef287e2947a589e02399a3075_2 phases=1 bus1=node_418313900.2.4 conn=wye kv=0.1270 pf=1 pmpp=2.17 kva=2.17 irradiance=1 temperature=25 %cutin=20 %cutout=20 effcurve=MyEff P-TCurve=MyPvsT Daily=IRRAD_DIA TDaily=TEMP_DIA
New PVSystem.GD_4dc3551587a655f024c1ecb1aa0f4b952f085beef287e2947a589e02399a3075_3 phases=1 bus1=node_418313900.3.4 conn=wye kv=0.1270 pf=1 pmpp=2.17 kva=2.17 irradiance=1 temperature=25 %cutin=20 %cutout=20 effcurve=MyEff P-TCurve=MyPvsT Daily=IRRAD_DIA TDaily=TEMP_DIA
New PVSystem.GD_319460a2bfcd59738c71d1a4c6b825884e530371baef53945775a648b32acc12_1 phases=1 bus1=node_419655058.1.4 conn=wye kv=0.1200 pf=1 pmpp=0.74 kva=0.74 irradiance=1 temperature=25 %cutin=20 %cutout=20 effcurve=MyEff P-TCurve=MyPvsT Daily=IRRAD_DIA TDaily=TEMP_DIA
New PVSystem.GD_319460a2bfcd59738c71d1a4c6b825884e530371baef53945775a648b32acc12_2 phases=1 bus1=node_419655058.2.4 conn=wye kv=0.1200 pf=1 pmpp=0.74 kva=0.74 irradiance=1 temperature=25 %cutin=20 %cutout=20 effcurve=MyEff P-TCurve=MyPvsT Daily=IRRAD_DIA TDaily=TEMP_DIA
New PVSystem.GD_3bd0b73e5569da2c267e30dfe606c0cf9461a6f181df74c6024679f5955dddca_1 phases=1 bus1=node_419758459.1.4 conn=wye kv=0.1200 pf=1 pmpp=3.25 kva=3.25 irradiance=1 temperature=25 %cutin=20 %cutout=20 effcurve=MyEff P-TCurve=MyPvsT Daily=IRRAD_DIA TDaily=TEMP_DIA
New PVSystem.GD_3bd0b73e5569da2c267e30dfe606c0cf9461a6f181df74c6024679f5955dddca_2 phases=1 bus1=node_419758459.2.4 conn=wye kv=0.1200 pf=1 pmpp=3.25 kva=3.25 irradiance=1 temperature=25 %cutin=20 %cutout=20 effcurve=MyEff P-TCurve=MyPvsT Daily=IRRAD_DIA TDaily=TEMP_DIA
New PVSystem.GD_0fe4813da5f60ed009919acd053a898ff8a2620bc69e12fc83f26a785db2ddd9_1 phases=1 bus1=node_1916901861.1.4 conn=wye kv=0.1270 pf=1 pmpp=13.50 kva=13.50 irradiance=1 temperature=25 %cutin=20 %cutout=20 effcurve=MyEff P-TCurve=MyPvsT Daily=IRRAD_DIA TDaily=TEMP_DIA
New PVSystem.GD_0fe4813da5f60ed009919acd053a898ff8a2620bc69e12fc83f26a785db2ddd9_2 phases=1 bus1=node_1916901861.2.4 conn=wye kv=0.1270 pf=1 pmpp=13.50 kva=13.50 irradiance=1 temperature=25 %cutin=20 %cutout=20 effcurve=MyEff P-TCurve=MyPvsT Daily=IRRAD_DIA TDaily=TEMP_DIA
New PVSystem.GD_0fe4813da5f60ed009919acd053a898ff8a2620bc69e12fc83f26a785db2ddd9_3 phases=1 bus1=node_1916901861.3.4 conn=wye kv=0.1270 pf=1 pmpp=13.50 kva=13.50 irradiance=1 temperature=25 %cutin=20 %cutout=20 effcurve=MyEff P-TCurve=MyPvsT Daily=IRRAD_DIA TDaily=TEMP_DIA
New PVSystem.GD_0b4c5143e82919960237694c351769f49f9d82217d52f7470f17c794ed451ab8_1 phases=1 bus1=node_1563054932.1.4 conn=wye kv=0.1270 pf=1 pmpp=9.75 kva=9.75 irradiance=1 temperature=25 %cutin=20 %cutout=20 effcurve=MyEff P-TCurve=MyPvsT Daily=IRRAD_DIA TDaily=TEMP_DIA
New PVSystem.GD_0b4c5143e82919960237694c351769f49f9d82217d52f7470f17c794ed451ab8_2 phases=1 bus1=node_1563054932.2.4 conn=wye kv=0.1270 pf=1 pmpp=9.75 kva=9.75 irradiance=1 temperature=25 %cutin=20 %cutout=20 effcurve=MyEff P-TCurve=MyPvsT Daily=IRRAD_DIA TDaily=TEMP_DIA
New PVSystem.GD_0b4c5143e82919960237694c351769f49f9d82217d52f7470f17c794ed451ab8_3 phases=1 bus1=node_1563054932.3.4 conn=wye kv=0.1270 pf=1 pmpp=9.75 kva=9.75 irradiance=1 temperature=25 %cutin=20 %cutout=20 effcurve=MyEff P-TCurve=MyPvsT Daily=IRRAD_DIA TDaily=TEMP_DIA
New PVSystem.GD_b6225f24ac4d6c661c536ef2ae765e3e2e12e739fd197cea8a74c86c37cc0f25_1 phases=1 bus1=node_419858776.1.4 conn=wye kv=0.1200 pf=1 pmpp=5.00 kva=5.00 irradiance=1 temperature=25 %cutin=20 %cutout=20 effcurve=MyEff P-TCurve=MyPvsT Daily=IRRAD_DIA TDaily=TEMP_DIA
New PVSystem.GD_b6225f24ac4d6c661c536ef2ae765e3e2e12e739fd197cea8a74c86c37cc0f25_2 phases=1 bus1=node_419858776.2.4 conn=wye kv=0.1200 pf=1 pmpp=5.00 kva=5.00 irradiance=1 temperature=25 %cutin=20 %cutout=20 effcurve=MyEff P-TCurve=MyPvsT Daily=IRRAD_DIA TDaily=TEMP_DIA
New PVSystem.GD_fbc20739e0003da96813d844c2a6f2cfaec1f3a0cc9295b2c6d6a827827ad381_1 phases=1 bus1=node_419276978.1.4 conn=wye kv=0.1200 pf=1 pmpp=0.87 kva=0.87 irradiance=1 temperature=25 %cutin=20 %cutout=20 effcurve=MyEff P-TCurve=MyPvsT Daily=IRRAD_DIA TDaily=TEMP_DIA
New PVSystem.GD_fbc20739e0003da96813d844c2a6f2cfaec1f3a0cc9295b2c6d6a827827ad381_2 phases=1 bus1=node_419276978.2.4 conn=wye kv=0.1200 pf=1 pmpp=0.87 kva=0.87 irradiance=1 temperature=25 %cutin=20 %cutout=20 effcurve=MyEff P-TCurve=MyPvsT Daily=IRRAD_DIA TDaily=TEMP_DIA
New PVSystem.GD_886deb64e6f4cc4eca85deb44f99890fb9a8d9882bc10d35e605ba524ecdd157_1 phases=1 bus1=node_419241865.1.4 conn=wye kv=0.1200 pf=1 pmpp=1.41 kva=1.41 irradiance=1 temperature=25 %cutin=20 %cutout=20 effcurve=MyEff P-TCurve=MyPvsT Daily=IRRAD_DIA TDaily=TEMP_DIA
New PVSystem.GD_886deb64e6f4cc4eca85deb44f99890fb9a8d9882bc10d35e605ba524ecdd157_2 phases=1 bus1=node_419241865.2.4 conn=wye kv=0.1200 pf=1 pmpp=1.41 kva=1.41 irradiance=1 temperature=25 %cutin=20 %cutout=20 effcurve=MyEff P-TCurve=MyPvsT Daily=IRRAD_DIA TDaily=TEMP_DIA
New PVSystem.GD_f05881522927ea4712ab6218b18ff4509e3fde2d0d51ec29964f1eff880554ab_1 phases=1 bus1=node_419592057.1.4 conn=wye kv=0.1200 pf=1 pmpp=1.96 kva=1.96 irradiance=1 temperature=25 %cutin=20 %cutout=20 effcurve=MyEff P-TCurve=MyPvsT Daily=IRRAD_DIA TDaily=TEMP_DIA
New PVSystem.GD_f05881522927ea4712ab6218b18ff4509e3fde2d0d51ec29964f1eff880554ab_2 phases=1 bus1=node_419592057.2.4 conn=wye kv=0.1200 pf=1 pmpp=1.96 kva=1.96 irradiance=1 temperature=25 %cutin=20 %cutout=20 effcurve=MyEff P-TCurve=MyPvsT Daily=IRRAD_DIA TDaily=TEMP_DIA
New PVSystem.GD_f56a1c1ea82d7fcb55d7842cb0699f33188b2b6e6c31cc561c9ece6b7d99092e_1 phases=1 bus1=node_2080078240.1.4 conn=wye kv=0.1270 pf=1 pmpp=0.96 kva=0.96 irradiance=1 temperature=25 %cutin=20 %cutout=20 effcurve=MyEff P-TCurve=MyPvsT Daily=IRRAD_DIA TDaily=TEMP_DIA
New PVSystem.GD_f56a1c1ea82d7fcb55d7842cb0699f33188b2b6e6c31cc561c9ece6b7d99092e_2 phases=1 bus1=node_2080078240.2.4 conn=wye kv=0.1270 pf=1 pmpp=0.96 kva=0.96 irradiance=1 temperature=25 %cutin=20 %cutout=20 effcurve=MyEff P-TCurve=MyPvsT Daily=IRRAD_DIA TDaily=TEMP_DIA
New PVSystem.GD_f56a1c1ea82d7fcb55d7842cb0699f33188b2b6e6c31cc561c9ece6b7d99092e_3 phases=1 bus1=node_2080078240.3.4 conn=wye kv=0.1270 pf=1 pmpp=0.96 kva=0.96 irradiance=1 temperature=25 %cutin=20 %cutout=20 effcurve=MyEff P-TCurve=MyPvsT Daily=IRRAD_DIA TDaily=TEMP_DIA
New PVSystem.GD_0069aa76509f26d169b4c035e52429d7e9fc396d9da334a01968a8af349cd371_1 phases=1 bus1=node_800556230.1.4 conn=wye kv=0.1200 pf=1 pmpp=2.26 kva=2.26 irradiance=1 temperature=25 %cutin=20 %cutout=20 effcurve=MyEff P-TCurve=MyPvsT Daily=IRRAD_DIA TDaily=TEMP_DIA
New PVSystem.GD_0069aa76509f26d169b4c035e52429d7e9fc396d9da334a01968a8af349cd371_2 phases=1 bus1=node_800556230.2.4 conn=wye kv=0.1200 pf=1 pmpp=2.26 kva=2.26 irradiance=1 temperature=25 %cutin=20 %cutout=20 effcurve=MyEff P-TCurve=MyPvsT Daily=IRRAD_DIA TDaily=TEMP_DIA
New PVSystem.GD_596ea30e5afa30b4ad193786c58259ce4d978e3bfa64c0a1511d9fbcbd785e74_1 phases=1 bus1=node_419862739.1.4 conn=wye kv=0.1200 pf=1 pmpp=1.55 kva=1.55 irradiance=1 temperature=25 %cutin=20 %cutout=20 effcurve=MyEff P-TCurve=MyPvsT Daily=IRRAD_DIA TDaily=TEMP_DIA
New PVSystem.GD_596ea30e5afa30b4ad193786c58259ce4d978e3bfa64c0a1511d9fbcbd785e74_2 phases=1 bus1=node_419862739.2.4 conn=wye kv=0.1200 pf=1 pmpp=1.55 kva=1.55 irradiance=1 temperature=25 %cutin=20 %cutout=20 effcurve=MyEff P-TCurve=MyPvsT Daily=IRRAD_DIA TDaily=TEMP_DIA
New PVSystem.GD_7842daa88cca1a3484a1a0459ec6dbde748341924dac7d35b0f69dafc248affb_1 phases=1 bus1=node_418313009.1.4 conn=wye kv=0.1270 pf=1 pmpp=1.36 kva=1.36 irradiance=1 temperature=25 %cutin=20 %cutout=20 effcurve=MyEff P-TCurve=MyPvsT Daily=IRRAD_DIA TDaily=TEMP_DIA
New PVSystem.GD_7842daa88cca1a3484a1a0459ec6dbde748341924dac7d35b0f69dafc248affb_2 phases=1 bus1=node_418313009.2.4 conn=wye kv=0.1270 pf=1 pmpp=1.36 kva=1.36 irradiance=1 temperature=25 %cutin=20 %cutout=20 effcurve=MyEff P-TCurve=MyPvsT Daily=IRRAD_DIA TDaily=TEMP_DIA
New PVSystem.GD_7842daa88cca1a3484a1a0459ec6dbde748341924dac7d35b0f69dafc248affb_3 phases=1 bus1=node_418313009.3.4 conn=wye kv=0.1270 pf=1 pmpp=1.36 kva=1.36 irradiance=1 temperature=25 %cutin=20 %cutout=20 effcurve=MyEff P-TCurve=MyPvsT Daily=IRRAD_DIA TDaily=TEMP_DIA
New PVSystem.GD_3c4211316825fa5126baf9b1ed5e7a2888d62ff8ab17ef4bd1915ba1af94ec50_1 phases=1 bus1=node_420053479.1.4 conn=wye kv=0.1200 pf=1 pmpp=0.09 kva=0.10 irradiance=1 temperature=25 %cutin=20 %cutout=20 effcurve=MyEff P-TCurve=MyPvsT Daily=IRRAD_DIA TDaily=TEMP_DIA
New PVSystem.GD_3c4211316825fa5126baf9b1ed5e7a2888d62ff8ab17ef4bd1915ba1af94ec50_2 phases=1 bus1=node_420053479.2.4 conn=wye kv=0.1200 pf=1 pmpp=0.09 kva=0.10 irradiance=1 temperature=25 %cutin=20 %cutout=20 effcurve=MyEff P-TCurve=MyPvsT Daily=IRRAD_DIA TDaily=TEMP_DIA
New PVSystem.GD_b775f351a620ea0156a936e539e25ed6e2dcd30a239bd3c7b6b272e67dd26be7_1 phases=1 bus1=node_423530461.1.4 conn=wye kv=0.1200 pf=1 pmpp=0.44 kva=0.44 irradiance=1 temperature=25 %cutin=20 %cutout=20 effcurve=MyEff P-TCurve=MyPvsT Daily=IRRAD_DIA TDaily=TEMP_DIA
New PVSystem.GD_b775f351a620ea0156a936e539e25ed6e2dcd30a239bd3c7b6b272e67dd26be7_2 phases=1 bus1=node_423530461.2.4 conn=wye kv=0.1200 pf=1 pmpp=0.44 kva=0.44 irradiance=1 temperature=25 %cutin=20 %cutout=20 effcurve=MyEff P-TCurve=MyPvsT Daily=IRRAD_DIA TDaily=TEMP_DIA
New PVSystem.GD_0433f9df36f615c9163e8983fe39648094a71afa5efc39b3ed499cfb97e79bc9_1 phases=1 bus1=node_418313873.1.4 conn=wye kv=0.1270 pf=1 pmpp=0.98 kva=0.98 irradiance=1 temperature=25 %cutin=20 %cutout=20 effcurve=MyEff P-TCurve=MyPvsT Daily=IRRAD_DIA TDaily=TEMP_DIA
New PVSystem.GD_0433f9df36f615c9163e8983fe39648094a71afa5efc39b3ed499cfb97e79bc9_2 phases=1 bus1=node_418313873.2.4 conn=wye kv=0.1270 pf=1 pmpp=0.98 kva=0.98 irradiance=1 temperature=25 %cutin=20 %cutout=20 effcurve=MyEff P-TCurve=MyPvsT Daily=IRRAD_DIA TDaily=TEMP_DIA
New PVSystem.GD_0433f9df36f615c9163e8983fe39648094a71afa5efc39b3ed499cfb97e79bc9_3 phases=1 bus1=node_418313873.3.4 conn=wye kv=0.1270 pf=1 pmpp=0.98 kva=0.98 irradiance=1 temperature=25 %cutin=20 %cutout=20 effcurve=MyEff P-TCurve=MyPvsT Daily=IRRAD_DIA TDaily=TEMP_DIA
New PVSystem.GD_dbb226d6221d0e77e9e59d79a8401aa72861a9917fc22a23599d75afbc2cf6e4_1 phases=1 bus1=node_419623030.1.4 conn=wye kv=0.1200 pf=1 pmpp=1.43 kva=1.43 irradiance=1 temperature=25 %cutin=20 %cutout=20 effcurve=MyEff P-TCurve=MyPvsT Daily=IRRAD_DIA TDaily=TEMP_DIA
New PVSystem.GD_dbb226d6221d0e77e9e59d79a8401aa72861a9917fc22a23599d75afbc2cf6e4_2 phases=1 bus1=node_419623030.2.4 conn=wye kv=0.1200 pf=1 pmpp=1.43 kva=1.43 irradiance=1 temperature=25 %cutin=20 %cutout=20 effcurve=MyEff P-TCurve=MyPvsT Daily=IRRAD_DIA TDaily=TEMP_DIA
New PVSystem.GD_2b964da3135ba6e87cf453531bb2b337f4b17e561e828563a9d1cb367522b772_1 phases=1 bus1=node_419896214.1.4 conn=wye kv=0.1200 pf=1 pmpp=0.36 kva=0.36 irradiance=1 temperature=25 %cutin=20 %cutout=20 effcurve=MyEff P-TCurve=MyPvsT Daily=IRRAD_DIA TDaily=TEMP_DIA
New PVSystem.GD_2b964da3135ba6e87cf453531bb2b337f4b17e561e828563a9d1cb367522b772_2 phases=1 bus1=node_419896214.2.4 conn=wye kv=0.1200 pf=1 pmpp=0.36 kva=0.36 irradiance=1 temperature=25 %cutin=20 %cutout=20 effcurve=MyEff P-TCurve=MyPvsT Daily=IRRAD_DIA TDaily=TEMP_DIA
New PVSystem.GD_e9301759234306029233ab77a7910c272834ceeccd84ab17129b7687bbaaaa84_1 phases=1 bus1=node_419624782.1.4 conn=wye kv=0.1200 pf=1 pmpp=1.12 kva=1.12 irradiance=1 temperature=25 %cutin=20 %cutout=20 effcurve=MyEff P-TCurve=MyPvsT Daily=IRRAD_DIA TDaily=TEMP_DIA
New PVSystem.GD_e9301759234306029233ab77a7910c272834ceeccd84ab17129b7687bbaaaa84_2 phases=1 bus1=node_419624782.2.4 conn=wye kv=0.1200 pf=1 pmpp=1.12 kva=1.12 irradiance=1 temperature=25 %cutin=20 %cutout=20 effcurve=MyEff P-TCurve=MyPvsT Daily=IRRAD_DIA TDaily=TEMP_DIA
New PVSystem.GD_a5263ae26d10c7f122ec26ba6bf83aeb89267b363bc22633742c4d4a4265bf59_1 phases=1 bus1=node_419902236.1.4 conn=wye kv=0.1200 pf=1 pmpp=1.05 kva=1.05 irradiance=1 temperature=25 %cutin=20 %cutout=20 effcurve=MyEff P-TCurve=MyPvsT Daily=IRRAD_DIA TDaily=TEMP_DIA
New PVSystem.GD_a5263ae26d10c7f122ec26ba6bf83aeb89267b363bc22633742c4d4a4265bf59_2 phases=1 bus1=node_419902236.2.4 conn=wye kv=0.1200 pf=1 pmpp=1.05 kva=1.05 irradiance=1 temperature=25 %cutin=20 %cutout=20 effcurve=MyEff P-TCurve=MyPvsT Daily=IRRAD_DIA TDaily=TEMP_DIA
New PVSystem.GD_00f629d55b4d7096f37267f8c1aa071922e0dcefdf5ab61c37631a052a1f0958_1 phases=1 bus1=node_419172836.1.4 conn=wye kv=0.1200 pf=1 pmpp=1.97 kva=1.97 irradiance=1 temperature=25 %cutin=20 %cutout=20 effcurve=MyEff P-TCurve=MyPvsT Daily=IRRAD_DIA TDaily=TEMP_DIA
New PVSystem.GD_00f629d55b4d7096f37267f8c1aa071922e0dcefdf5ab61c37631a052a1f0958_2 phases=1 bus1=node_419172836.2.4 conn=wye kv=0.1200 pf=1 pmpp=1.97 kva=1.97 irradiance=1 temperature=25 %cutin=20 %cutout=20 effcurve=MyEff P-TCurve=MyPvsT Daily=IRRAD_DIA TDaily=TEMP_DIA
New PVSystem.GD_1bc62db1098b3db8fbe1b5d94c7153e8ed985125452c32473a78d37ad4014f5d_1 phases=1 bus1=node_466148954.1.4 conn=wye kv=0.1200 pf=1 pmpp=0.87 kva=0.87 irradiance=1 temperature=25 %cutin=20 %cutout=20 effcurve=MyEff P-TCurve=MyPvsT Daily=IRRAD_DIA TDaily=TEMP_DIA
New PVSystem.GD_1bc62db1098b3db8fbe1b5d94c7153e8ed985125452c32473a78d37ad4014f5d_2 phases=1 bus1=node_466148954.2.4 conn=wye kv=0.1200 pf=1 pmpp=0.87 kva=0.87 irradiance=1 temperature=25 %cutin=20 %cutout=20 effcurve=MyEff P-TCurve=MyPvsT Daily=IRRAD_DIA TDaily=TEMP_DIA
New PVSystem.GD_5664b316fc9e94af06f45376aead713f5d60eda9895eeaa069f18d65efa38ddc_1 phases=1 bus1=node_466148954.1.4 conn=wye kv=0.1200 pf=1 pmpp=1.37 kva=1.37 irradiance=1 temperature=25 %cutin=20 %cutout=20 effcurve=MyEff P-TCurve=MyPvsT Daily=IRRAD_DIA TDaily=TEMP_DIA
New PVSystem.GD_5664b316fc9e94af06f45376aead713f5d60eda9895eeaa069f18d65efa38ddc_2 phases=1 bus1=node_466148954.2.4 conn=wye kv=0.1200 pf=1 pmpp=1.37 kva=1.37 irradiance=1 temperature=25 %cutin=20 %cutout=20 effcurve=MyEff P-TCurve=MyPvsT Daily=IRRAD_DIA TDaily=TEMP_DIA
New PVSystem.GD_30904243b23ddc4271092f6799304283e9567133b411af4a4cc884b82e52338a_1 phases=1 bus1=node_465965472.1.4 conn=wye kv=0.1270 pf=1 pmpp=1.18 kva=1.18 irradiance=1 temperature=25 %cutin=20 %cutout=20 effcurve=MyEff P-TCurve=MyPvsT Daily=IRRAD_DIA TDaily=TEMP_DIA
New PVSystem.GD_30904243b23ddc4271092f6799304283e9567133b411af4a4cc884b82e52338a_2 phases=1 bus1=node_465965472.2.4 conn=wye kv=0.1270 pf=1 pmpp=1.18 kva=1.18 irradiance=1 temperature=25 %cutin=20 %cutout=20 effcurve=MyEff P-TCurve=MyPvsT Daily=IRRAD_DIA TDaily=TEMP_DIA
New PVSystem.GD_30904243b23ddc4271092f6799304283e9567133b411af4a4cc884b82e52338a_3 phases=1 bus1=node_465965472.3.4 conn=wye kv=0.1270 pf=1 pmpp=1.18 kva=1.18 irradiance=1 temperature=25 %cutin=20 %cutout=20 effcurve=MyEff P-TCurve=MyPvsT Daily=IRRAD_DIA TDaily=TEMP_DIA
New PVSystem.GD_8ba7c5897d08eb8906e5e1e6b8f8088b276310156ba6041904e771993cd4dae5_1 phases=1 bus1=node_418726291.1.4 conn=wye kv=0.1200 pf=1 pmpp=1.21 kva=1.21 irradiance=1 temperature=25 %cutin=20 %cutout=20 effcurve=MyEff P-TCurve=MyPvsT Daily=IRRAD_DIA TDaily=TEMP_DIA
New PVSystem.GD_8ba7c5897d08eb8906e5e1e6b8f8088b276310156ba6041904e771993cd4dae5_2 phases=1 bus1=node_418726291.2.4 conn=wye kv=0.1200 pf=1 pmpp=1.21 kva=1.21 irradiance=1 temperature=25 %cutin=20 %cutout=20 effcurve=MyEff P-TCurve=MyPvsT Daily=IRRAD_DIA TDaily=TEMP_DIA
New PVSystem.GD_cf33e7e6cff455186be170faef4242504d8a11f1b41a4440b6defc461a1b3c6b_1 phases=1 bus1=node_419312991.1.4 conn=wye kv=0.1200 pf=1 pmpp=0.84 kva=0.84 irradiance=1 temperature=25 %cutin=20 %cutout=20 effcurve=MyEff P-TCurve=MyPvsT Daily=IRRAD_DIA TDaily=TEMP_DIA
New PVSystem.GD_cf33e7e6cff455186be170faef4242504d8a11f1b41a4440b6defc461a1b3c6b_2 phases=1 bus1=node_419312991.2.4 conn=wye kv=0.1200 pf=1 pmpp=0.84 kva=0.84 irradiance=1 temperature=25 %cutin=20 %cutout=20 effcurve=MyEff P-TCurve=MyPvsT Daily=IRRAD_DIA TDaily=TEMP_DIA
New PVSystem.GD_f5e4d2d52566c844c304db9501c8e247898f4fa9a1d938c0c6834d3a374a0547_1 phases=1 bus1=node_418294435.1.4 conn=wye kv=0.1200 pf=1 pmpp=1.19 kva=1.19 irradiance=1 temperature=25 %cutin=20 %cutout=20 effcurve=MyEff P-TCurve=MyPvsT Daily=IRRAD_DIA TDaily=TEMP_DIA
New PVSystem.GD_f5e4d2d52566c844c304db9501c8e247898f4fa9a1d938c0c6834d3a374a0547_2 phases=1 bus1=node_418294435.2.4 conn=wye kv=0.1200 pf=1 pmpp=1.19 kva=1.19 irradiance=1 temperature=25 %cutin=20 %cutout=20 effcurve=MyEff P-TCurve=MyPvsT Daily=IRRAD_DIA TDaily=TEMP_DIA
New PVSystem.GD_8d95b019eeb414e3cdd872f24e514dbf0d60797d35b5ee664cc1236667f3e3e3_1 phases=1 bus1=node_419139577.1.4 conn=wye kv=0.1200 pf=1 pmpp=0.35 kva=0.35 irradiance=1 temperature=25 %cutin=20 %cutout=20 effcurve=MyEff P-TCurve=MyPvsT Daily=IRRAD_DIA TDaily=TEMP_DIA
New PVSystem.GD_8d95b019eeb414e3cdd872f24e514dbf0d60797d35b5ee664cc1236667f3e3e3_2 phases=1 bus1=node_419139577.2.4 conn=wye kv=0.1200 pf=1 pmpp=0.35 kva=0.35 irradiance=1 temperature=25 %cutin=20 %cutout=20 effcurve=MyEff P-TCurve=MyPvsT Daily=IRRAD_DIA TDaily=TEMP_DIA
New PVSystem.GD_8362cc502f524ea739d52c88be787d489f26fde07599bcf6d70cfe81202f3db9_1 phases=1 bus1=node_423648575.1.4 conn=wye kv=0.1200 pf=1 pmpp=0.70 kva=0.70 irradiance=1 temperature=25 %cutin=20 %cutout=20 effcurve=MyEff P-TCurve=MyPvsT Daily=IRRAD_DIA TDaily=TEMP_DIA
New PVSystem.GD_8362cc502f524ea739d52c88be787d489f26fde07599bcf6d70cfe81202f3db9_2 phases=1 bus1=node_423648575.2.4 conn=wye kv=0.1200 pf=1 pmpp=0.70 kva=0.70 irradiance=1 temperature=25 %cutin=20 %cutout=20 effcurve=MyEff P-TCurve=MyPvsT Daily=IRRAD_DIA TDaily=TEMP_DIA
New PVSystem.GD_b777f2bfcbbaf638e6ef29dfaa9314dfe6e40d63ddd36f5fd057fd5f453ba261_1 phases=1 bus1=node_419936815.1.4 conn=wye kv=0.1200 pf=1 pmpp=0.24 kva=0.24 irradiance=1 temperature=25 %cutin=20 %cutout=20 effcurve=MyEff P-TCurve=MyPvsT Daily=IRRAD_DIA TDaily=TEMP_DIA
New PVSystem.GD_b777f2bfcbbaf638e6ef29dfaa9314dfe6e40d63ddd36f5fd057fd5f453ba261_2 phases=1 bus1=node_419936815.2.4 conn=wye kv=0.1200 pf=1 pmpp=0.24 kva=0.24 irradiance=1 temperature=25 %cutin=20 %cutout=20 effcurve=MyEff P-TCurve=MyPvsT Daily=IRRAD_DIA TDaily=TEMP_DIA
New PVSystem.GD_c5a5e28dc0a396399754e2b189d2ed62655e6cc000cb38620b72cd5c89aa61c2_1 phases=1 bus1=node_419311527.1.4 conn=wye kv=0.1200 pf=1 pmpp=0.71 kva=0.71 irradiance=1 temperature=25 %cutin=20 %cutout=20 effcurve=MyEff P-TCurve=MyPvsT Daily=IRRAD_DIA TDaily=TEMP_DIA
New PVSystem.GD_c5a5e28dc0a396399754e2b189d2ed62655e6cc000cb38620b72cd5c89aa61c2_2 phases=1 bus1=node_419311527.2.4 conn=wye kv=0.1200 pf=1 pmpp=0.71 kva=0.71 irradiance=1 temperature=25 %cutin=20 %cutout=20 effcurve=MyEff P-TCurve=MyPvsT Daily=IRRAD_DIA TDaily=TEMP_DIA
New PVSystem.GD_3d32ff3f3d9f16c2c42146ea09c5ad57604eeac419f0f4719ceab7d22321d211_1 phases=1 bus1=node_419208978.1.4 conn=wye kv=0.1200 pf=1 pmpp=0.85 kva=0.85 irradiance=1 temperature=25 %cutin=20 %cutout=20 effcurve=MyEff P-TCurve=MyPvsT Daily=IRRAD_DIA TDaily=TEMP_DIA
New PVSystem.GD_3d32ff3f3d9f16c2c42146ea09c5ad57604eeac419f0f4719ceab7d22321d211_2 phases=1 bus1=node_419208978.2.4 conn=wye kv=0.1200 pf=1 pmpp=0.85 kva=0.85 irradiance=1 temperature=25 %cutin=20 %cutout=20 effcurve=MyEff P-TCurve=MyPvsT Daily=IRRAD_DIA TDaily=TEMP_DIA
New PVSystem.GD_f97f22842a086a7bb9e6f8330014077b51be4d6498a583426c881f32fd9ceac0_1 phases=1 bus1=node_419035045.1.4 conn=wye kv=0.1270 pf=1 pmpp=1.15 kva=1.15 irradiance=1 temperature=25 %cutin=20 %cutout=20 effcurve=MyEff P-TCurve=MyPvsT Daily=IRRAD_DIA TDaily=TEMP_DIA
New PVSystem.GD_f97f22842a086a7bb9e6f8330014077b51be4d6498a583426c881f32fd9ceac0_2 phases=1 bus1=node_419035045.2.4 conn=wye kv=0.1270 pf=1 pmpp=1.15 kva=1.15 irradiance=1 temperature=25 %cutin=20 %cutout=20 effcurve=MyEff P-TCurve=MyPvsT Daily=IRRAD_DIA TDaily=TEMP_DIA
New PVSystem.GD_f97f22842a086a7bb9e6f8330014077b51be4d6498a583426c881f32fd9ceac0_3 phases=1 bus1=node_419035045.3.4 conn=wye kv=0.1270 pf=1 pmpp=1.15 kva=1.15 irradiance=1 temperature=25 %cutin=20 %cutout=20 effcurve=MyEff P-TCurve=MyPvsT Daily=IRRAD_DIA TDaily=TEMP_DIA
New PVSystem.GD_d41fd5224c81424dabed5a616a3d86a407ef39b37f779ab5cd9d47da38105741_1 phases=1 bus1=node_419689463.1.4 conn=wye kv=0.1200 pf=1 pmpp=0.85 kva=0.85 irradiance=1 temperature=25 %cutin=20 %cutout=20 effcurve=MyEff P-TCurve=MyPvsT Daily=IRRAD_DIA TDaily=TEMP_DIA
New PVSystem.GD_d41fd5224c81424dabed5a616a3d86a407ef39b37f779ab5cd9d47da38105741_2 phases=1 bus1=node_419689463.2.4 conn=wye kv=0.1200 pf=1 pmpp=0.85 kva=0.85 irradiance=1 temperature=25 %cutin=20 %cutout=20 effcurve=MyEff P-TCurve=MyPvsT Daily=IRRAD_DIA TDaily=TEMP_DIA
New PVSystem.GD_ae013c50f7a10724dc4ca8f0a9d0eb92ef27882e9b75b64397ef3754e7be0a53_1 phases=1 bus1=node_419624008.1.4 conn=wye kv=0.1200 pf=1 pmpp=1.73 kva=1.73 irradiance=1 temperature=25 %cutin=20 %cutout=20 effcurve=MyEff P-TCurve=MyPvsT Daily=IRRAD_DIA TDaily=TEMP_DIA
New PVSystem.GD_ae013c50f7a10724dc4ca8f0a9d0eb92ef27882e9b75b64397ef3754e7be0a53_2 phases=1 bus1=node_419624008.2.4 conn=wye kv=0.1200 pf=1 pmpp=1.73 kva=1.73 irradiance=1 temperature=25 %cutin=20 %cutout=20 effcurve=MyEff P-TCurve=MyPvsT Daily=IRRAD_DIA TDaily=TEMP_DIA
New PVSystem.GD_16d81d7aafae9fa3c2c38e2d27d4cfdf774ff7d716c7c053cd139ceb4e62852f_1 phases=1 bus1=node_419209743.1.4 conn=wye kv=0.1200 pf=1 pmpp=0.73 kva=0.73 irradiance=1 temperature=25 %cutin=20 %cutout=20 effcurve=MyEff P-TCurve=MyPvsT Daily=IRRAD_DIA TDaily=TEMP_DIA
New PVSystem.GD_16d81d7aafae9fa3c2c38e2d27d4cfdf774ff7d716c7c053cd139ceb4e62852f_2 phases=1 bus1=node_419209743.2.4 conn=wye kv=0.1200 pf=1 pmpp=0.73 kva=0.73 irradiance=1 temperature=25 %cutin=20 %cutout=20 effcurve=MyEff P-TCurve=MyPvsT Daily=IRRAD_DIA TDaily=TEMP_DIA
New PVSystem.GD_88c02b86dd1d065cc2afd256cec2642510fe92340fadd94fa6eae0891a7cd7e6_1 phases=1 bus1=node_419279039.1.4 conn=wye kv=0.1200 pf=1 pmpp=0.89 kva=0.89 irradiance=1 temperature=25 %cutin=20 %cutout=20 effcurve=MyEff P-TCurve=MyPvsT Daily=IRRAD_DIA TDaily=TEMP_DIA
New PVSystem.GD_88c02b86dd1d065cc2afd256cec2642510fe92340fadd94fa6eae0891a7cd7e6_2 phases=1 bus1=node_419279039.2.4 conn=wye kv=0.1200 pf=1 pmpp=0.89 kva=0.89 irradiance=1 temperature=25 %cutin=20 %cutout=20 effcurve=MyEff P-TCurve=MyPvsT Daily=IRRAD_DIA TDaily=TEMP_DIA
New PVSystem.GD_c4de807a4b0d123e54cc1ba8a6d1f7b1cd24e76ab602a5b925b4ddc6a29cfd0b_1 phases=1 bus1=node_419309805.1.4 conn=wye kv=0.1200 pf=1 pmpp=2.50 kva=2.50 irradiance=1 temperature=25 %cutin=20 %cutout=20 effcurve=MyEff P-TCurve=MyPvsT Daily=IRRAD_DIA TDaily=TEMP_DIA
New PVSystem.GD_c4de807a4b0d123e54cc1ba8a6d1f7b1cd24e76ab602a5b925b4ddc6a29cfd0b_2 phases=1 bus1=node_419309805.2.4 conn=wye kv=0.1200 pf=1 pmpp=2.50 kva=2.50 irradiance=1 temperature=25 %cutin=20 %cutout=20 effcurve=MyEff P-TCurve=MyPvsT Daily=IRRAD_DIA TDaily=TEMP_DIA
New PVSystem.GD_a26e7644a632731f82682a9ea134d40d5b0bb69ca43cee56341e75e13594ba25_1 phases=1 bus1=node_419309856.1.4 conn=wye kv=0.1200 pf=1 pmpp=0.53 kva=0.53 irradiance=1 temperature=25 %cutin=20 %cutout=20 effcurve=MyEff P-TCurve=MyPvsT Daily=IRRAD_DIA TDaily=TEMP_DIA
New PVSystem.GD_a26e7644a632731f82682a9ea134d40d5b0bb69ca43cee56341e75e13594ba25_2 phases=1 bus1=node_419309856.2.4 conn=wye kv=0.1200 pf=1 pmpp=0.53 kva=0.53 irradiance=1 temperature=25 %cutin=20 %cutout=20 effcurve=MyEff P-TCurve=MyPvsT Daily=IRRAD_DIA TDaily=TEMP_DIA
New PVSystem.GD_aebceaefc027830cf42583587f71411016d7c8604e9840360c226e64878b96be_1 phases=1 bus1=node_423633397.1.4 conn=wye kv=0.1200 pf=1 pmpp=0.53 kva=0.53 irradiance=1 temperature=25 %cutin=20 %cutout=20 effcurve=MyEff P-TCurve=MyPvsT Daily=IRRAD_DIA TDaily=TEMP_DIA
New PVSystem.GD_aebceaefc027830cf42583587f71411016d7c8604e9840360c226e64878b96be_2 phases=1 bus1=node_423633397.2.4 conn=wye kv=0.1200 pf=1 pmpp=0.53 kva=0.53 irradiance=1 temperature=25 %cutin=20 %cutout=20 effcurve=MyEff P-TCurve=MyPvsT Daily=IRRAD_DIA TDaily=TEMP_DIA
New PVSystem.GD_a72d1219099cb2c61c616e0a8ae5d5cc5894105e031e042d9bacfa5b91d6c83a_1 phases=1 bus1=node_419278895.1.4 conn=wye kv=0.1200 pf=1 pmpp=0.75 kva=0.75 irradiance=1 temperature=25 %cutin=20 %cutout=20 effcurve=MyEff P-TCurve=MyPvsT Daily=IRRAD_DIA TDaily=TEMP_DIA
New PVSystem.GD_a72d1219099cb2c61c616e0a8ae5d5cc5894105e031e042d9bacfa5b91d6c83a_2 phases=1 bus1=node_419278895.2.4 conn=wye kv=0.1200 pf=1 pmpp=0.75 kva=0.75 irradiance=1 temperature=25 %cutin=20 %cutout=20 effcurve=MyEff P-TCurve=MyPvsT Daily=IRRAD_DIA TDaily=TEMP_DIA
New PVSystem.GD_5834a048fe8cd28ac8a59530ed83cbc6111fb262b39641541cdd9b9f91f3f369_1 phases=1 bus1=node_418100452.1.4 conn=wye kv=0.1270 pf=1 pmpp=0.25 kva=0.25 irradiance=1 temperature=25 %cutin=20 %cutout=20 effcurve=MyEff P-TCurve=MyPvsT Daily=IRRAD_DIA TDaily=TEMP_DIA
New PVSystem.GD_5834a048fe8cd28ac8a59530ed83cbc6111fb262b39641541cdd9b9f91f3f369_2 phases=1 bus1=node_418100452.2.4 conn=wye kv=0.1270 pf=1 pmpp=0.25 kva=0.25 irradiance=1 temperature=25 %cutin=20 %cutout=20 effcurve=MyEff P-TCurve=MyPvsT Daily=IRRAD_DIA TDaily=TEMP_DIA
New PVSystem.GD_5834a048fe8cd28ac8a59530ed83cbc6111fb262b39641541cdd9b9f91f3f369_3 phases=1 bus1=node_418100452.3.4 conn=wye kv=0.1270 pf=1 pmpp=0.25 kva=0.25 irradiance=1 temperature=25 %cutin=20 %cutout=20 effcurve=MyEff P-TCurve=MyPvsT Daily=IRRAD_DIA TDaily=TEMP_DIA
New PVSystem.GD_486308021efa4c37c4c40db6cacffdca665fafac3f881993359e6ebfcf664e4d_1 phases=1 bus1=node_418100452.1.4 conn=wye kv=0.1270 pf=1 pmpp=1.33 kva=1.33 irradiance=1 temperature=25 %cutin=20 %cutout=20 effcurve=MyEff P-TCurve=MyPvsT Daily=IRRAD_DIA TDaily=TEMP_DIA
New PVSystem.GD_486308021efa4c37c4c40db6cacffdca665fafac3f881993359e6ebfcf664e4d_2 phases=1 bus1=node_418100452.2.4 conn=wye kv=0.1270 pf=1 pmpp=1.33 kva=1.33 irradiance=1 temperature=25 %cutin=20 %cutout=20 effcurve=MyEff P-TCurve=MyPvsT Daily=IRRAD_DIA TDaily=TEMP_DIA
New PVSystem.GD_486308021efa4c37c4c40db6cacffdca665fafac3f881993359e6ebfcf664e4d_3 phases=1 bus1=node_418100452.3.4 conn=wye kv=0.1270 pf=1 pmpp=1.33 kva=1.33 irradiance=1 temperature=25 %cutin=20 %cutout=20 effcurve=MyEff P-TCurve=MyPvsT Daily=IRRAD_DIA TDaily=TEMP_DIA
New PVSystem.GD_d86263ce92139997d1be154ad14cf809c7011f8c0b4b12ea2981886518060b8e_1 phases=1 bus1=node_418291951.1.4 conn=wye kv=0.1200 pf=1 pmpp=2.06 kva=2.06 irradiance=1 temperature=25 %cutin=20 %cutout=20 effcurve=MyEff P-TCurve=MyPvsT Daily=IRRAD_DIA TDaily=TEMP_DIA
New PVSystem.GD_d86263ce92139997d1be154ad14cf809c7011f8c0b4b12ea2981886518060b8e_2 phases=1 bus1=node_418291951.2.4 conn=wye kv=0.1200 pf=1 pmpp=2.06 kva=2.06 irradiance=1 temperature=25 %cutin=20 %cutout=20 effcurve=MyEff P-TCurve=MyPvsT Daily=IRRAD_DIA TDaily=TEMP_DIA
New PVSystem.GD_10ce708d12ce52415498824d648570f98da7fd26c3440e61bcbdbdbb85adfa66_1 phases=1 bus1=node_418362830.1.4 conn=wye kv=0.1270 pf=1 pmpp=1.86 kva=1.86 irradiance=1 temperature=25 %cutin=20 %cutout=20 effcurve=MyEff P-TCurve=MyPvsT Daily=IRRAD_DIA TDaily=TEMP_DIA
New PVSystem.GD_10ce708d12ce52415498824d648570f98da7fd26c3440e61bcbdbdbb85adfa66_2 phases=1 bus1=node_418362830.2.4 conn=wye kv=0.1270 pf=1 pmpp=1.86 kva=1.86 irradiance=1 temperature=25 %cutin=20 %cutout=20 effcurve=MyEff P-TCurve=MyPvsT Daily=IRRAD_DIA TDaily=TEMP_DIA
New PVSystem.GD_10ce708d12ce52415498824d648570f98da7fd26c3440e61bcbdbdbb85adfa66_3 phases=1 bus1=node_418362830.3.4 conn=wye kv=0.1270 pf=1 pmpp=1.86 kva=1.86 irradiance=1 temperature=25 %cutin=20 %cutout=20 effcurve=MyEff P-TCurve=MyPvsT Daily=IRRAD_DIA TDaily=TEMP_DIA
New PVSystem.GD_d0bc7fd74996a0ddd95a5172b6a94a884c998df0924b6e0dbab247b146e5306e_1 phases=1 bus1=node_998372256.1.4 conn=wye kv=0.1200 pf=1 pmpp=0.64 kva=0.64 irradiance=1 temperature=25 %cutin=20 %cutout=20 effcurve=MyEff P-TCurve=MyPvsT Daily=IRRAD_DIA TDaily=TEMP_DIA
New PVSystem.GD_d0bc7fd74996a0ddd95a5172b6a94a884c998df0924b6e0dbab247b146e5306e_2 phases=1 bus1=node_998372256.2.4 conn=wye kv=0.1200 pf=1 pmpp=0.64 kva=0.64 irradiance=1 temperature=25 %cutin=20 %cutout=20 effcurve=MyEff P-TCurve=MyPvsT Daily=IRRAD_DIA TDaily=TEMP_DIA
New PVSystem.GD_4ceb3478054330e0700e1345ced200f41130445203e5f8f7469f5d71ddc43261_1 phases=1 bus1=node_419688965.1.4 conn=wye kv=0.1200 pf=1 pmpp=4.10 kva=4.10 irradiance=1 temperature=25 %cutin=20 %cutout=20 effcurve=MyEff P-TCurve=MyPvsT Daily=IRRAD_DIA TDaily=TEMP_DIA
