! ==========================================================
! VAOS DE SAIDA — barra de MT da SE -> cabeceira do alimentador
! Derivado de CTMT.BARR e CTMT.UNI_TR_AT: a BDGD nao modela o
! arranjo interno da subestacao, so o vinculo logico.
! Cada vao e o disjuntor de saida do alimentador.
! ==========================================================
New Line.VAO_AFNU25 phases=3 Bus1=11413474.1.2.3 Bus2=segm_2577980939.1.2.3 Switch=y r1=0.0001 r0=0.0001 x1=0 x0=0 c1=0 c0=0
New Monitor.M_AFNU25 element=Line.VAO_AFNU25 terminal=1 mode=1 ppolar=no
New Line.VAO_AFNU16 phases=3 Bus1=11413474.1.2.3 Bus2=segm_2577981295.1.2.3 Switch=y r1=0.0001 r0=0.0001 x1=0 x0=0 c1=0 c0=0
New Monitor.M_AFNU16 element=Line.VAO_AFNU16 terminal=1 mode=1 ppolar=no
New Line.VAO_AFNU21 phases=3 Bus1=11413474.1.2.3 Bus2=segm_2577981097.1.2.3 Switch=y r1=0.0001 r0=0.0001 x1=0 x0=0 c1=0 c0=0
New Monitor.M_AFNU21 element=Line.VAO_AFNU21 terminal=1 mode=1 ppolar=no
New Line.VAO_AFNU23 phases=3 Bus1=11413474.1.2.3 Bus2=segm_2577981024.1.2.3 Switch=y r1=0.0001 r0=0.0001 x1=0 x0=0 c1=0 c0=0
New Monitor.M_AFNU23 element=Line.VAO_AFNU23 terminal=1 mode=1 ppolar=no
New Line.VAO_AFNU24 phases=3 Bus1=11413474.1.2.3 Bus2=segm_2577980984.1.2.3 Switch=y r1=0.0001 r0=0.0001 x1=0 x0=0 c1=0 c0=0
New Monitor.M_AFNU24 element=Line.VAO_AFNU24 terminal=1 mode=1 ppolar=no
New Line.VAO_AFNU18 phases=3 Bus1=11413474.1.2.3 Bus2=segm_2577981211.1.2.3 Switch=y r1=0.0001 r0=0.0001 x1=0 x0=0 c1=0 c0=0
New Monitor.M_AFNU18 element=Line.VAO_AFNU18 terminal=1 mode=1 ppolar=no
New Line.VAO_AFNU22 phases=3 Bus1=11413474.1.2.3 Bus2=segm_2577981059.1.2.3 Switch=y r1=0.0001 r0=0.0001 x1=0 x0=0 c1=0 c0=0
New Monitor.M_AFNU22 element=Line.VAO_AFNU22 terminal=1 mode=1 ppolar=no
New Line.VAO_AFNU15 phases=3 Bus1=11413474.1.2.3 Bus2=segm_2577981334.1.2.3 Switch=y r1=0.0001 r0=0.0001 x1=0 x0=0 c1=0 c0=0
New Monitor.M_AFNU15 element=Line.VAO_AFNU15 terminal=1 mode=1 ppolar=no
New Line.VAO_AFNU14 phases=3 Bus1=11413474.1.2.3 Bus2=segm_2577981378.1.2.3 Switch=y r1=0.0001 r0=0.0001 x1=0 x0=0 c1=0 c0=0
New Monitor.M_AFNU14 element=Line.VAO_AFNU14 terminal=1 mode=1 ppolar=no
New Line.VAO_AFNU17 phases=3 Bus1=11413474.1.2.3 Bus2=segm_2577981253.1.2.3 Switch=y r1=0.0001 r0=0.0001 x1=0 x0=0 c1=0 c0=0
New Monitor.M_AFNU17 element=Line.VAO_AFNU17 terminal=1 mode=1 ppolar=no
