! ==========================================================
! VAOS DE SAIDA — barra de MT da SE -> cabeceira do alimentador
! Derivado de CTMT.BARR e CTMT.UNI_TR_AT: a BDGD nao modela o
! arranjo interno da subestacao, so o vinculo logico.
! Cada vao e o disjuntor de saida do alimentador.
! ==========================================================
New Line.VAO_BIID207 phases=3 Bus1=11993164.1.2.3 Bus2=segm_2556880233.1.2.3 Switch=y r1=0.0001 r0=0.0001 x1=0 x0=0 c1=0 c0=0
New Monitor.M_BIID207 element=Line.VAO_BIID207 terminal=1 mode=1 ppolar=no
New Line.VAO_BIID203 phases=3 Bus1=11993164.1.2.3 Bus2=100_202152932a.1.2.3 Switch=y r1=0.0001 r0=0.0001 x1=0 x0=0 c1=0 c0=0
New Monitor.M_BIID203 element=Line.VAO_BIID203 terminal=1 mode=1 ppolar=no
New Line.VAO_BIID205 phases=3 Bus1=11993164.1.2.3 Bus2=100_202152933a.1.2.3 Switch=y r1=0.0001 r0=0.0001 x1=0 x0=0 c1=0 c0=0
New Monitor.M_BIID205 element=Line.VAO_BIID205 terminal=1 mode=1 ppolar=no
