! Chaves de AT normalmente abertas — estado fixado apos a montagem.
Open Line.ATSW_1094743523 1
Open Line.ATSW_6643225 1
Open Line.ATSW_1041780572 1
Open Line.ATSW_1041780702 1
Open Line.ATSW_1041780676 1
Open Line.ATSW_5140126 1
Open Line.ATSW_1041780598 1
Open Line.ATSW_526461606 1
Open Line.ATSW_526461727 1
Open Line.ATSW_1808620252 1
Open Line.ATSW_1808620229 1
Open Line.ATSW_526461922 1
Open Line.ATSW_11414330 1
Open Line.ATSW_10164639 1
Open Line.ATSW_10164615 1
Open Line.ATSW_10164627 1
Open Line.ATSW_10164651 1
Open Line.ATSW_10164870 1
Open Line.ATSW_11414262 1
Open Line.ATSW_11414250 1
Open Line.ATSW_11869275 1
Open Line.ATSW_193900080 1
Open Line.ATSW_193900180 1
Open Line.ATSW_189564903 1
Open Line.ATSW_189563967 1
Open Line.ATSW_423646081 1
Open Line.ATSW_11383587 1
Open Line.ATSW_11383637 1
Open Line.ATSW_11383785 1
Open Line.ATSW_11383606 1
Open Line.ATSW_10808277 1
Open Line.ATSW_10826177 1
Open Line.ATSW_10826301 1
Open Line.ATSW_10533574 1
Open Line.ATSW_193655519 1
Open Line.ATSW_193655627 1
Open Line.ATSW_193655482 1
Open Line.ATSW_193655579 1
Open Line.ATSW_193655603 1
Open Line.ATSW_193655646 1
Open Line.ATSW_193655567 1
Open Line.ATSW_10370827 1
Open Line.ATSW_10371370 1
Open Line.ATSW_10370899 1
Open Line.ATSW_193655374 1
Open Line.ATSW_193655531 1
Open Line.ATSW_193655422 1
Open Line.ATSW_193655343 1
Open Line.ATSW_10371466 1
Open Line.ATSW_10370960 1
Open Line.ATSW_10370851 1
Open Line.ATSW_10371406 1
Open Line.ATSW_10370948 1
Open Line.ATSW_10370875 1
Open Line.ATSW_10371454 1
Open Line.ATSW_192977583 1
Open Line.ATSW_11770398 1
Open Line.ATSW_11770001 1
Open Line.ATSW_11769975 1
Open Line.ATSW_11770098 1
Open Line.ATSW_442175073 1
Open Line.ATSW_474209028 1
Open Line.ATSW_474208895 1
Open Line.ATSW_474209088 1
Open Line.ATSW_474208823 1
Open Line.ATSW_442175210 1
Open Line.ATSW_474208468 1
Open Line.ATSW_474208883 1
Open Line.ATSW_5195887 1
Open Line.ATSW_474208967 1
Open Line.ATSW_2577126333 1
Open Line.ATSW_474208443 1
Open Line.ATSW_474209016 1
Open Line.ATSW_474208520 1
Open Line.ATSW_442175134 1
Open Line.ATSW_474208715 1
Open Line.ATSW_474208641 1
Open Line.ATSW_442175300 1
Open Line.ATSW_442174719 1
Open Line.ATSW_474208763 1
Open Line.ATSW_442174797 1
Open Line.ATSW_474209160 1
Open Line.ATSW_474208592 1
Open Line.ATSW_823731109 1
Open Line.ATSW_456546932 1
