! ==========================================================
! VAOS DE SAIDA — barra de MT da SE -> cabeceira do alimentador
! Derivado de CTMT.BARR e CTMT.UNI_TR_AT: a BDGD nao modela o
! arranjo interno da subestacao, so o vinculo logico.
! Cada vao e o disjuntor de saida do alimentador.
! ==========================================================
New Line.VAO_ACSU110 phases=3 Bus1=2543303595.1.2.3 Bus2=segm_2543303544.1.2.3 Switch=y r1=0.0001 r0=0.0001 x1=0 x0=0 c1=0 c0=0
New Monitor.M_ACSU110 element=Line.VAO_ACSU110 terminal=1 mode=1 ppolar=no
New Line.VAO_ACSU109 phases=3 Bus1=2543303595.1.2.3 Bus2=segm_2543303516.1.2.3 Switch=y r1=0.0001 r0=0.0001 x1=0 x0=0 c1=0 c0=0
New Monitor.M_ACSU109 element=Line.VAO_ACSU109 terminal=1 mode=1 ppolar=no
New Line.VAO_ACSU106 phases=3 Bus1=2543303595.1.2.3 Bus2=segm_2543303467.1.2.3 Switch=y r1=0.0001 r0=0.0001 x1=0 x0=0 c1=0 c0=0
New Monitor.M_ACSU106 element=Line.VAO_ACSU106 terminal=1 mode=1 ppolar=no
New Line.VAO_ACSU114 phases=3 Bus1=2543303595.1.2.3 Bus2=segm_2543303289.1.2.3 Switch=y r1=0.0001 r0=0.0001 x1=0 x0=0 c1=0 c0=0
New Monitor.M_ACSU114 element=Line.VAO_ACSU114 terminal=1 mode=1 ppolar=no
New Line.VAO_ACSU108 phases=3 Bus1=2543303595.1.2.3 Bus2=segm_2543303495.1.2.3 Switch=y r1=0.0001 r0=0.0001 x1=0 x0=0 c1=0 c0=0
New Monitor.M_ACSU108 element=Line.VAO_ACSU108 terminal=1 mode=1 ppolar=no
New Line.VAO_ACSU115 phases=3 Bus1=2543303595.1.2.3 Bus2=segm_2543303226.1.2.3 Switch=y r1=0.0001 r0=0.0001 x1=0 x0=0 c1=0 c0=0
New Monitor.M_ACSU115 element=Line.VAO_ACSU115 terminal=1 mode=1 ppolar=no
