! Chaves normalmente abertas — estado fixado apos a montagem.
Open Line.1924632068 1
Open Line.609765288 1
Open Line.1414929150 1
Open Line.1305088442 1
Open Line.345594978 1
Open Line.418914374 1
Open Line.546179784 1
Open Line.506644947 1
Open Line.1130876820 1
Open Line.1130877057 1
Open Line.1235074679 1
Open Line.353951486 1
Open Line.345409140 1
Open Line.345551700 1
Open Line.345519588 1
Open Line.345553339 1
Open Line.345520113 1
Open Line.345085639 1
Open Line.345613298 1
Open Line.345177130 1
Open Line.1702305034 1
Open Line.1702305315 1
Open Line.2734194910 1
Open Line.353951310 1
Open Line.345519620 1
Open Line.1229149144 1
Open Line.1229148956 1
Open Line.1386785983 1
Open Line.354010693 1
Open Line.354010323 1
Open Line.353950966 1
Open Line.1414928926 1
Open Line.1787454965 1
Open Line.345669984 1
Open Line.1550954172 1
Open Line.353950760 1
Open Line.354010471 1
Open Line.1707006886 1
Open Line.1130876837 1
Open Line.353950878 1
Open Line.354010619 1
Open Line.1544367189 1
Open Line.345530730 1
Open Line.1062339931 1
Open Line.911174040 1
Open Line.1101063235 1
Open Line.345613994 1
Open Line.353950922 1
Open Line.353951091 1
Open Line.353950691 1
Open Line.1499091302 1
Open Line.354010397 1
Open Line.353950804 1
Open Line.1544504598 1
Open Line.1531609730 1
Open Line.353951354 1
Open Line.354010767 1
Open Line.1759389235 1
Open Line.353951061 1
Open Line.353951181 1
Open Line.1047147758 1
Open Line.353951271 1
Open Line.1296796665 1
Open Line.1322711716 1
Open Line.1034184418 1
Open Line.2589204084 1
Open Line.353951211 1
Open Line.1071155554 1
Open Line.1065990371 1
Open Line.1138730180 1
Open Line.1039139918 1
Open Line.1071026717 1
Open Line.353951241 1
Open Line.353951121 1
Open Line.1279659270 1
Open Line.1552912258 1
Open Line.1061683063 1
Open Line.353950839 1
Open Line.1064517077 1
Open Line.354010545 1
Open Line.353951001 1
Open Line.1950832922 1
Open Line.353950721 1
Open Line.1071108370 1
Open Line.345667376 1
Open Line.1305470504 1
Open Line.345293087 1
Open Line.1305384624 1
Open Line.1146927425 1
Open Line.1511603971 1
Open Line.1305539238 1
Open Line.1342012522 1
Open Line.1042927199 1
Open Line.353951151 1
Open Line.1489572096 1
Open Line.1140314689 1
Open Line.1075647033 1
Open Line.193900578 1
Open Line.193900542 1
Open Line.193900416 1
