! Chaves normalmente abertas — estado fixado apos a montagem.
Open Line.1098581709 1
Open Line.341843766 1
Open Line.544565132 1
Open Line.1818118293 1
Open Line.1818212756 1
Open Line.1869500306 1
Open Line.2219431332 1
Open Line.341217429 1
Open Line.337930289 1
Open Line.2507262316 1
Open Line.886895793 1
Open Line.935503954 1
Open Line.1007570098 1
Open Line.1007570111 1
Open Line.836566200 1
Open Line.1011202923 1
Open Line.1209757407 1
Open Line.1104078704 1
Open Line.1052094568 1
Open Line.349238702 1
Open Line.349238258 1
Open Line.349238214 1
Open Line.1650703834 1
Open Line.349256836 1
Open Line.349238170 1
Open Line.1624476059 1
Open Line.1621010790 1
Open Line.1560246388 1
Open Line.1098590007 1
Open Line.864343691 1
Open Line.1623385388 1
Open Line.1036619136 1
Open Line.339770389 1
Open Line.349334973 1
Open Line.1114211440 1
Open Line.1133294018 1
Open Line.1582408535 1
Open Line.349256910 1
Open Line.349334899 1
Open Line.349257033 1
Open Line.349238126 1
Open Line.920547917 1
Open Line.349239026 1
Open Line.1570607824 1
Open Line.1570534825 1
Open Line.1555918036 1
Open Line.1818259990 1
Open Line.1070979535 1
Open Line.1544264154 1
Open Line.1113511519 1
Open Line.1930818601 1
Open Line.1622578100 1
Open Line.1623870592 1
Open Line.11993325 1
