! GERACAO DISTRIBUIDA — gerada de UGBT_tab e UGMT_tab
! Unidades com potencia nula sao omitidas (gerariam NaN).
! 26 unidades descartadas por potencia nula.
! 70 unidades de BT realocadas para o secundario do transformador (rede secundaria nao modelada).
! 0 unidades descartadas por ponto de conexao ausente da rede.
! irradiance=1 — ver o docstring: 1,0 e meio-dia de ceu claro, nao a ponta de carga.
! 3 barras tiveram a GD limitada a capacidade do transformador (109 kW cortados).
! inversores em pf=1 — ver o docstring de _pv: 0,92 e capacidade exigida pelo PRODIST, nao despacho.
! 0 unidades de MT ligadas pelo PAC da carga (casadas por CEG_GD): o PAC da UGMT nao existe na SSDMT.
New PVSystem.GD_9b1044daa27ad7517d5f7da320c046ba98efdcacb04f48bbb1d5dabaeec6faa3_1 phases=1 bus1=node_416076700.1.4 conn=wye kv=0.1270 pf=1 pmpp=1.09 kva=1.09 irradiance=1 temperature=25 %cutin=20 %cutout=20 effcurve=MyEff P-TCurve=MyPvsT Daily=IRRAD_DIA TDaily=TEMP_DIA
New PVSystem.GD_9b1044daa27ad7517d5f7da320c046ba98efdcacb04f48bbb1d5dabaeec6faa3_2 phases=1 bus1=node_416076700.2.4 conn=wye kv=0.1270 pf=1 pmpp=1.09 kva=1.09 irradiance=1 temperature=25 %cutin=20 %cutout=20 effcurve=MyEff P-TCurve=MyPvsT Daily=IRRAD_DIA TDaily=TEMP_DIA
New PVSystem.GD_9b1044daa27ad7517d5f7da320c046ba98efdcacb04f48bbb1d5dabaeec6faa3_3 phases=1 bus1=node_416076700.3.4 conn=wye kv=0.1270 pf=1 pmpp=1.09 kva=1.09 irradiance=1 temperature=25 %cutin=20 %cutout=20 effcurve=MyEff P-TCurve=MyPvsT Daily=IRRAD_DIA TDaily=TEMP_DIA
New PVSystem.GD_a9736aa7545bc6e211e50e8e5a77000c3428c5d850ed9e4b76ee01dc866dabdd_1 phases=1 bus1=node_416076700.1.4 conn=wye kv=0.1270 pf=1 pmpp=7.16 kva=7.16 irradiance=1 temperature=25 %cutin=20 %cutout=20 effcurve=MyEff P-TCurve=MyPvsT Daily=IRRAD_DIA TDaily=TEMP_DIA
New PVSystem.GD_a9736aa7545bc6e211e50e8e5a77000c3428c5d850ed9e4b76ee01dc866dabdd_2 phases=1 bus1=node_416076700.2.4 conn=wye kv=0.1270 pf=1 pmpp=7.16 kva=7.16 irradiance=1 temperature=25 %cutin=20 %cutout=20 effcurve=MyEff P-TCurve=MyPvsT Daily=IRRAD_DIA TDaily=TEMP_DIA
New PVSystem.GD_a9736aa7545bc6e211e50e8e5a77000c3428c5d850ed9e4b76ee01dc866dabdd_3 phases=1 bus1=node_416076700.3.4 conn=wye kv=0.1270 pf=1 pmpp=7.16 kva=7.16 irradiance=1 temperature=25 %cutin=20 %cutout=20 effcurve=MyEff P-TCurve=MyPvsT Daily=IRRAD_DIA TDaily=TEMP_DIA
New PVSystem.GD_d7d7fb9b7ec54858aa682cb46dc22297d5f5d60e1091e9d23638158efbf52d41_1 phases=1 bus1=node_2122615159.1.4 conn=wye kv=0.1200 pf=1 pmpp=4.54 kva=4.54 irradiance=1 temperature=25 %cutin=20 %cutout=20 effcurve=MyEff P-TCurve=MyPvsT Daily=IRRAD_DIA TDaily=TEMP_DIA
New PVSystem.GD_d7d7fb9b7ec54858aa682cb46dc22297d5f5d60e1091e9d23638158efbf52d41_2 phases=1 bus1=node_2122615159.2.4 conn=wye kv=0.1200 pf=1 pmpp=4.54 kva=4.54 irradiance=1 temperature=25 %cutin=20 %cutout=20 effcurve=MyEff P-TCurve=MyPvsT Daily=IRRAD_DIA TDaily=TEMP_DIA
New PVSystem.GD_708c69dc138f89fc72aac73e57e3423540950378ab3b89b1e7961b5b0242a8ac_1 phases=1 bus1=node_416103669.1.4 conn=wye kv=0.1200 pf=1 pmpp=2.65 kva=2.65 irradiance=1 temperature=25 %cutin=20 %cutout=20 effcurve=MyEff P-TCurve=MyPvsT Daily=IRRAD_DIA TDaily=TEMP_DIA
New PVSystem.GD_708c69dc138f89fc72aac73e57e3423540950378ab3b89b1e7961b5b0242a8ac_2 phases=1 bus1=node_416103669.2.4 conn=wye kv=0.1200 pf=1 pmpp=2.65 kva=2.65 irradiance=1 temperature=25 %cutin=20 %cutout=20 effcurve=MyEff P-TCurve=MyPvsT Daily=IRRAD_DIA TDaily=TEMP_DIA
New PVSystem.GD_71f764758e055fb38b009b54cb4ef56893e37cf7400dceae81410e5118bc5d33_1 phases=1 bus1=node_416318059.1.4 conn=wye kv=0.1200 pf=1 pmpp=12.86 kva=12.86 irradiance=1 temperature=25 %cutin=20 %cutout=20 effcurve=MyEff P-TCurve=MyPvsT Daily=IRRAD_DIA TDaily=TEMP_DIA
New PVSystem.GD_71f764758e055fb38b009b54cb4ef56893e37cf7400dceae81410e5118bc5d33_2 phases=1 bus1=node_416318059.2.4 conn=wye kv=0.1200 pf=1 pmpp=12.86 kva=12.86 irradiance=1 temperature=25 %cutin=20 %cutout=20 effcurve=MyEff P-TCurve=MyPvsT Daily=IRRAD_DIA TDaily=TEMP_DIA
New PVSystem.GD_44551079a7f2123413ddd56877103fe4bf2d92d11e92335a84a6243c5a7e1d06_1 phases=1 bus1=node_416075944.1.4 conn=wye kv=0.1200 pf=1 pmpp=1.48 kva=1.48 irradiance=1 temperature=25 %cutin=20 %cutout=20 effcurve=MyEff P-TCurve=MyPvsT Daily=IRRAD_DIA TDaily=TEMP_DIA
New PVSystem.GD_44551079a7f2123413ddd56877103fe4bf2d92d11e92335a84a6243c5a7e1d06_2 phases=1 bus1=node_416075944.2.4 conn=wye kv=0.1200 pf=1 pmpp=1.48 kva=1.48 irradiance=1 temperature=25 %cutin=20 %cutout=20 effcurve=MyEff P-TCurve=MyPvsT Daily=IRRAD_DIA TDaily=TEMP_DIA
New PVSystem.GD_e2948c1602a9f432a21e7641580f5a9332d3e569fb7169bd759e448ba7cb0827_1 phases=1 bus1=node_416626100.1.4 conn=wye kv=0.1200 pf=1 pmpp=0.56 kva=0.56 irradiance=1 temperature=25 %cutin=20 %cutout=20 effcurve=MyEff P-TCurve=MyPvsT Daily=IRRAD_DIA TDaily=TEMP_DIA
New PVSystem.GD_e2948c1602a9f432a21e7641580f5a9332d3e569fb7169bd759e448ba7cb0827_2 phases=1 bus1=node_416626100.2.4 conn=wye kv=0.1200 pf=1 pmpp=0.56 kva=0.56 irradiance=1 temperature=25 %cutin=20 %cutout=20 effcurve=MyEff P-TCurve=MyPvsT Daily=IRRAD_DIA TDaily=TEMP_DIA
New PVSystem.GD_1d2b0eedcd97a67d9e86947fc33494de846f5ce38d428be557839905e22138eb_1 phases=1 bus1=node_414384923.1.4 conn=wye kv=0.1200 pf=1 pmpp=2.87 kva=2.87 irradiance=1 temperature=25 %cutin=20 %cutout=20 effcurve=MyEff P-TCurve=MyPvsT Daily=IRRAD_DIA TDaily=TEMP_DIA
New PVSystem.GD_1d2b0eedcd97a67d9e86947fc33494de846f5ce38d428be557839905e22138eb_2 phases=1 bus1=node_414384923.2.4 conn=wye kv=0.1200 pf=1 pmpp=2.87 kva=2.87 irradiance=1 temperature=25 %cutin=20 %cutout=20 effcurve=MyEff P-TCurve=MyPvsT Daily=IRRAD_DIA TDaily=TEMP_DIA
New PVSystem.GD_a2d4e29e76bf1a86c24d9b9a82e4e7e90f8e35b7ae91ed596c86f41ca959f873_1 phases=1 bus1=node_416075932.1.4 conn=wye kv=0.1200 pf=1 pmpp=1.82 kva=1.82 irradiance=1 temperature=25 %cutin=20 %cutout=20 effcurve=MyEff P-TCurve=MyPvsT Daily=IRRAD_DIA TDaily=TEMP_DIA
New PVSystem.GD_a2d4e29e76bf1a86c24d9b9a82e4e7e90f8e35b7ae91ed596c86f41ca959f873_2 phases=1 bus1=node_416075932.2.4 conn=wye kv=0.1200 pf=1 pmpp=1.82 kva=1.82 irradiance=1 temperature=25 %cutin=20 %cutout=20 effcurve=MyEff P-TCurve=MyPvsT Daily=IRRAD_DIA TDaily=TEMP_DIA
New PVSystem.GD_8bd70ffc5c31b0807950bfc39a39a308f9d06b8def501a9045290c33d6680646_1 phases=1 bus1=node_414095079.1.4 conn=wye kv=0.1200 pf=1 pmpp=0.70 kva=0.70 irradiance=1 temperature=25 %cutin=20 %cutout=20 effcurve=MyEff P-TCurve=MyPvsT Daily=IRRAD_DIA TDaily=TEMP_DIA
New PVSystem.GD_8bd70ffc5c31b0807950bfc39a39a308f9d06b8def501a9045290c33d6680646_2 phases=1 bus1=node_414095079.2.4 conn=wye kv=0.1200 pf=1 pmpp=0.70 kva=0.70 irradiance=1 temperature=25 %cutin=20 %cutout=20 effcurve=MyEff P-TCurve=MyPvsT Daily=IRRAD_DIA TDaily=TEMP_DIA
New PVSystem.GD_507936564111dcb1cd7a61a633a13acdad616d16b466384a64556b3c6696dd48_1 phases=1 bus1=node_1122529002.1.4 conn=wye kv=0.1200 pf=1 pmpp=6.84 kva=6.84 irradiance=1 temperature=25 %cutin=20 %cutout=20 effcurve=MyEff P-TCurve=MyPvsT Daily=IRRAD_DIA TDaily=TEMP_DIA
New PVSystem.GD_507936564111dcb1cd7a61a633a13acdad616d16b466384a64556b3c6696dd48_2 phases=1 bus1=node_1122529002.2.4 conn=wye kv=0.1200 pf=1 pmpp=6.84 kva=6.84 irradiance=1 temperature=25 %cutin=20 %cutout=20 effcurve=MyEff P-TCurve=MyPvsT Daily=IRRAD_DIA TDaily=TEMP_DIA
New PVSystem.GD_8f4c9598cfdab55e365eb8212a4965a13bd64a3de2b847db68dd2b1066a5625e_1 phases=1 bus1=node_422759785.1.4 conn=wye kv=0.1200 pf=1 pmpp=3.14 kva=3.14 irradiance=1 temperature=25 %cutin=20 %cutout=20 effcurve=MyEff P-TCurve=MyPvsT Daily=IRRAD_DIA TDaily=TEMP_DIA
New PVSystem.GD_8f4c9598cfdab55e365eb8212a4965a13bd64a3de2b847db68dd2b1066a5625e_2 phases=1 bus1=node_422759785.2.4 conn=wye kv=0.1200 pf=1 pmpp=3.14 kva=3.14 irradiance=1 temperature=25 %cutin=20 %cutout=20 effcurve=MyEff P-TCurve=MyPvsT Daily=IRRAD_DIA TDaily=TEMP_DIA
New PVSystem.GD_3ea9c23784388507dc448147ef42a5a835dfb3410fdbcfb2d3090b552044fc8a_1 phases=1 bus1=node_1783418485.1.4 conn=wye kv=0.1200 pf=1 pmpp=1.59 kva=1.59 irradiance=1 temperature=25 %cutin=20 %cutout=20 effcurve=MyEff P-TCurve=MyPvsT Daily=IRRAD_DIA TDaily=TEMP_DIA
New PVSystem.GD_3ea9c23784388507dc448147ef42a5a835dfb3410fdbcfb2d3090b552044fc8a_2 phases=1 bus1=node_1783418485.2.4 conn=wye kv=0.1200 pf=1 pmpp=1.59 kva=1.59 irradiance=1 temperature=25 %cutin=20 %cutout=20 effcurve=MyEff P-TCurve=MyPvsT Daily=IRRAD_DIA TDaily=TEMP_DIA
New PVSystem.GD_e6b596196ec3371dd28adb303d5436ece4de3e97ed64f3a5d3a3cacbfe5da325_1 phases=1 bus1=node_422759791.1.4 conn=wye kv=0.1200 pf=1 pmpp=0.97 kva=0.97 irradiance=1 temperature=25 %cutin=20 %cutout=20 effcurve=MyEff P-TCurve=MyPvsT Daily=IRRAD_DIA TDaily=TEMP_DIA
New PVSystem.GD_e6b596196ec3371dd28adb303d5436ece4de3e97ed64f3a5d3a3cacbfe5da325_2 phases=1 bus1=node_422759791.2.4 conn=wye kv=0.1200 pf=1 pmpp=0.97 kva=0.97 irradiance=1 temperature=25 %cutin=20 %cutout=20 effcurve=MyEff P-TCurve=MyPvsT Daily=IRRAD_DIA TDaily=TEMP_DIA
New PVSystem.GD_c5b981722f2deb6d30b8077a641a3cd61ea584767af2b021b52bf843bc75d5b0_1 phases=1 bus1=node_422757208.1.4 conn=wye kv=0.1200 pf=1 pmpp=1.27 kva=1.27 irradiance=1 temperature=25 %cutin=20 %cutout=20 effcurve=MyEff P-TCurve=MyPvsT Daily=IRRAD_DIA TDaily=TEMP_DIA
New PVSystem.GD_c5b981722f2deb6d30b8077a641a3cd61ea584767af2b021b52bf843bc75d5b0_2 phases=1 bus1=node_422757208.2.4 conn=wye kv=0.1200 pf=1 pmpp=1.27 kva=1.27 irradiance=1 temperature=25 %cutin=20 %cutout=20 effcurve=MyEff P-TCurve=MyPvsT Daily=IRRAD_DIA TDaily=TEMP_DIA
New PVSystem.GD_4b1ea987c2d7bcc4455ee1e8e4cafcf10b7098ebc1351ce9f1657b7d850bedcd_1 phases=1 bus1=node_2741792995.1.4 conn=wye kv=0.1200 pf=1 pmpp=1.19 kva=1.19 irradiance=1 temperature=25 %cutin=20 %cutout=20 effcurve=MyEff P-TCurve=MyPvsT Daily=IRRAD_DIA TDaily=TEMP_DIA
New PVSystem.GD_4b1ea987c2d7bcc4455ee1e8e4cafcf10b7098ebc1351ce9f1657b7d850bedcd_2 phases=1 bus1=node_2741792995.2.4 conn=wye kv=0.1200 pf=1 pmpp=1.19 kva=1.19 irradiance=1 temperature=25 %cutin=20 %cutout=20 effcurve=MyEff P-TCurve=MyPvsT Daily=IRRAD_DIA TDaily=TEMP_DIA
New PVSystem.GD_385a3fa89c478863d2fa3782279d481f62b250e95ee93ed69e6acd6aaee08621_1 phases=1 bus1=node_422805085.1.4 conn=wye kv=0.1200 pf=1 pmpp=4.23 kva=4.23 irradiance=1 temperature=25 %cutin=20 %cutout=20 effcurve=MyEff P-TCurve=MyPvsT Daily=IRRAD_DIA TDaily=TEMP_DIA
New PVSystem.GD_385a3fa89c478863d2fa3782279d481f62b250e95ee93ed69e6acd6aaee08621_2 phases=1 bus1=node_422805085.2.4 conn=wye kv=0.1200 pf=1 pmpp=4.23 kva=4.23 irradiance=1 temperature=25 %cutin=20 %cutout=20 effcurve=MyEff P-TCurve=MyPvsT Daily=IRRAD_DIA TDaily=TEMP_DIA
New PVSystem.GD_26e0832700a2d08bc5b243412bcc060844ac8a31f80ca71102695a4d412e4acf_1 phases=1 bus1=node_1737683464.1.4 conn=wye kv=0.1270 pf=1 pmpp=7.15 kva=7.15 irradiance=1 temperature=25 %cutin=20 %cutout=20 effcurve=MyEff P-TCurve=MyPvsT Daily=IRRAD_DIA TDaily=TEMP_DIA
New PVSystem.GD_26e0832700a2d08bc5b243412bcc060844ac8a31f80ca71102695a4d412e4acf_2 phases=1 bus1=node_1737683464.2.4 conn=wye kv=0.1270 pf=1 pmpp=7.15 kva=7.15 irradiance=1 temperature=25 %cutin=20 %cutout=20 effcurve=MyEff P-TCurve=MyPvsT Daily=IRRAD_DIA TDaily=TEMP_DIA
New PVSystem.GD_26e0832700a2d08bc5b243412bcc060844ac8a31f80ca71102695a4d412e4acf_3 phases=1 bus1=node_1737683464.3.4 conn=wye kv=0.1270 pf=1 pmpp=7.15 kva=7.15 irradiance=1 temperature=25 %cutin=20 %cutout=20 effcurve=MyEff P-TCurve=MyPvsT Daily=IRRAD_DIA TDaily=TEMP_DIA
New PVSystem.GD_6d1fe48b53e6639743913bf0a8403d474ef8f8b7cfa469e9b1bc935d795c8a72_1 phases=1 bus1=node_422756818.1.4 conn=wye kv=0.1200 pf=1 pmpp=1.94 kva=1.94 irradiance=1 temperature=25 %cutin=20 %cutout=20 effcurve=MyEff P-TCurve=MyPvsT Daily=IRRAD_DIA TDaily=TEMP_DIA
New PVSystem.GD_6d1fe48b53e6639743913bf0a8403d474ef8f8b7cfa469e9b1bc935d795c8a72_2 phases=1 bus1=node_422756818.2.4 conn=wye kv=0.1200 pf=1 pmpp=1.94 kva=1.94 irradiance=1 temperature=25 %cutin=20 %cutout=20 effcurve=MyEff P-TCurve=MyPvsT Daily=IRRAD_DIA TDaily=TEMP_DIA
New PVSystem.GD_6832831b81ac96c108bd92d8f67964dd2c66c2d479ab3c6c32419cfa03c1a2dd_1 phases=1 bus1=node_422760346.1.4 conn=wye kv=0.1200 pf=1 pmpp=2.99 kva=2.99 irradiance=1 temperature=25 %cutin=20 %cutout=20 effcurve=MyEff P-TCurve=MyPvsT Daily=IRRAD_DIA TDaily=TEMP_DIA
New PVSystem.GD_6832831b81ac96c108bd92d8f67964dd2c66c2d479ab3c6c32419cfa03c1a2dd_2 phases=1 bus1=node_422760346.2.4 conn=wye kv=0.1200 pf=1 pmpp=2.99 kva=2.99 irradiance=1 temperature=25 %cutin=20 %cutout=20 effcurve=MyEff P-TCurve=MyPvsT Daily=IRRAD_DIA TDaily=TEMP_DIA
New PVSystem.GD_316662d192204025ba60f7b8acf99fdf43ce4a68aa3658b365755a83de649d7c_1 phases=1 bus1=node_422759059.1.4 conn=wye kv=0.1200 pf=1 pmpp=1.43 kva=1.43 irradiance=1 temperature=25 %cutin=20 %cutout=20 effcurve=MyEff P-TCurve=MyPvsT Daily=IRRAD_DIA TDaily=TEMP_DIA
New PVSystem.GD_316662d192204025ba60f7b8acf99fdf43ce4a68aa3658b365755a83de649d7c_2 phases=1 bus1=node_422759059.2.4 conn=wye kv=0.1200 pf=1 pmpp=1.43 kva=1.43 irradiance=1 temperature=25 %cutin=20 %cutout=20 effcurve=MyEff P-TCurve=MyPvsT Daily=IRRAD_DIA TDaily=TEMP_DIA
New PVSystem.GD_daf5750b3363997edb021e04a2f87bd03f9a1e05991a0f9307b36f856310a633_1 phases=1 bus1=node_422758087.1.4 conn=wye kv=0.1200 pf=1 pmpp=1.60 kva=1.60 irradiance=1 temperature=25 %cutin=20 %cutout=20 effcurve=MyEff P-TCurve=MyPvsT Daily=IRRAD_DIA TDaily=TEMP_DIA
New PVSystem.GD_daf5750b3363997edb021e04a2f87bd03f9a1e05991a0f9307b36f856310a633_2 phases=1 bus1=node_422758087.2.4 conn=wye kv=0.1200 pf=1 pmpp=1.60 kva=1.60 irradiance=1 temperature=25 %cutin=20 %cutout=20 effcurve=MyEff P-TCurve=MyPvsT Daily=IRRAD_DIA TDaily=TEMP_DIA
New PVSystem.GD_07c762208e31b2b7d869846ab1d022aa58906a6e147846711483a1818b1b66cd_1 phases=1 bus1=node_422759776.1.4 conn=wye kv=0.1200 pf=1 pmpp=2.65 kva=2.65 irradiance=1 temperature=25 %cutin=20 %cutout=20 effcurve=MyEff P-TCurve=MyPvsT Daily=IRRAD_DIA TDaily=TEMP_DIA
New PVSystem.GD_07c762208e31b2b7d869846ab1d022aa58906a6e147846711483a1818b1b66cd_2 phases=1 bus1=node_422759776.2.4 conn=wye kv=0.1200 pf=1 pmpp=2.65 kva=2.65 irradiance=1 temperature=25 %cutin=20 %cutout=20 effcurve=MyEff P-TCurve=MyPvsT Daily=IRRAD_DIA TDaily=TEMP_DIA
New PVSystem.GD_a4b0338f6278987ceaaac783435f1e1a2b2311a4bf55d771f802aa0c548ba5d0_1 phases=1 bus1=node_422760748.1.4 conn=wye kv=0.1200 pf=1 pmpp=5.93 kva=5.93 irradiance=1 temperature=25 %cutin=20 %cutout=20 effcurve=MyEff P-TCurve=MyPvsT Daily=IRRAD_DIA TDaily=TEMP_DIA
New PVSystem.GD_a4b0338f6278987ceaaac783435f1e1a2b2311a4bf55d771f802aa0c548ba5d0_2 phases=1 bus1=node_422760748.2.4 conn=wye kv=0.1200 pf=1 pmpp=5.93 kva=5.93 irradiance=1 temperature=25 %cutin=20 %cutout=20 effcurve=MyEff P-TCurve=MyPvsT Daily=IRRAD_DIA TDaily=TEMP_DIA
New PVSystem.GD_8492c9160073add896c6e4cf4d7f0d192feced5449b8e47b6f05ea17d8122a4e_1 phases=1 bus1=node_422751802.1.4 conn=wye kv=0.1200 pf=1 pmpp=2.56 kva=2.56 irradiance=1 temperature=25 %cutin=20 %cutout=20 effcurve=MyEff P-TCurve=MyPvsT Daily=IRRAD_DIA TDaily=TEMP_DIA
New PVSystem.GD_8492c9160073add896c6e4cf4d7f0d192feced5449b8e47b6f05ea17d8122a4e_2 phases=1 bus1=node_422751802.2.4 conn=wye kv=0.1200 pf=1 pmpp=2.56 kva=2.56 irradiance=1 temperature=25 %cutin=20 %cutout=20 effcurve=MyEff P-TCurve=MyPvsT Daily=IRRAD_DIA TDaily=TEMP_DIA
New PVSystem.GD_e6a22326f6baac52e0fe20b02b56b7071cc768a272a28d7275b3bd5d7de8a9bb_1 phases=1 bus1=node_422757976.1.4 conn=wye kv=0.1200 pf=1 pmpp=1.74 kva=1.74 irradiance=1 temperature=25 %cutin=20 %cutout=20 effcurve=MyEff P-TCurve=MyPvsT Daily=IRRAD_DIA TDaily=TEMP_DIA
New PVSystem.GD_e6a22326f6baac52e0fe20b02b56b7071cc768a272a28d7275b3bd5d7de8a9bb_2 phases=1 bus1=node_422757976.2.4 conn=wye kv=0.1200 pf=1 pmpp=1.74 kva=1.74 irradiance=1 temperature=25 %cutin=20 %cutout=20 effcurve=MyEff P-TCurve=MyPvsT Daily=IRRAD_DIA TDaily=TEMP_DIA
New PVSystem.GD_9ddc9590156addbccd28b394bcc3ee611aabe8cba029b63df013951bad6fd833_1 phases=1 bus1=node_422760898.1.4 conn=wye kv=0.1270 pf=1 pmpp=2.27 kva=2.27 irradiance=1 temperature=25 %cutin=20 %cutout=20 effcurve=MyEff P-TCurve=MyPvsT Daily=IRRAD_DIA TDaily=TEMP_DIA
New PVSystem.GD_9ddc9590156addbccd28b394bcc3ee611aabe8cba029b63df013951bad6fd833_2 phases=1 bus1=node_422760898.2.4 conn=wye kv=0.1270 pf=1 pmpp=2.27 kva=2.27 irradiance=1 temperature=25 %cutin=20 %cutout=20 effcurve=MyEff P-TCurve=MyPvsT Daily=IRRAD_DIA TDaily=TEMP_DIA
New PVSystem.GD_9ddc9590156addbccd28b394bcc3ee611aabe8cba029b63df013951bad6fd833_3 phases=1 bus1=node_422760898.3.4 conn=wye kv=0.1270 pf=1 pmpp=2.27 kva=2.27 irradiance=1 temperature=25 %cutin=20 %cutout=20 effcurve=MyEff P-TCurve=MyPvsT Daily=IRRAD_DIA TDaily=TEMP_DIA
New PVSystem.GD_2c331b3cf8205e2ef9420e9368184a0280ea7385d1e24180559962367375012c_1 phases=1 bus1=node_422751262.1.4 conn=wye kv=0.1200 pf=1 pmpp=4.94 kva=4.94 irradiance=1 temperature=25 %cutin=20 %cutout=20 effcurve=MyEff P-TCurve=MyPvsT Daily=IRRAD_DIA TDaily=TEMP_DIA
New PVSystem.GD_2c331b3cf8205e2ef9420e9368184a0280ea7385d1e24180559962367375012c_2 phases=1 bus1=node_422751262.2.4 conn=wye kv=0.1200 pf=1 pmpp=4.94 kva=4.94 irradiance=1 temperature=25 %cutin=20 %cutout=20 effcurve=MyEff P-TCurve=MyPvsT Daily=IRRAD_DIA TDaily=TEMP_DIA
New PVSystem.GD_40fe82ec5fc77c13ea31cb4b684f85e6d70f1ecac9de21d66738e1cb85a71bb7_1 phases=1 bus1=node_422761078.1.4 conn=wye kv=0.1270 pf=1 pmpp=1.57 kva=1.57 irradiance=1 temperature=25 %cutin=20 %cutout=20 effcurve=MyEff P-TCurve=MyPvsT Daily=IRRAD_DIA TDaily=TEMP_DIA
New PVSystem.GD_40fe82ec5fc77c13ea31cb4b684f85e6d70f1ecac9de21d66738e1cb85a71bb7_2 phases=1 bus1=node_422761078.2.4 conn=wye kv=0.1270 pf=1 pmpp=1.57 kva=1.57 irradiance=1 temperature=25 %cutin=20 %cutout=20 effcurve=MyEff P-TCurve=MyPvsT Daily=IRRAD_DIA TDaily=TEMP_DIA
New PVSystem.GD_40fe82ec5fc77c13ea31cb4b684f85e6d70f1ecac9de21d66738e1cb85a71bb7_3 phases=1 bus1=node_422761078.3.4 conn=wye kv=0.1270 pf=1 pmpp=1.57 kva=1.57 irradiance=1 temperature=25 %cutin=20 %cutout=20 effcurve=MyEff P-TCurve=MyPvsT Daily=IRRAD_DIA TDaily=TEMP_DIA
New PVSystem.GD_63a4ca2aacf4efc68cb84f9e8464b086f4e480ece5c6a6234e01cdae7f99fa34_1 phases=1 bus1=node_422801692.1.4 conn=wye kv=0.1200 pf=1 pmpp=1.30 kva=1.30 irradiance=1 temperature=25 %cutin=20 %cutout=20 effcurve=MyEff P-TCurve=MyPvsT Daily=IRRAD_DIA TDaily=TEMP_DIA
New PVSystem.GD_63a4ca2aacf4efc68cb84f9e8464b086f4e480ece5c6a6234e01cdae7f99fa34_2 phases=1 bus1=node_422801692.2.4 conn=wye kv=0.1200 pf=1 pmpp=1.30 kva=1.30 irradiance=1 temperature=25 %cutin=20 %cutout=20 effcurve=MyEff P-TCurve=MyPvsT Daily=IRRAD_DIA TDaily=TEMP_DIA
New PVSystem.GD_5442ecd2dd94339a9f47c8b34773b0d6080118769ab10896dcacb02335a7f9cc_1 phases=1 bus1=node_422754340.1.4 conn=wye kv=0.1200 pf=1 pmpp=1.22 kva=1.22 irradiance=1 temperature=25 %cutin=20 %cutout=20 effcurve=MyEff P-TCurve=MyPvsT Daily=IRRAD_DIA TDaily=TEMP_DIA
New PVSystem.GD_5442ecd2dd94339a9f47c8b34773b0d6080118769ab10896dcacb02335a7f9cc_2 phases=1 bus1=node_422754340.2.4 conn=wye kv=0.1200 pf=1 pmpp=1.22 kva=1.22 irradiance=1 temperature=25 %cutin=20 %cutout=20 effcurve=MyEff P-TCurve=MyPvsT Daily=IRRAD_DIA TDaily=TEMP_DIA
New PVSystem.GD_0ecb9596e18fb589e35ea6786b6ec67e5bb0d71780692f0d4410ed2a5a7d82a8_1 phases=1 bus1=node_422753965.1.4 conn=wye kv=0.1200 pf=1 pmpp=0.62 kva=0.62 irradiance=1 temperature=25 %cutin=20 %cutout=20 effcurve=MyEff P-TCurve=MyPvsT Daily=IRRAD_DIA TDaily=TEMP_DIA
New PVSystem.GD_0ecb9596e18fb589e35ea6786b6ec67e5bb0d71780692f0d4410ed2a5a7d82a8_2 phases=1 bus1=node_422753965.2.4 conn=wye kv=0.1200 pf=1 pmpp=0.62 kva=0.62 irradiance=1 temperature=25 %cutin=20 %cutout=20 effcurve=MyEff P-TCurve=MyPvsT Daily=IRRAD_DIA TDaily=TEMP_DIA
New PVSystem.GD_dc97ef5156a58981c2a50325196bdaf92ea3ce264d3cf1b6e4740b2d5ac4974f_1 phases=1 bus1=node_422791651.1.4 conn=wye kv=0.1200 pf=1 pmpp=1.22 kva=1.22 irradiance=1 temperature=25 %cutin=20 %cutout=20 effcurve=MyEff P-TCurve=MyPvsT Daily=IRRAD_DIA TDaily=TEMP_DIA
New PVSystem.GD_dc97ef5156a58981c2a50325196bdaf92ea3ce264d3cf1b6e4740b2d5ac4974f_2 phases=1 bus1=node_422791651.2.4 conn=wye kv=0.1200 pf=1 pmpp=1.22 kva=1.22 irradiance=1 temperature=25 %cutin=20 %cutout=20 effcurve=MyEff P-TCurve=MyPvsT Daily=IRRAD_DIA TDaily=TEMP_DIA
New PVSystem.GD_582711c8388b4aeadb92c1588d514e449674edca752c642fa75c6c5e1980fd21_1 phases=1 bus1=node_422802649.1.4 conn=wye kv=0.1200 pf=1 pmpp=0.80 kva=0.80 irradiance=1 temperature=25 %cutin=20 %cutout=20 effcurve=MyEff P-TCurve=MyPvsT Daily=IRRAD_DIA TDaily=TEMP_DIA
New PVSystem.GD_582711c8388b4aeadb92c1588d514e449674edca752c642fa75c6c5e1980fd21_2 phases=1 bus1=node_422802649.2.4 conn=wye kv=0.1200 pf=1 pmpp=0.80 kva=0.80 irradiance=1 temperature=25 %cutin=20 %cutout=20 effcurve=MyEff P-TCurve=MyPvsT Daily=IRRAD_DIA TDaily=TEMP_DIA
New PVSystem.GD_554aa78dc4145ebce33088af5592f75fc2c57a5ea84dcbb16855c1a967acc327_1 phases=1 bus1=node_422758090.1.4 conn=wye kv=0.1200 pf=1 pmpp=1.76 kva=1.76 irradiance=1 temperature=25 %cutin=20 %cutout=20 effcurve=MyEff P-TCurve=MyPvsT Daily=IRRAD_DIA TDaily=TEMP_DIA
New PVSystem.GD_554aa78dc4145ebce33088af5592f75fc2c57a5ea84dcbb16855c1a967acc327_2 phases=1 bus1=node_422758090.2.4 conn=wye kv=0.1200 pf=1 pmpp=1.76 kva=1.76 irradiance=1 temperature=25 %cutin=20 %cutout=20 effcurve=MyEff P-TCurve=MyPvsT Daily=IRRAD_DIA TDaily=TEMP_DIA
New PVSystem.GD_3f463c823a394495527d5e6139954203fb4fc7f517290cc55b21d7e5bbca8802_1 phases=1 bus1=node_422757574.1.4 conn=wye kv=0.1200 pf=1 pmpp=2.64 kva=2.64 irradiance=1 temperature=25 %cutin=20 %cutout=20 effcurve=MyEff P-TCurve=MyPvsT Daily=IRRAD_DIA TDaily=TEMP_DIA
New PVSystem.GD_3f463c823a394495527d5e6139954203fb4fc7f517290cc55b21d7e5bbca8802_2 phases=1 bus1=node_422757574.2.4 conn=wye kv=0.1200 pf=1 pmpp=2.64 kva=2.64 irradiance=1 temperature=25 %cutin=20 %cutout=20 effcurve=MyEff P-TCurve=MyPvsT Daily=IRRAD_DIA TDaily=TEMP_DIA
New PVSystem.GD_8acca9ae6985ffb4e6fa186e1abaf0add4d05a5ab6a6f742e6cece2056ee808a_1 phases=1 bus1=node_422754079.1.4 conn=wye kv=0.1200 pf=1 pmpp=0.89 kva=0.89 irradiance=1 temperature=25 %cutin=20 %cutout=20 effcurve=MyEff P-TCurve=MyPvsT Daily=IRRAD_DIA TDaily=TEMP_DIA
New PVSystem.GD_8acca9ae6985ffb4e6fa186e1abaf0add4d05a5ab6a6f742e6cece2056ee808a_2 phases=1 bus1=node_422754079.2.4 conn=wye kv=0.1200 pf=1 pmpp=0.89 kva=0.89 irradiance=1 temperature=25 %cutin=20 %cutout=20 effcurve=MyEff P-TCurve=MyPvsT Daily=IRRAD_DIA TDaily=TEMP_DIA
New PVSystem.GD_166150c5ee43f2574ee0fa04e15be1deee5e2a05018504c1bd8f2a2083cdf9ae_1 phases=1 bus1=node_422754088.1.4 conn=wye kv=0.1200 pf=1 pmpp=1.29 kva=1.29 irradiance=1 temperature=25 %cutin=20 %cutout=20 effcurve=MyEff P-TCurve=MyPvsT Daily=IRRAD_DIA TDaily=TEMP_DIA
New PVSystem.GD_166150c5ee43f2574ee0fa04e15be1deee5e2a05018504c1bd8f2a2083cdf9ae_2 phases=1 bus1=node_422754088.2.4 conn=wye kv=0.1200 pf=1 pmpp=1.29 kva=1.29 irradiance=1 temperature=25 %cutin=20 %cutout=20 effcurve=MyEff P-TCurve=MyPvsT Daily=IRRAD_DIA TDaily=TEMP_DIA
New PVSystem.GD_d6523fed478a9c0325364bb3a166347502ba55662d675f15e49080f44b7978c8_1 phases=1 bus1=node_416076466.1.4 conn=wye kv=0.1270 pf=1 pmpp=1.45 kva=1.45 irradiance=1 temperature=25 %cutin=20 %cutout=20 effcurve=MyEff P-TCurve=MyPvsT Daily=IRRAD_DIA TDaily=TEMP_DIA
New PVSystem.GD_d6523fed478a9c0325364bb3a166347502ba55662d675f15e49080f44b7978c8_2 phases=1 bus1=node_416076466.2.4 conn=wye kv=0.1270 pf=1 pmpp=1.45 kva=1.45 irradiance=1 temperature=25 %cutin=20 %cutout=20 effcurve=MyEff P-TCurve=MyPvsT Daily=IRRAD_DIA TDaily=TEMP_DIA
New PVSystem.GD_d6523fed478a9c0325364bb3a166347502ba55662d675f15e49080f44b7978c8_3 phases=1 bus1=node_416076466.3.4 conn=wye kv=0.1270 pf=1 pmpp=1.45 kva=1.45 irradiance=1 temperature=25 %cutin=20 %cutout=20 effcurve=MyEff P-TCurve=MyPvsT Daily=IRRAD_DIA TDaily=TEMP_DIA
New PVSystem.GD_733143e3fa741c43665d7e619cc402da718ff33151e52b0525f02ee1f7f318a0_1 phases=1 bus1=node_416076466.1.4 conn=wye kv=0.1270 pf=1 pmpp=2.13 kva=2.13 irradiance=1 temperature=25 %cutin=20 %cutout=20 effcurve=MyEff P-TCurve=MyPvsT Daily=IRRAD_DIA TDaily=TEMP_DIA
New PVSystem.GD_733143e3fa741c43665d7e619cc402da718ff33151e52b0525f02ee1f7f318a0_2 phases=1 bus1=node_416076466.2.4 conn=wye kv=0.1270 pf=1 pmpp=2.13 kva=2.13 irradiance=1 temperature=25 %cutin=20 %cutout=20 effcurve=MyEff P-TCurve=MyPvsT Daily=IRRAD_DIA TDaily=TEMP_DIA
New PVSystem.GD_733143e3fa741c43665d7e619cc402da718ff33151e52b0525f02ee1f7f318a0_3 phases=1 bus1=node_416076466.3.4 conn=wye kv=0.1270 pf=1 pmpp=2.13 kva=2.13 irradiance=1 temperature=25 %cutin=20 %cutout=20 effcurve=MyEff P-TCurve=MyPvsT Daily=IRRAD_DIA TDaily=TEMP_DIA
New PVSystem.GD_c4c4d51ad37a275f8dd990d840f2941083ab69e6268189607c74f4d1c36166ef_1 phases=1 bus1=node_447022276.1.4 conn=wye kv=0.1270 pf=1 pmpp=1.15 kva=1.15 irradiance=1 temperature=25 %cutin=20 %cutout=20 effcurve=MyEff P-TCurve=MyPvsT Daily=IRRAD_DIA TDaily=TEMP_DIA
New PVSystem.GD_c4c4d51ad37a275f8dd990d840f2941083ab69e6268189607c74f4d1c36166ef_2 phases=1 bus1=node_447022276.2.4 conn=wye kv=0.1270 pf=1 pmpp=1.15 kva=1.15 irradiance=1 temperature=25 %cutin=20 %cutout=20 effcurve=MyEff P-TCurve=MyPvsT Daily=IRRAD_DIA TDaily=TEMP_DIA
New PVSystem.GD_c4c4d51ad37a275f8dd990d840f2941083ab69e6268189607c74f4d1c36166ef_3 phases=1 bus1=node_447022276.3.4 conn=wye kv=0.1270 pf=1 pmpp=1.15 kva=1.15 irradiance=1 temperature=25 %cutin=20 %cutout=20 effcurve=MyEff P-TCurve=MyPvsT Daily=IRRAD_DIA TDaily=TEMP_DIA
New PVSystem.GD_dbc7984179cf4f9bf39f2acab14d784d34df07ce8d5f035d51d6b90dbf759ba1_1 phases=1 bus1=node_416077384.1.4 conn=wye kv=0.1270 pf=1 pmpp=0.94 kva=0.94 irradiance=1 temperature=25 %cutin=20 %cutout=20 effcurve=MyEff P-TCurve=MyPvsT Daily=IRRAD_DIA TDaily=TEMP_DIA
New PVSystem.GD_dbc7984179cf4f9bf39f2acab14d784d34df07ce8d5f035d51d6b90dbf759ba1_2 phases=1 bus1=node_416077384.2.4 conn=wye kv=0.1270 pf=1 pmpp=0.94 kva=0.94 irradiance=1 temperature=25 %cutin=20 %cutout=20 effcurve=MyEff P-TCurve=MyPvsT Daily=IRRAD_DIA TDaily=TEMP_DIA
New PVSystem.GD_dbc7984179cf4f9bf39f2acab14d784d34df07ce8d5f035d51d6b90dbf759ba1_3 phases=1 bus1=node_416077384.3.4 conn=wye kv=0.1270 pf=1 pmpp=0.94 kva=0.94 irradiance=1 temperature=25 %cutin=20 %cutout=20 effcurve=MyEff P-TCurve=MyPvsT Daily=IRRAD_DIA TDaily=TEMP_DIA
New PVSystem.GD_e303562ac9c03c7e7e04d5db9f282441cb8d37c102b481c78514205c757c0e93_1 phases=1 bus1=node_416077384.1.4 conn=wye kv=0.1270 pf=1 pmpp=3.27 kva=3.27 irradiance=1 temperature=25 %cutin=20 %cutout=20 effcurve=MyEff P-TCurve=MyPvsT Daily=IRRAD_DIA TDaily=TEMP_DIA
New PVSystem.GD_e303562ac9c03c7e7e04d5db9f282441cb8d37c102b481c78514205c757c0e93_2 phases=1 bus1=node_416077384.2.4 conn=wye kv=0.1270 pf=1 pmpp=3.27 kva=3.27 irradiance=1 temperature=25 %cutin=20 %cutout=20 effcurve=MyEff P-TCurve=MyPvsT Daily=IRRAD_DIA TDaily=TEMP_DIA
New PVSystem.GD_e303562ac9c03c7e7e04d5db9f282441cb8d37c102b481c78514205c757c0e93_3 phases=1 bus1=node_416077384.3.4 conn=wye kv=0.1270 pf=1 pmpp=3.27 kva=3.27 irradiance=1 temperature=25 %cutin=20 %cutout=20 effcurve=MyEff P-TCurve=MyPvsT Daily=IRRAD_DIA TDaily=TEMP_DIA
New PVSystem.GD_8a9afcd6cf04fa77e7f924a3b4b55c4aa755a472482e00ce970ea612ce29eab4_1 phases=1 bus1=node_416076694.1.4 conn=wye kv=0.1270 pf=1 pmpp=2.57 kva=2.57 irradiance=1 temperature=25 %cutin=20 %cutout=20 effcurve=MyEff P-TCurve=MyPvsT Daily=IRRAD_DIA TDaily=TEMP_DIA
New PVSystem.GD_8a9afcd6cf04fa77e7f924a3b4b55c4aa755a472482e00ce970ea612ce29eab4_2 phases=1 bus1=node_416076694.2.4 conn=wye kv=0.1270 pf=1 pmpp=2.57 kva=2.57 irradiance=1 temperature=25 %cutin=20 %cutout=20 effcurve=MyEff P-TCurve=MyPvsT Daily=IRRAD_DIA TDaily=TEMP_DIA
New PVSystem.GD_8a9afcd6cf04fa77e7f924a3b4b55c4aa755a472482e00ce970ea612ce29eab4_3 phases=1 bus1=node_416076694.3.4 conn=wye kv=0.1270 pf=1 pmpp=2.57 kva=2.57 irradiance=1 temperature=25 %cutin=20 %cutout=20 effcurve=MyEff P-TCurve=MyPvsT Daily=IRRAD_DIA TDaily=TEMP_DIA
New PVSystem.GD_79b846e223a4703faa5025f4d27bcc0bb94a17856141dbd8d7c3ae835c721415_1 phases=1 bus1=node_416076694.1.4 conn=wye kv=0.1270 pf=1 pmpp=1.02 kva=1.02 irradiance=1 temperature=25 %cutin=20 %cutout=20 effcurve=MyEff P-TCurve=MyPvsT Daily=IRRAD_DIA TDaily=TEMP_DIA
New PVSystem.GD_79b846e223a4703faa5025f4d27bcc0bb94a17856141dbd8d7c3ae835c721415_2 phases=1 bus1=node_416076694.2.4 conn=wye kv=0.1270 pf=1 pmpp=1.02 kva=1.02 irradiance=1 temperature=25 %cutin=20 %cutout=20 effcurve=MyEff P-TCurve=MyPvsT Daily=IRRAD_DIA TDaily=TEMP_DIA
New PVSystem.GD_79b846e223a4703faa5025f4d27bcc0bb94a17856141dbd8d7c3ae835c721415_3 phases=1 bus1=node_416076694.3.4 conn=wye kv=0.1270 pf=1 pmpp=1.02 kva=1.02 irradiance=1 temperature=25 %cutin=20 %cutout=20 effcurve=MyEff P-TCurve=MyPvsT Daily=IRRAD_DIA TDaily=TEMP_DIA
New PVSystem.GD_198452cccd7680cc50f12b5c64044956bd792e11b0b7e8b1bf5a764e6d6cd69a_1 phases=1 bus1=node_416076694.1.4 conn=wye kv=0.1270 pf=1 pmpp=1.54 kva=1.54 irradiance=1 temperature=25 %cutin=20 %cutout=20 effcurve=MyEff P-TCurve=MyPvsT Daily=IRRAD_DIA TDaily=TEMP_DIA
New PVSystem.GD_198452cccd7680cc50f12b5c64044956bd792e11b0b7e8b1bf5a764e6d6cd69a_2 phases=1 bus1=node_416076694.2.4 conn=wye kv=0.1270 pf=1 pmpp=1.54 kva=1.54 irradiance=1 temperature=25 %cutin=20 %cutout=20 effcurve=MyEff P-TCurve=MyPvsT Daily=IRRAD_DIA TDaily=TEMP_DIA
New PVSystem.GD_198452cccd7680cc50f12b5c64044956bd792e11b0b7e8b1bf5a764e6d6cd69a_3 phases=1 bus1=node_416076694.3.4 conn=wye kv=0.1270 pf=1 pmpp=1.54 kva=1.54 irradiance=1 temperature=25 %cutin=20 %cutout=20 effcurve=MyEff P-TCurve=MyPvsT Daily=IRRAD_DIA TDaily=TEMP_DIA
New PVSystem.GD_9604a8ec7b78cb686cc40b3fa16c4b507286d6feee5664d178e2e971bd046ef7_1 phases=1 bus1=node_468916750.1.4 conn=wye kv=0.1200 pf=1 pmpp=1.05 kva=1.05 irradiance=1 temperature=25 %cutin=20 %cutout=20 effcurve=MyEff P-TCurve=MyPvsT Daily=IRRAD_DIA TDaily=TEMP_DIA
New PVSystem.GD_9604a8ec7b78cb686cc40b3fa16c4b507286d6feee5664d178e2e971bd046ef7_2 phases=1 bus1=node_468916750.2.4 conn=wye kv=0.1200 pf=1 pmpp=1.05 kva=1.05 irradiance=1 temperature=25 %cutin=20 %cutout=20 effcurve=MyEff P-TCurve=MyPvsT Daily=IRRAD_DIA TDaily=TEMP_DIA
New PVSystem.GD_9b80eb96395e6886e3bafb44605e84cca2268b1ee529ce1c974973abdd628677_1 phases=1 bus1=node_416076685.1.4 conn=wye kv=0.1270 pf=1 pmpp=2.30 kva=2.30 irradiance=1 temperature=25 %cutin=20 %cutout=20 effcurve=MyEff P-TCurve=MyPvsT Daily=IRRAD_DIA TDaily=TEMP_DIA
New PVSystem.GD_9b80eb96395e6886e3bafb44605e84cca2268b1ee529ce1c974973abdd628677_2 phases=1 bus1=node_416076685.2.4 conn=wye kv=0.1270 pf=1 pmpp=2.30 kva=2.30 irradiance=1 temperature=25 %cutin=20 %cutout=20 effcurve=MyEff P-TCurve=MyPvsT Daily=IRRAD_DIA TDaily=TEMP_DIA
New PVSystem.GD_9b80eb96395e6886e3bafb44605e84cca2268b1ee529ce1c974973abdd628677_3 phases=1 bus1=node_416076685.3.4 conn=wye kv=0.1270 pf=1 pmpp=2.30 kva=2.30 irradiance=1 temperature=25 %cutin=20 %cutout=20 effcurve=MyEff P-TCurve=MyPvsT Daily=IRRAD_DIA TDaily=TEMP_DIA
New PVSystem.GD_072009caac96efa4ded00c8597a2bb6a62f7cc0cef14922c707d6e38602fc62e_1 phases=1 bus1=node_416076703.1.4 conn=wye kv=0.1270 pf=1 pmpp=0.45 kva=0.45 irradiance=1 temperature=25 %cutin=20 %cutout=20 effcurve=MyEff P-TCurve=MyPvsT Daily=IRRAD_DIA TDaily=TEMP_DIA
New PVSystem.GD_072009caac96efa4ded00c8597a2bb6a62f7cc0cef14922c707d6e38602fc62e_2 phases=1 bus1=node_416076703.2.4 conn=wye kv=0.1270 pf=1 pmpp=0.45 kva=0.45 irradiance=1 temperature=25 %cutin=20 %cutout=20 effcurve=MyEff P-TCurve=MyPvsT Daily=IRRAD_DIA TDaily=TEMP_DIA
New PVSystem.GD_072009caac96efa4ded00c8597a2bb6a62f7cc0cef14922c707d6e38602fc62e_3 phases=1 bus1=node_416076703.3.4 conn=wye kv=0.1270 pf=1 pmpp=0.45 kva=0.45 irradiance=1 temperature=25 %cutin=20 %cutout=20 effcurve=MyEff P-TCurve=MyPvsT Daily=IRRAD_DIA TDaily=TEMP_DIA
New PVSystem.GD_0aeb95a08e9ee326bbb11c251430af0435bf1ab1de0fc23a71cea571f124aceb_1 phases=1 bus1=node_422855500.1.4 conn=wye kv=0.1200 pf=1 pmpp=6.57 kva=6.57 irradiance=1 temperature=25 %cutin=20 %cutout=20 effcurve=MyEff P-TCurve=MyPvsT Daily=IRRAD_DIA TDaily=TEMP_DIA
New PVSystem.GD_0aeb95a08e9ee326bbb11c251430af0435bf1ab1de0fc23a71cea571f124aceb_2 phases=1 bus1=node_422855500.2.4 conn=wye kv=0.1200 pf=1 pmpp=6.57 kva=6.57 irradiance=1 temperature=25 %cutin=20 %cutout=20 effcurve=MyEff P-TCurve=MyPvsT Daily=IRRAD_DIA TDaily=TEMP_DIA
New PVSystem.GD_de73296ac08fafa2ba8649a34c0f97bfa889780a39cfa7fd03a9368b0d77e25d_1 phases=1 bus1=node_447549136.1.4 conn=wye kv=0.1270 pf=1 pmpp=0.03 kva=0.10 irradiance=1 temperature=25 %cutin=20 %cutout=20 effcurve=MyEff P-TCurve=MyPvsT Daily=IRRAD_DIA TDaily=TEMP_DIA
New PVSystem.GD_de73296ac08fafa2ba8649a34c0f97bfa889780a39cfa7fd03a9368b0d77e25d_2 phases=1 bus1=node_447549136.2.4 conn=wye kv=0.1270 pf=1 pmpp=0.03 kva=0.10 irradiance=1 temperature=25 %cutin=20 %cutout=20 effcurve=MyEff P-TCurve=MyPvsT Daily=IRRAD_DIA TDaily=TEMP_DIA
New PVSystem.GD_de73296ac08fafa2ba8649a34c0f97bfa889780a39cfa7fd03a9368b0d77e25d_3 phases=1 bus1=node_447549136.3.4 conn=wye kv=0.1270 pf=1 pmpp=0.03 kva=0.10 irradiance=1 temperature=25 %cutin=20 %cutout=20 effcurve=MyEff P-TCurve=MyPvsT Daily=IRRAD_DIA TDaily=TEMP_DIA
New PVSystem.GD_d818a425ff4ac835beb49cf37ef5d10201a441f0093779b1c078e354862c59dd_1 phases=1 bus1=node_422754367.1.4 conn=wye kv=0.1200 pf=1 pmpp=1.57 kva=1.57 irradiance=1 temperature=25 %cutin=20 %cutout=20 effcurve=MyEff P-TCurve=MyPvsT Daily=IRRAD_DIA TDaily=TEMP_DIA
New PVSystem.GD_d818a425ff4ac835beb49cf37ef5d10201a441f0093779b1c078e354862c59dd_2 phases=1 bus1=node_422754367.2.4 conn=wye kv=0.1200 pf=1 pmpp=1.57 kva=1.57 irradiance=1 temperature=25 %cutin=20 %cutout=20 effcurve=MyEff P-TCurve=MyPvsT Daily=IRRAD_DIA TDaily=TEMP_DIA
New PVSystem.GD_076ab2f754d74e3f00ea3ddebecb741155cd4ef66ecd1809eb05ef7d63d28680_1 phases=1 bus1=node_416255781.1.4 conn=wye kv=0.1200 pf=1 pmpp=2.60 kva=2.60 irradiance=1 temperature=25 %cutin=20 %cutout=20 effcurve=MyEff P-TCurve=MyPvsT Daily=IRRAD_DIA TDaily=TEMP_DIA
New PVSystem.GD_076ab2f754d74e3f00ea3ddebecb741155cd4ef66ecd1809eb05ef7d63d28680_2 phases=1 bus1=node_416255781.2.4 conn=wye kv=0.1200 pf=1 pmpp=2.60 kva=2.60 irradiance=1 temperature=25 %cutin=20 %cutout=20 effcurve=MyEff P-TCurve=MyPvsT Daily=IRRAD_DIA TDaily=TEMP_DIA
New PVSystem.GD_04489d3f6199300e5c28c1be5d25af67e5560c49095cabc45e6755fae5067ebf_1 phases=1 bus1=node_416076607.1.4 conn=wye kv=0.1200 pf=1 pmpp=2.98 kva=2.98 irradiance=1 temperature=25 %cutin=20 %cutout=20 effcurve=MyEff P-TCurve=MyPvsT Daily=IRRAD_DIA TDaily=TEMP_DIA
New PVSystem.GD_04489d3f6199300e5c28c1be5d25af67e5560c49095cabc45e6755fae5067ebf_2 phases=1 bus1=node_416076607.2.4 conn=wye kv=0.1200 pf=1 pmpp=2.98 kva=2.98 irradiance=1 temperature=25 %cutin=20 %cutout=20 effcurve=MyEff P-TCurve=MyPvsT Daily=IRRAD_DIA TDaily=TEMP_DIA
New PVSystem.GD_b66d20fc6c2a47142c476faee366ca8014f291c4eacd75e8992b59bd4a48fe25_1 phases=1 bus1=node_423097423.1.4 conn=wye kv=0.1200 pf=1 pmpp=5.77 kva=5.77 irradiance=1 temperature=25 %cutin=20 %cutout=20 effcurve=MyEff P-TCurve=MyPvsT Daily=IRRAD_DIA TDaily=TEMP_DIA
New PVSystem.GD_b66d20fc6c2a47142c476faee366ca8014f291c4eacd75e8992b59bd4a48fe25_2 phases=1 bus1=node_423097423.2.4 conn=wye kv=0.1200 pf=1 pmpp=5.77 kva=5.77 irradiance=1 temperature=25 %cutin=20 %cutout=20 effcurve=MyEff P-TCurve=MyPvsT Daily=IRRAD_DIA TDaily=TEMP_DIA
New PVSystem.GD_2a9a18a20598c50b4add860f4f78c066a4995a448fb4782aa55226d13443ee9b_1 phases=1 bus1=node_423086690.1.4 conn=wye kv=0.1200 pf=1 pmpp=0.62 kva=0.62 irradiance=1 temperature=25 %cutin=20 %cutout=20 effcurve=MyEff P-TCurve=MyPvsT Daily=IRRAD_DIA TDaily=TEMP_DIA
New PVSystem.GD_2a9a18a20598c50b4add860f4f78c066a4995a448fb4782aa55226d13443ee9b_2 phases=1 bus1=node_423086690.2.4 conn=wye kv=0.1200 pf=1 pmpp=0.62 kva=0.62 irradiance=1 temperature=25 %cutin=20 %cutout=20 effcurve=MyEff P-TCurve=MyPvsT Daily=IRRAD_DIA TDaily=TEMP_DIA
New PVSystem.GD_eb789fc73e7fde646af0afd695cfb2fc476837d8d33d8574e06e344a9e5dd442_1 phases=1 bus1=node_417414212.1.4 conn=wye kv=0.1270 pf=1 pmpp=1.61 kva=1.61 irradiance=1 temperature=25 %cutin=20 %cutout=20 effcurve=MyEff P-TCurve=MyPvsT Daily=IRRAD_DIA TDaily=TEMP_DIA
New PVSystem.GD_eb789fc73e7fde646af0afd695cfb2fc476837d8d33d8574e06e344a9e5dd442_2 phases=1 bus1=node_417414212.2.4 conn=wye kv=0.1270 pf=1 pmpp=1.61 kva=1.61 irradiance=1 temperature=25 %cutin=20 %cutout=20 effcurve=MyEff P-TCurve=MyPvsT Daily=IRRAD_DIA TDaily=TEMP_DIA
New PVSystem.GD_eb789fc73e7fde646af0afd695cfb2fc476837d8d33d8574e06e344a9e5dd442_3 phases=1 bus1=node_417414212.3.4 conn=wye kv=0.1270 pf=1 pmpp=1.61 kva=1.61 irradiance=1 temperature=25 %cutin=20 %cutout=20 effcurve=MyEff P-TCurve=MyPvsT Daily=IRRAD_DIA TDaily=TEMP_DIA
New PVSystem.GD_371897fdf63d5ded75646957daa1a403054b1850dc972c80a269df644be36534_1 phases=1 bus1=node_422801878.1.4 conn=wye kv=0.1200 pf=1 pmpp=7.50 kva=7.50 irradiance=1 temperature=25 %cutin=20 %cutout=20 effcurve=MyEff P-TCurve=MyPvsT Daily=IRRAD_DIA TDaily=TEMP_DIA
New PVSystem.GD_371897fdf63d5ded75646957daa1a403054b1850dc972c80a269df644be36534_2 phases=1 bus1=node_422801878.2.4 conn=wye kv=0.1200 pf=1 pmpp=7.50 kva=7.50 irradiance=1 temperature=25 %cutin=20 %cutout=20 effcurve=MyEff P-TCurve=MyPvsT Daily=IRRAD_DIA TDaily=TEMP_DIA
New PVSystem.GD_b1408567e977e3991bbc912f9d45163498d7dc930dc791ee42257413eb0b2aa2_1 phases=1 bus1=node_417484995.1.4 conn=wye kv=0.1200 pf=1 pmpp=1.37 kva=1.37 irradiance=1 temperature=25 %cutin=20 %cutout=20 effcurve=MyEff P-TCurve=MyPvsT Daily=IRRAD_DIA TDaily=TEMP_DIA
New PVSystem.GD_b1408567e977e3991bbc912f9d45163498d7dc930dc791ee42257413eb0b2aa2_2 phases=1 bus1=node_417484995.2.4 conn=wye kv=0.1200 pf=1 pmpp=1.37 kva=1.37 irradiance=1 temperature=25 %cutin=20 %cutout=20 effcurve=MyEff P-TCurve=MyPvsT Daily=IRRAD_DIA TDaily=TEMP_DIA
New PVSystem.GD_f168a89f423b122904c6406c4f08875df2fbc66032b5a01e68c74ed71fb02e47_1 phases=1 bus1=node_416277863.1.4 conn=wye kv=0.1200 pf=1 pmpp=0.85 kva=0.85 irradiance=1 temperature=25 %cutin=20 %cutout=20 effcurve=MyEff P-TCurve=MyPvsT Daily=IRRAD_DIA TDaily=TEMP_DIA
New PVSystem.GD_f168a89f423b122904c6406c4f08875df2fbc66032b5a01e68c74ed71fb02e47_2 phases=1 bus1=node_416277863.2.4 conn=wye kv=0.1200 pf=1 pmpp=0.85 kva=0.85 irradiance=1 temperature=25 %cutin=20 %cutout=20 effcurve=MyEff P-TCurve=MyPvsT Daily=IRRAD_DIA TDaily=TEMP_DIA
New PVSystem.GD_55e38f7fd99c7197b2410ea7aaba7b29351269f804b9cbb99e2134274add95e9_1 phases=1 bus1=node_416077186.1.4 conn=wye kv=0.1270 pf=1 pmpp=0.43 kva=0.43 irradiance=1 temperature=25 %cutin=20 %cutout=20 effcurve=MyEff P-TCurve=MyPvsT Daily=IRRAD_DIA TDaily=TEMP_DIA
New PVSystem.GD_55e38f7fd99c7197b2410ea7aaba7b29351269f804b9cbb99e2134274add95e9_2 phases=1 bus1=node_416077186.2.4 conn=wye kv=0.1270 pf=1 pmpp=0.43 kva=0.43 irradiance=1 temperature=25 %cutin=20 %cutout=20 effcurve=MyEff P-TCurve=MyPvsT Daily=IRRAD_DIA TDaily=TEMP_DIA
New PVSystem.GD_55e38f7fd99c7197b2410ea7aaba7b29351269f804b9cbb99e2134274add95e9_3 phases=1 bus1=node_416077186.3.4 conn=wye kv=0.1270 pf=1 pmpp=0.43 kva=0.43 irradiance=1 temperature=25 %cutin=20 %cutout=20 effcurve=MyEff P-TCurve=MyPvsT Daily=IRRAD_DIA TDaily=TEMP_DIA
New PVSystem.GD_01e242b941e8180fc77fb673b0f99669367a7c0105c66dbef42175c33ecdd131_1 phases=1 bus1=node_422757964.1.4 conn=wye kv=0.1200 pf=1 pmpp=1.24 kva=1.24 irradiance=1 temperature=25 %cutin=20 %cutout=20 effcurve=MyEff P-TCurve=MyPvsT Daily=IRRAD_DIA TDaily=TEMP_DIA
New PVSystem.GD_01e242b941e8180fc77fb673b0f99669367a7c0105c66dbef42175c33ecdd131_2 phases=1 bus1=node_422757964.2.4 conn=wye kv=0.1200 pf=1 pmpp=1.24 kva=1.24 irradiance=1 temperature=25 %cutin=20 %cutout=20 effcurve=MyEff P-TCurve=MyPvsT Daily=IRRAD_DIA TDaily=TEMP_DIA
New PVSystem.GD_044ba27f8020ae1a919938b5913042334d0aed88a1a063eb28fec348bf4cc875_1 phases=1 bus1=node_1163068594.1.4 conn=wye kv=0.1200 pf=1 pmpp=0.57 kva=0.57 irradiance=1 temperature=25 %cutin=20 %cutout=20 effcurve=MyEff P-TCurve=MyPvsT Daily=IRRAD_DIA TDaily=TEMP_DIA
New PVSystem.GD_044ba27f8020ae1a919938b5913042334d0aed88a1a063eb28fec348bf4cc875_2 phases=1 bus1=node_1163068594.2.4 conn=wye kv=0.1200 pf=1 pmpp=0.57 kva=0.57 irradiance=1 temperature=25 %cutin=20 %cutout=20 effcurve=MyEff P-TCurve=MyPvsT Daily=IRRAD_DIA TDaily=TEMP_DIA
New PVSystem.GD_6223bce9607bbd8d28f2f183c5c2cd5dcb860bbaaa624a2b72d522bbff105820_1 phases=1 bus1=node_1223957795.1.4 conn=wye kv=0.1270 pf=1 pmpp=4.92 kva=4.92 irradiance=1 temperature=25 %cutin=20 %cutout=20 effcurve=MyEff P-TCurve=MyPvsT Daily=IRRAD_DIA TDaily=TEMP_DIA
New PVSystem.GD_6223bce9607bbd8d28f2f183c5c2cd5dcb860bbaaa624a2b72d522bbff105820_2 phases=1 bus1=node_1223957795.2.4 conn=wye kv=0.1270 pf=1 pmpp=4.92 kva=4.92 irradiance=1 temperature=25 %cutin=20 %cutout=20 effcurve=MyEff P-TCurve=MyPvsT Daily=IRRAD_DIA TDaily=TEMP_DIA
New PVSystem.GD_6223bce9607bbd8d28f2f183c5c2cd5dcb860bbaaa624a2b72d522bbff105820_3 phases=1 bus1=node_1223957795.3.4 conn=wye kv=0.1270 pf=1 pmpp=4.92 kva=4.92 irradiance=1 temperature=25 %cutin=20 %cutout=20 effcurve=MyEff P-TCurve=MyPvsT Daily=IRRAD_DIA TDaily=TEMP_DIA
New PVSystem.GD_826fcb7407b0e870e33b8d54eb47b24a6314c0920898af158b5121822601ee63_1 phases=1 bus1=node_1162305578.1.4 conn=wye kv=0.1200 pf=1 pmpp=0.56 kva=0.56 irradiance=1 temperature=25 %cutin=20 %cutout=20 effcurve=MyEff P-TCurve=MyPvsT Daily=IRRAD_DIA TDaily=TEMP_DIA
New PVSystem.GD_826fcb7407b0e870e33b8d54eb47b24a6314c0920898af158b5121822601ee63_2 phases=1 bus1=node_1162305578.2.4 conn=wye kv=0.1200 pf=1 pmpp=0.56 kva=0.56 irradiance=1 temperature=25 %cutin=20 %cutout=20 effcurve=MyEff P-TCurve=MyPvsT Daily=IRRAD_DIA TDaily=TEMP_DIA
New PVSystem.GD_4c5b1aee8a6861fd1db6ea62169922b645d9ef59147f9de56fa832347264fd4a_1 phases=1 bus1=node_983459322.1.4 conn=wye kv=0.1200 pf=1 pmpp=5.10 kva=5.10 irradiance=1 temperature=25 %cutin=20 %cutout=20 effcurve=MyEff P-TCurve=MyPvsT Daily=IRRAD_DIA TDaily=TEMP_DIA
New PVSystem.GD_4c5b1aee8a6861fd1db6ea62169922b645d9ef59147f9de56fa832347264fd4a_2 phases=1 bus1=node_983459322.2.4 conn=wye kv=0.1200 pf=1 pmpp=5.10 kva=5.10 irradiance=1 temperature=25 %cutin=20 %cutout=20 effcurve=MyEff P-TCurve=MyPvsT Daily=IRRAD_DIA TDaily=TEMP_DIA
New PVSystem.GD_30de2777ef4185b014c41521d46f7104c9bb92bc415135f02761088566e46094_1 phases=1 bus1=node_1183765681.1.4 conn=wye kv=0.1270 pf=1 pmpp=10.87 kva=10.87 irradiance=1 temperature=25 %cutin=20 %cutout=20 effcurve=MyEff P-TCurve=MyPvsT Daily=IRRAD_DIA TDaily=TEMP_DIA
New PVSystem.GD_30de2777ef4185b014c41521d46f7104c9bb92bc415135f02761088566e46094_2 phases=1 bus1=node_1183765681.2.4 conn=wye kv=0.1270 pf=1 pmpp=10.87 kva=10.87 irradiance=1 temperature=25 %cutin=20 %cutout=20 effcurve=MyEff P-TCurve=MyPvsT Daily=IRRAD_DIA TDaily=TEMP_DIA
New PVSystem.GD_30de2777ef4185b014c41521d46f7104c9bb92bc415135f02761088566e46094_3 phases=1 bus1=node_1183765681.3.4 conn=wye kv=0.1270 pf=1 pmpp=10.87 kva=10.87 irradiance=1 temperature=25 %cutin=20 %cutout=20 effcurve=MyEff P-TCurve=MyPvsT Daily=IRRAD_DIA TDaily=TEMP_DIA
New PVSystem.GD_3e877e38ff7a1446480a95958d4b6cf3247f547d06ac310457e20c253f31e5fb_1 phases=1 bus1=node_422758078.1.4 conn=wye kv=0.1200 pf=1 pmpp=1.24 kva=1.24 irradiance=1 temperature=25 %cutin=20 %cutout=20 effcurve=MyEff P-TCurve=MyPvsT Daily=IRRAD_DIA TDaily=TEMP_DIA
New PVSystem.GD_3e877e38ff7a1446480a95958d4b6cf3247f547d06ac310457e20c253f31e5fb_2 phases=1 bus1=node_422758078.2.4 conn=wye kv=0.1200 pf=1 pmpp=1.24 kva=1.24 irradiance=1 temperature=25 %cutin=20 %cutout=20 effcurve=MyEff P-TCurve=MyPvsT Daily=IRRAD_DIA TDaily=TEMP_DIA
New PVSystem.GD_1bda70a071bb360fb0772f8ed7c860a2a07ecb853795be970ea79543a9942f1f_1 phases=1 bus1=node_2122580526.1.4 conn=wye kv=0.1200 pf=1 pmpp=1.32 kva=1.32 irradiance=1 temperature=25 %cutin=20 %cutout=20 effcurve=MyEff P-TCurve=MyPvsT Daily=IRRAD_DIA TDaily=TEMP_DIA
New PVSystem.GD_1bda70a071bb360fb0772f8ed7c860a2a07ecb853795be970ea79543a9942f1f_2 phases=1 bus1=node_2122580526.2.4 conn=wye kv=0.1200 pf=1 pmpp=1.32 kva=1.32 irradiance=1 temperature=25 %cutin=20 %cutout=20 effcurve=MyEff P-TCurve=MyPvsT Daily=IRRAD_DIA TDaily=TEMP_DIA
New PVSystem.GD_6f994f541556195a6dc917acfe3b1317b645c7018141779c09aa6d00a5fde560_1 phases=1 bus1=node_416079619.1.4 conn=wye kv=0.1200 pf=1 pmpp=2.50 kva=2.50 irradiance=1 temperature=25 %cutin=20 %cutout=20 effcurve=MyEff P-TCurve=MyPvsT Daily=IRRAD_DIA TDaily=TEMP_DIA
New PVSystem.GD_6f994f541556195a6dc917acfe3b1317b645c7018141779c09aa6d00a5fde560_2 phases=1 bus1=node_416079619.2.4 conn=wye kv=0.1200 pf=1 pmpp=2.50 kva=2.50 irradiance=1 temperature=25 %cutin=20 %cutout=20 effcurve=MyEff P-TCurve=MyPvsT Daily=IRRAD_DIA TDaily=TEMP_DIA
New PVSystem.GD_074431de1bb5a7a454fb65fe4104f52bd7f8a0c7b8cc8697406e1abcd57d9ae1_1 phases=1 bus1=node_422757898.1.4 conn=wye kv=0.1200 pf=1 pmpp=1.19 kva=1.19 irradiance=1 temperature=25 %cutin=20 %cutout=20 effcurve=MyEff P-TCurve=MyPvsT Daily=IRRAD_DIA TDaily=TEMP_DIA
New PVSystem.GD_074431de1bb5a7a454fb65fe4104f52bd7f8a0c7b8cc8697406e1abcd57d9ae1_2 phases=1 bus1=node_422757898.2.4 conn=wye kv=0.1200 pf=1 pmpp=1.19 kva=1.19 irradiance=1 temperature=25 %cutin=20 %cutout=20 effcurve=MyEff P-TCurve=MyPvsT Daily=IRRAD_DIA TDaily=TEMP_DIA
New PVSystem.GD_344de52e1cc93b3e74d7bc1951cc0cea107fa2a16fcfa4b5d87976b55adfc78b_1 phases=1 bus1=node_422760337.1.4 conn=wye kv=0.1200 pf=1 pmpp=0.89 kva=0.89 irradiance=1 temperature=25 %cutin=20 %cutout=20 effcurve=MyEff P-TCurve=MyPvsT Daily=IRRAD_DIA TDaily=TEMP_DIA
New PVSystem.GD_344de52e1cc93b3e74d7bc1951cc0cea107fa2a16fcfa4b5d87976b55adfc78b_2 phases=1 bus1=node_422760337.2.4 conn=wye kv=0.1200 pf=1 pmpp=0.89 kva=0.89 irradiance=1 temperature=25 %cutin=20 %cutout=20 effcurve=MyEff P-TCurve=MyPvsT Daily=IRRAD_DIA TDaily=TEMP_DIA
New PVSystem.GD_2a5e7d3b0a69fed5f9add7dd0d8a8fd0c6ef2454c21092fe08843ebb0df92738_1 phases=1 bus1=node_2351484604.1.4 conn=wye kv=0.1200 pf=1 pmpp=1.17 kva=1.17 irradiance=1 temperature=25 %cutin=20 %cutout=20 effcurve=MyEff P-TCurve=MyPvsT Daily=IRRAD_DIA TDaily=TEMP_DIA
New PVSystem.GD_2a5e7d3b0a69fed5f9add7dd0d8a8fd0c6ef2454c21092fe08843ebb0df92738_2 phases=1 bus1=node_2351484604.2.4 conn=wye kv=0.1200 pf=1 pmpp=1.17 kva=1.17 irradiance=1 temperature=25 %cutin=20 %cutout=20 effcurve=MyEff P-TCurve=MyPvsT Daily=IRRAD_DIA TDaily=TEMP_DIA
New PVSystem.GD_f71e12a8e3f26ad15afd11cf4e331cd6768a7b1a0f02d00a3ab52cb0b60b9dff_1 phases=1 bus1=node_422759794.1.4 conn=wye kv=0.1200 pf=1 pmpp=1.88 kva=1.88 irradiance=1 temperature=25 %cutin=20 %cutout=20 effcurve=MyEff P-TCurve=MyPvsT Daily=IRRAD_DIA TDaily=TEMP_DIA
New PVSystem.GD_f71e12a8e3f26ad15afd11cf4e331cd6768a7b1a0f02d00a3ab52cb0b60b9dff_2 phases=1 bus1=node_422759794.2.4 conn=wye kv=0.1200 pf=1 pmpp=1.88 kva=1.88 irradiance=1 temperature=25 %cutin=20 %cutout=20 effcurve=MyEff P-TCurve=MyPvsT Daily=IRRAD_DIA TDaily=TEMP_DIA
New PVSystem.GD_57b357893998c3f152c67838519d48d1ddd8e7d55d12d262572b1352e1a367d1_1 phases=1 bus1=node_416102340.1.4 conn=wye kv=0.1200 pf=1 pmpp=1.11 kva=1.11 irradiance=1 temperature=25 %cutin=20 %cutout=20 effcurve=MyEff P-TCurve=MyPvsT Daily=IRRAD_DIA TDaily=TEMP_DIA
New PVSystem.GD_57b357893998c3f152c67838519d48d1ddd8e7d55d12d262572b1352e1a367d1_2 phases=1 bus1=node_416102340.2.4 conn=wye kv=0.1200 pf=1 pmpp=1.11 kva=1.11 irradiance=1 temperature=25 %cutin=20 %cutout=20 effcurve=MyEff P-TCurve=MyPvsT Daily=IRRAD_DIA TDaily=TEMP_DIA
New PVSystem.GD_8c8dc965cddd243c3e60c0042a520a5cf3ab9dc0b319643e0961243bdcaf95bb_1 phases=1 bus1=node_416104422.1.4 conn=wye kv=0.1200 pf=1 pmpp=2.09 kva=2.09 irradiance=1 temperature=25 %cutin=20 %cutout=20 effcurve=MyEff P-TCurve=MyPvsT Daily=IRRAD_DIA TDaily=TEMP_DIA
New PVSystem.GD_8c8dc965cddd243c3e60c0042a520a5cf3ab9dc0b319643e0961243bdcaf95bb_2 phases=1 bus1=node_416104422.2.4 conn=wye kv=0.1200 pf=1 pmpp=2.09 kva=2.09 irradiance=1 temperature=25 %cutin=20 %cutout=20 effcurve=MyEff P-TCurve=MyPvsT Daily=IRRAD_DIA TDaily=TEMP_DIA
New PVSystem.GD_4ee563a7f029d1efbd9bc3d94a1731b2dd57425d2ac684a5144799a4474a9363_1 phases=1 bus1=node_1234112889.1.4 conn=wye kv=0.1270 pf=1 pmpp=7.63 kva=7.63 irradiance=1 temperature=25 %cutin=20 %cutout=20 effcurve=MyEff P-TCurve=MyPvsT Daily=IRRAD_DIA TDaily=TEMP_DIA
New PVSystem.GD_4ee563a7f029d1efbd9bc3d94a1731b2dd57425d2ac684a5144799a4474a9363_2 phases=1 bus1=node_1234112889.2.4 conn=wye kv=0.1270 pf=1 pmpp=7.63 kva=7.63 irradiance=1 temperature=25 %cutin=20 %cutout=20 effcurve=MyEff P-TCurve=MyPvsT Daily=IRRAD_DIA TDaily=TEMP_DIA
New PVSystem.GD_4ee563a7f029d1efbd9bc3d94a1731b2dd57425d2ac684a5144799a4474a9363_3 phases=1 bus1=node_1234112889.3.4 conn=wye kv=0.1270 pf=1 pmpp=7.63 kva=7.63 irradiance=1 temperature=25 %cutin=20 %cutout=20 effcurve=MyEff P-TCurve=MyPvsT Daily=IRRAD_DIA TDaily=TEMP_DIA
New PVSystem.GD_b37c7dc6ff0c561523a2261c01e4f64a4da4f1929501687aa59ee369fe8ab713_1 phases=1 bus1=node_422750998.1.4 conn=wye kv=0.1200 pf=1 pmpp=2.86 kva=2.86 irradiance=1 temperature=25 %cutin=20 %cutout=20 effcurve=MyEff P-TCurve=MyPvsT Daily=IRRAD_DIA TDaily=TEMP_DIA
New PVSystem.GD_b37c7dc6ff0c561523a2261c01e4f64a4da4f1929501687aa59ee369fe8ab713_2 phases=1 bus1=node_422750998.2.4 conn=wye kv=0.1200 pf=1 pmpp=2.86 kva=2.86 irradiance=1 temperature=25 %cutin=20 %cutout=20 effcurve=MyEff P-TCurve=MyPvsT Daily=IRRAD_DIA TDaily=TEMP_DIA
New PVSystem.GD_c0b6aef1083edd9884ecd27707bd7e0895027af712a61a7fd35c7ec4c7e3c922_1 phases=1 bus1=node_417397385.1.4 conn=wye kv=0.1200 pf=1 pmpp=1.29 kva=1.29 irradiance=1 temperature=25 %cutin=20 %cutout=20 effcurve=MyEff P-TCurve=MyPvsT Daily=IRRAD_DIA TDaily=TEMP_DIA
New PVSystem.GD_c0b6aef1083edd9884ecd27707bd7e0895027af712a61a7fd35c7ec4c7e3c922_2 phases=1 bus1=node_417397385.2.4 conn=wye kv=0.1200 pf=1 pmpp=1.29 kva=1.29 irradiance=1 temperature=25 %cutin=20 %cutout=20 effcurve=MyEff P-TCurve=MyPvsT Daily=IRRAD_DIA TDaily=TEMP_DIA
New PVSystem.GD_b4d9b06e41614372c22da0f276a9bc1bcd743c2338d2191245ec33b617a7a481_1 phases=1 bus1=node_1635120992.1.4 conn=wye kv=0.1200 pf=1 pmpp=2.03 kva=2.03 irradiance=1 temperature=25 %cutin=20 %cutout=20 effcurve=MyEff P-TCurve=MyPvsT Daily=IRRAD_DIA TDaily=TEMP_DIA
New PVSystem.GD_b4d9b06e41614372c22da0f276a9bc1bcd743c2338d2191245ec33b617a7a481_2 phases=1 bus1=node_1635120992.2.4 conn=wye kv=0.1200 pf=1 pmpp=2.03 kva=2.03 irradiance=1 temperature=25 %cutin=20 %cutout=20 effcurve=MyEff P-TCurve=MyPvsT Daily=IRRAD_DIA TDaily=TEMP_DIA
New PVSystem.GD_71a2b33fbeb1e04e9835902cfbb208b2785945a1cad3728e4b746ea440222d72_1 phases=1 bus1=node_422758966.1.4 conn=wye kv=0.1270 pf=1 pmpp=1.17 kva=1.17 irradiance=1 temperature=25 %cutin=20 %cutout=20 effcurve=MyEff P-TCurve=MyPvsT Daily=IRRAD_DIA TDaily=TEMP_DIA
New PVSystem.GD_71a2b33fbeb1e04e9835902cfbb208b2785945a1cad3728e4b746ea440222d72_2 phases=1 bus1=node_422758966.2.4 conn=wye kv=0.1270 pf=1 pmpp=1.17 kva=1.17 irradiance=1 temperature=25 %cutin=20 %cutout=20 effcurve=MyEff P-TCurve=MyPvsT Daily=IRRAD_DIA TDaily=TEMP_DIA
New PVSystem.GD_71a2b33fbeb1e04e9835902cfbb208b2785945a1cad3728e4b746ea440222d72_3 phases=1 bus1=node_422758966.3.4 conn=wye kv=0.1270 pf=1 pmpp=1.17 kva=1.17 irradiance=1 temperature=25 %cutin=20 %cutout=20 effcurve=MyEff P-TCurve=MyPvsT Daily=IRRAD_DIA TDaily=TEMP_DIA
New PVSystem.GD_b8e8f3e96b78347da1c7be40e7b6cdfe24d3b285ca36f08c9f3747bb8b808b10_1 phases=1 bus1=node_416076400.1.4 conn=wye kv=0.1200 pf=1 pmpp=2.07 kva=2.07 irradiance=1 temperature=25 %cutin=20 %cutout=20 effcurve=MyEff P-TCurve=MyPvsT Daily=IRRAD_DIA TDaily=TEMP_DIA
New PVSystem.GD_b8e8f3e96b78347da1c7be40e7b6cdfe24d3b285ca36f08c9f3747bb8b808b10_2 phases=1 bus1=node_416076400.2.4 conn=wye kv=0.1200 pf=1 pmpp=2.07 kva=2.07 irradiance=1 temperature=25 %cutin=20 %cutout=20 effcurve=MyEff P-TCurve=MyPvsT Daily=IRRAD_DIA TDaily=TEMP_DIA
New PVSystem.GD_a8b91b474cf6b885f68218de66ed63104da60b2c25b8d2c6bc79ca64e5642798_1 phases=1 bus1=node_423046607.1.4 conn=wye kv=0.1270 pf=1 pmpp=1.21 kva=1.21 irradiance=1 temperature=25 %cutin=20 %cutout=20 effcurve=MyEff P-TCurve=MyPvsT Daily=IRRAD_DIA TDaily=TEMP_DIA
New PVSystem.GD_a8b91b474cf6b885f68218de66ed63104da60b2c25b8d2c6bc79ca64e5642798_2 phases=1 bus1=node_423046607.2.4 conn=wye kv=0.1270 pf=1 pmpp=1.21 kva=1.21 irradiance=1 temperature=25 %cutin=20 %cutout=20 effcurve=MyEff P-TCurve=MyPvsT Daily=IRRAD_DIA TDaily=TEMP_DIA
New PVSystem.GD_a8b91b474cf6b885f68218de66ed63104da60b2c25b8d2c6bc79ca64e5642798_3 phases=1 bus1=node_423046607.3.4 conn=wye kv=0.1270 pf=1 pmpp=1.21 kva=1.21 irradiance=1 temperature=25 %cutin=20 %cutout=20 effcurve=MyEff P-TCurve=MyPvsT Daily=IRRAD_DIA TDaily=TEMP_DIA
New PVSystem.GD_f0c78dfd6428d6f256ba4704c0bad39aba52c4e0085e4d00c261e594fd3081d5_1 phases=1 bus1=node_416043519.1.4 conn=wye kv=0.1200 pf=1 pmpp=2.79 kva=2.79 irradiance=1 temperature=25 %cutin=20 %cutout=20 effcurve=MyEff P-TCurve=MyPvsT Daily=IRRAD_DIA TDaily=TEMP_DIA
New PVSystem.GD_f0c78dfd6428d6f256ba4704c0bad39aba52c4e0085e4d00c261e594fd3081d5_2 phases=1 bus1=node_416043519.2.4 conn=wye kv=0.1200 pf=1 pmpp=2.79 kva=2.79 irradiance=1 temperature=25 %cutin=20 %cutout=20 effcurve=MyEff P-TCurve=MyPvsT Daily=IRRAD_DIA TDaily=TEMP_DIA
New PVSystem.GD_43e4b52057bc81af633cf6ba4755cad68f4e3a92c1ea0ec9d038b4456b09d204_1 phases=1 bus1=node_422752054.1.4 conn=wye kv=0.1270 pf=1 pmpp=0.66 kva=0.66 irradiance=1 temperature=25 %cutin=20 %cutout=20 effcurve=MyEff P-TCurve=MyPvsT Daily=IRRAD_DIA TDaily=TEMP_DIA
New PVSystem.GD_43e4b52057bc81af633cf6ba4755cad68f4e3a92c1ea0ec9d038b4456b09d204_2 phases=1 bus1=node_422752054.2.4 conn=wye kv=0.1270 pf=1 pmpp=0.66 kva=0.66 irradiance=1 temperature=25 %cutin=20 %cutout=20 effcurve=MyEff P-TCurve=MyPvsT Daily=IRRAD_DIA TDaily=TEMP_DIA
New PVSystem.GD_43e4b52057bc81af633cf6ba4755cad68f4e3a92c1ea0ec9d038b4456b09d204_3 phases=1 bus1=node_422752054.3.4 conn=wye kv=0.1270 pf=1 pmpp=0.66 kva=0.66 irradiance=1 temperature=25 %cutin=20 %cutout=20 effcurve=MyEff P-TCurve=MyPvsT Daily=IRRAD_DIA TDaily=TEMP_DIA
New PVSystem.GD_751468f9301c37b2cd5fd2b7328d8fd40cbaed45a1589687a0479f13fce7e521_1 phases=1 bus1=node_416076421.1.4 conn=wye kv=0.1200 pf=1 pmpp=9.45 kva=9.45 irradiance=1 temperature=25 %cutin=20 %cutout=20 effcurve=MyEff P-TCurve=MyPvsT Daily=IRRAD_DIA TDaily=TEMP_DIA
New PVSystem.GD_751468f9301c37b2cd5fd2b7328d8fd40cbaed45a1589687a0479f13fce7e521_2 phases=1 bus1=node_416076421.2.4 conn=wye kv=0.1200 pf=1 pmpp=9.45 kva=9.45 irradiance=1 temperature=25 %cutin=20 %cutout=20 effcurve=MyEff P-TCurve=MyPvsT Daily=IRRAD_DIA TDaily=TEMP_DIA
New PVSystem.GD_a95b7d40c94cf04608c42327b4b1dd4e0d3fd4d168da126a110adbaf21dec9fc_1 phases=1 bus1=node_422805061.1.4 conn=wye kv=0.1200 pf=1 pmpp=1.58 kva=1.58 irradiance=1 temperature=25 %cutin=20 %cutout=20 effcurve=MyEff P-TCurve=MyPvsT Daily=IRRAD_DIA TDaily=TEMP_DIA
New PVSystem.GD_a95b7d40c94cf04608c42327b4b1dd4e0d3fd4d168da126a110adbaf21dec9fc_2 phases=1 bus1=node_422805061.2.4 conn=wye kv=0.1200 pf=1 pmpp=1.58 kva=1.58 irradiance=1 temperature=25 %cutin=20 %cutout=20 effcurve=MyEff P-TCurve=MyPvsT Daily=IRRAD_DIA TDaily=TEMP_DIA
New PVSystem.GD_da8c1946d4710dc9d3d2eb479347304ecab616a353777b43fb09488e09ac6437_1 phases=1 bus1=node_422751004.1.4 conn=wye kv=0.1270 pf=1 pmpp=2.81 kva=2.81 irradiance=1 temperature=25 %cutin=20 %cutout=20 effcurve=MyEff P-TCurve=MyPvsT Daily=IRRAD_DIA TDaily=TEMP_DIA
New PVSystem.GD_da8c1946d4710dc9d3d2eb479347304ecab616a353777b43fb09488e09ac6437_2 phases=1 bus1=node_422751004.2.4 conn=wye kv=0.1270 pf=1 pmpp=2.81 kva=2.81 irradiance=1 temperature=25 %cutin=20 %cutout=20 effcurve=MyEff P-TCurve=MyPvsT Daily=IRRAD_DIA TDaily=TEMP_DIA
New PVSystem.GD_da8c1946d4710dc9d3d2eb479347304ecab616a353777b43fb09488e09ac6437_3 phases=1 bus1=node_422751004.3.4 conn=wye kv=0.1270 pf=1 pmpp=2.81 kva=2.81 irradiance=1 temperature=25 %cutin=20 %cutout=20 effcurve=MyEff P-TCurve=MyPvsT Daily=IRRAD_DIA TDaily=TEMP_DIA
New PVSystem.GD_3ef55e7333314f66a5384e3a1e7d33ad3a309171efb624bfb178bf8e4dbe898f_1 phases=1 bus1=node_422845936.1.4 conn=wye kv=0.1270 pf=1 pmpp=26.15 kva=26.15 irradiance=1 temperature=25 %cutin=20 %cutout=20 effcurve=MyEff P-TCurve=MyPvsT Daily=IRRAD_DIA TDaily=TEMP_DIA
New PVSystem.GD_3ef55e7333314f66a5384e3a1e7d33ad3a309171efb624bfb178bf8e4dbe898f_2 phases=1 bus1=node_422845936.2.4 conn=wye kv=0.1270 pf=1 pmpp=26.15 kva=26.15 irradiance=1 temperature=25 %cutin=20 %cutout=20 effcurve=MyEff P-TCurve=MyPvsT Daily=IRRAD_DIA TDaily=TEMP_DIA
New PVSystem.GD_3ef55e7333314f66a5384e3a1e7d33ad3a309171efb624bfb178bf8e4dbe898f_3 phases=1 bus1=node_422845936.3.4 conn=wye kv=0.1270 pf=1 pmpp=26.15 kva=26.15 irradiance=1 temperature=25 %cutin=20 %cutout=20 effcurve=MyEff P-TCurve=MyPvsT Daily=IRRAD_DIA TDaily=TEMP_DIA
New PVSystem.GD_2298c36ba897d00303d71d2a2dcfc9e588d6b4a5a51b1063a0eca9b851fa77f6_1 phases=1 bus1=node_416172976.1.4 conn=wye kv=0.1270 pf=1 pmpp=50.00 kva=50.00 irradiance=1 temperature=25 %cutin=20 %cutout=20 effcurve=MyEff P-TCurve=MyPvsT Daily=IRRAD_DIA TDaily=TEMP_DIA
New PVSystem.GD_2298c36ba897d00303d71d2a2dcfc9e588d6b4a5a51b1063a0eca9b851fa77f6_2 phases=1 bus1=node_416172976.2.4 conn=wye kv=0.1270 pf=1 pmpp=50.00 kva=50.00 irradiance=1 temperature=25 %cutin=20 %cutout=20 effcurve=MyEff P-TCurve=MyPvsT Daily=IRRAD_DIA TDaily=TEMP_DIA
New PVSystem.GD_2298c36ba897d00303d71d2a2dcfc9e588d6b4a5a51b1063a0eca9b851fa77f6_3 phases=1 bus1=node_416172976.3.4 conn=wye kv=0.1270 pf=1 pmpp=50.00 kva=50.00 irradiance=1 temperature=25 %cutin=20 %cutout=20 effcurve=MyEff P-TCurve=MyPvsT Daily=IRRAD_DIA TDaily=TEMP_DIA
